OpenVSP model (file version 5), 6 components.
Geometry view with OpenVSP parameter names; values to 6 digits, angles in degrees, lengths in the model's unit.
Overall bounding box: X_Min=0 X_Len=32.846 Y_Min=-14.2001 Y_Len=28.4003 Z_Min=-3.4342 Z_Len=10.5559

Fuselage "Fuselage"
  location (X Y Z) 0 0 0, rotation 0 0 0
  bounding box size 32 3.2 3.23074
  Design: Length=32
  cross sections:
    n  XLocPercent  YLocPercent  ZLocPercent  ZRotate    shape
    0  0            0            -0.0325      0          point
    1  0.0473387    0            -0.026       0          ellipse Ellipse_Height=1.5 Ellipse_Width=2.2
    2  0.102474     0            -0.008       0          ellipse Ellipse_Height=2.71374 Ellipse_Width=2.9
    3  0.184572     0            0            0          ellipse Ellipse_Height=3.2 Ellipse_Width=3.2
    4  0.5          0            0            0          as above
    5  0.75         0            0            0          as above
    6  0.988        0            0.0326087    -0.818182  ellipse Ellipse_Height=1 Ellipse_Width=0.6
    7  1            0            0.035        0          point

Wing "Aile_Principale", child of "Fuselage"
  location (X Y Z) 10.6 0 -1.3, rotation 0 0 0
  symmetric about XZ
  bounding box size 9.82413 28.4003 1.7218
  totals: TotalSpan=28.5088 TotalProjectedSpan=28.4003 TotalChord=3.648 TotalArea=104 TotalAR=7.75554
  root: chord 5.7, twist 0, NACA 64-series A=0 IdealCl=0 ThickChord=0.14
  sections:
    n  Span     Root_Chord  Tip_Chord  Area  Sweep  Sweep_Location  Dihedral  Twist  Twist_Location  tip airfoil
    1  14.2544  5.7         1.596      52    30     0               5         3      0.25            NACA 4-series Camber=0 CamberLoc=0.2 ThickChord=0.1

Wing "Attaches_moteurs", child of "Aile_Principale"
  location (X Y Z) 10.7087 5.2 -1.6, rotation 90 0 0; relative location 0.108696 5.2 -0.3, rotation 90 0 0
  symmetric about XZ
  bounding box size 6.90277 10.7502 0.6
  totals: TotalSpan=1.2 TotalProjectedSpan=1.2 TotalChord=3.5 TotalArea=4.2 TotalAR=0.342857
  root: chord 3.5, twist 0, NACA 4-series Camber=0 CamberLoc=0.2 ThickChord=0.1
  sections:
    n  Span  Root_Chord  Tip_Chord  Area  Sweep  Sweep_Location  Dihedral  Twist  Twist_Location  tip airfoil
    1  0.6   3.5         3.5        2.1   80     0               0         0      0               as above

Custom "Moteurs", child of "Aile_Principale"
  location (X Y Z) 12.7619 5.2 -2.38095, rotation 0 0 0
  symmetric about XZ
  bounding box size 4.2 12.4802 2.10762
  Design: Camber=0 CamberLoc=0.2 Chord=4.2 Height=1.66 InvertFlag=0 Shape=0.1 ThickChord=0.1 Width=1.66
  custom script Duct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

Wing "Empannage_Horizontal", child of "Fuselage"
  location (X Y Z) 28 0 1.1, rotation 0 0 0
  symmetric about XZ
  bounding box size 4.846 9.58684 0.523595
  totals: TotalSpan=9.6 TotalProjectedSpan=9.58684 TotalChord=2.3925 TotalArea=22.968 TotalAR=4.00155
  root: chord 3.3, twist 0, NACA 4-series Camber=0 CamberLoc=0.2 ThickChord=0.12
  sections:
    n  Span  Root_Chord  Tip_Chord  Area    Sweep  Sweep_Location  Dihedral  Twist  Twist_Location  tip airfoil
    1  4.8   3.3         1.485      11.484  35     0               3         0      0.25            NACA 4-series Camber=0 CamberLoc=0.2 ThickChord=0.1

Wing "Empennage_Vertical", child of "Fuselage"
  location (X Y Z) 26.3 0 1.52174, rotation 90 0 0
  bounding box size 6.04116 0.626656 5.6
  totals: TotalSpan=5.6 TotalProjectedSpan=5.6 TotalChord=3.71 TotalArea=20.776 TotalAR=1.50943
  root: chord 5.3, twist 0, NACA 4-series Camber=0 CamberLoc=0.2 ThickChord=0.118182
  sections:
    n  Span  Root_Chord  Tip_Chord  Area    Sweep  Sweep_Location  Dihedral  Twist  Twist_Location  tip airfoil
    1  5.6   5.3         2.12       20.776  35     0               0         0      0.25            NACA 4-series Camber=0 CamberLoc=0.2 ThickChord=0.1
