OpenVSP model (file version 4), 8 components.
Geometry view with OpenVSP parameter names; values to 6 digits, angles in degrees, lengths in the model's unit.
Overall bounding box: X_Min=-0.47829 X_Len=33.9383 Y_Min=-15.5967 Y_Len=31.1935 Z_Min=-3.07383 Z_Len=10.1377

Fuselage "Fuselage"
  location (X Y Z) 0 0 0, rotation 0 0 0
  bounding box size 33.9383 5.33333 4.18829
  Design: Length=33.46
  cross sections:
    n  XLocPercent  YLocPercent  ZLocPercent  shape
    0  0            0            -0.0268798   point
    1  0.0366848    0            -0.0215041   ellipse Ellipse_Height=2.04545 Ellipse_Width=1.95455
    2  0.25         0            0            ellipse Ellipse_Height=4 Ellipse_Width=4
    3  0.450551     0            0            general fuselage BotStr=2 BotTanAngle=86.3182 CornerRad=0 Height=4 LowStr=1.10632 MaxWidthLoc=0 TopStr=0.83 TopTanAngle=80.5909 UpStr=0.83 Width=4
    4  0.575283     0            0            as above
    5  0.700016     0            0            ellipse Ellipse_Height=4 Ellipse_Width=4
    6  0.913516     0            0.0269967    ellipse Ellipse_Height=1.64132 Ellipse_Width=1.78182
    7  1            0            0.0326087    ellipse Ellipse_Height=0.545455 Ellipse_Width=0.5

Wing "Empennage_Horizontal"
  location (X Y Z) 28 0 0.714286, rotation 0 0 0
  symmetric about XZ
  bounding box size 4.38754 11.3859 0.744535
  totals: TotalSpan=11.4137 TotalProjectedSpan=11.3859 TotalChord=2.2324 TotalArea=25.48
  root: chord 2.97654, twist 3, NACA 4-series Camber=0 CamberLoc=0.2 ThickChord=0.14
  sections:
    n  Span     Root_Chord  Tip_Chord  Area   Sweep  Sweep_Location  Dihedral  Twist  Twist_Location  tip airfoil
    1  5.70686  2.97654     1.48827    12.74  26.92  0               4         3      0.25            NACA 4-series Camber=0 CamberLoc=0.2 ThickChord=0.1

Wing "Aile", child of "Empennage_Horizontal"
  location (X Y Z) 10 0.025 -1.07619, rotation 4 0 0
  symmetric about XZ
  bounding box size 9.62273 31.1751 2.50428
  totals: TotalSpan=31.3525 TotalProjectedSpan=31.3334 TotalChord=4.05726 TotalArea=116.99 RelativeDihedralFlag=1
  root: chord 6.79721, twist 3, NACA 4-series Camber=0 CamberLoc=0.2 ThickChord=0.1
  sections:
    n  Span     Root_Chord  Tip_Chord  Area     Sweep  Sweep_Location  Dihedral  Twist  Twist_Location  tip airfoil
    1  5.85     6.79721     3.88643    31.2496  26.92  0               2         1.5    0.25            as above
    2  9.82625  3.88643     1.65896    27.2452  26.92  0               2         1.5    0.25            as above

Wing "Pylon", child of "Aile"
  location (X Y Z) 11.0275 5.5166 -0.435159, rotation -94.3333 0 0; relative location -2.14286 -0.714286 0, rotation -98.3333 0 0
  symmetric about XZ
  bounding box size 5.05738 11.5686 0.64819
  totals: TotalSpan=1.235 TotalProjectedSpan=1.235 TotalChord=3.7 TotalArea=4.5695
  root: chord 4.625, twist 0, NACA 4-series Camber=0 CamberLoc=0.2 ThickChord=0.1
  sections:
    n  Span    Root_Chord  Tip_Chord  Area     Sweep  Sweep_Location  Dihedral  Twist  Twist_Location  tip airfoil
    1  0.6175  4.625       2.775      2.28475  -35    0               0         0      0.25            as above

Wing "Winglet", child of "Aile"
  location (X Y Z) 18 15.5 0.85, rotation 90 0 0
  symmetric about XZ
  bounding box size 1.66667 31.1935 1.7
  totals: TotalSpan=3.4 TotalProjectedSpan=3.4 TotalChord=1.04167 TotalArea=3.54167
  root: chord 1.66667, twist 0, NACA 4-series Camber=0 CamberLoc=0.2 ThickChord=0.1
  sections:
    n  Span  Root_Chord  Tip_Chord  Area     Sweep  Sweep_Location  Dihedral  Twist  Twist_Location  tip airfoil
    1  1.7   1.66667     0.416667   1.77083  35     0               0         0      0.25            as above

Wing "Empennage_Vertical"
  location (X Y Z) 26.5543 0 1.66667, rotation 90 0 0
  symmetric about XZ
  bounding box size 6.18285 0.82973 5.39722
  totals: TotalSpan=10.7944 TotalProjectedSpan=10.7944 TotalChord=3.59815 TotalArea=38.84
  root: chord 4.79753, twist 3, NACA 4-series Camber=0 CamberLoc=0.2 ThickChord=0.14
  sections:
    n  Span     Root_Chord  Tip_Chord  Area   Sweep  Sweep_Location  Dihedral  Twist  Twist_Location  tip airfoil
    1  5.39722  4.79753     2.39877    19.42  35     0               0         0      0.25            NACA 4-series Camber=0 CamberLoc=0.2 ThickChord=0.1

Stack "Moteur_1"
  location (X Y Z) 10.2174 5.62478 -2.06522, rotation 0 0 0
  bounding box size 4.01639 1.98 2.01723
  cross sections:
    n  XDelta    YDelta  ZDelta  shape
    0  0         0       0       point
    1  0.163934  0       0       ellipse Ellipse_Height=1.99432 Ellipse_Width=1.92033
    2  1.22951   0       0       ellipse Ellipse_Height=2.01723 Ellipse_Width=1.98
    3  1.42623   0       0       ellipse Ellipse_Height=1.52655 Ellipse_Width=1.52
    4  0.196721  0       0       ellipse Ellipse_Height=1.10026 Ellipse_Width=1.1
    5  1         0       0       ellipse Ellipse_Height=0.872314 Ellipse_Width=0.87
    6  0         0       0       point

Stack "Moteur_2"
  location (X Y Z) 10.1087 -5.73348 -1.95652, rotation 0 0 0
  bounding box size 4.01639 1.98 2.01723
  cross sections:
    n  XDelta    YDelta  ZDelta  shape
    0  0         0       0       point
    1  0.163934  0       0       ellipse Ellipse_Height=1.99432 Ellipse_Width=1.92033
    2  1.22951   0       0       ellipse Ellipse_Height=2.01723 Ellipse_Width=1.98
    3  1.42623   0       0       ellipse Ellipse_Height=1.52655 Ellipse_Width=1.52
    4  0.196721  0       0       ellipse Ellipse_Height=1.10026 Ellipse_Width=1.1
    5  1         0       0       ellipse Ellipse_Height=0.872314 Ellipse_Width=0.87
    6  0         0       0       point
