OpenVSP model (file version 4), 9 components.
Geometry view with OpenVSP parameter names; values to 6 digits, angles in degrees, lengths in the model's unit.
Overall bounding box: X_Min=-5.7 X_Len=36.2176 Y_Min=-17.5093 Y_Len=35.0187 Z_Min=-2.34404 Z_Len=10.0845

TransportFuse "Fuselage"
  location (X Y Z) -5.7 0 0, rotation 0 0 0
  bounding box size 35 3.34 3.45133
  Design: AftCenter=0.3 AftHeight=0.3 AftMult=3 AftWidth=0.1 Diameter=3.34 Length=35 NoseCenter=-0.2 NoseMult=1.4
  custom script TransportFuse0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

Wing "HTail"
  location (X Y Z) 25.1333 0 0.95119, rotation 0 0 0
  symmetric about XZ
  bounding box size 4.69684 10.58 0.423768
  totals: TotalSpan=10.58 TotalProjectedSpan=10.58 TotalChord=2.6465 TotalArea=28
  root: chord 3.65035, twist 0, NACA 4-series Camber=0 CamberLoc=0.2 ThickChord=0.1
  sections:
    n  Span  Root_Chord  Tip_Chord  Area  Sweep  Sweep_Location  Dihedral  Twist  Twist_Location  tip airfoil
    1  5.29  3.65035     1.64266    14    30     0               0         0      0.25            as above

Wing "VTail"
  location (X Y Z) 23.8571 0 1.49048, rotation 90 0 0
  bounding box size 6.66044 0.589255 6.25
  totals: TotalSpan=6.25 TotalProjectedSpan=6.25 TotalChord=3.68 TotalArea=23
  root: chord 5.07586, twist 0, NACA 4-series Camber=0 CamberLoc=0.2 ThickChord=0.1
  sections:
    n  Span   Root_Chord  Tip_Chord  Area     Sweep  Sweep_Location  Dihedral  Twist  Twist_Location  tip airfoil
    1  3.125  5.07586     3.68       13.681   35     0               0         0      0.25            as above
    2  3.125  3.68        2.28414    9.31897  35     0               0         0      0.25            as above

Fuselage "GearPod"
  location (X Y Z) 6 0 -1.37957, rotation 0 0 0
  bounding box size 8.75 1.65 1.50744
  Design: Length=8.75
  cross sections:
    n  XLocPercent  YLocPercent  ZLocPercent  shape
    0  0            0            0            point
    1  0.175        0            0            rounded rectangle RoundRectXSec_Radius=0.125 RoundedRect_Height=0.75 RoundedRect_Width=1.65
    2  0.825        0            0            as above
    3  1            0            0            point

Wing "Wing", child of "GearPod"
  location (X Y Z) 6.7 0.025 -1.50338, rotation 4 0 0; relative location 0.7 0.025 -0.12381, rotation 4 0 0
  symmetric about XZ
  bounding box size 9.1016 34.77 2.96672
  totals: TotalSpan=35.0711 TotalProjectedSpan=35.0378 TotalChord=4.03504 TotalArea=121.6 RelativeDihedralFlag=1
  root: chord 6.5991, twist 0, NACA 4-series Camber=0 CamberLoc=0.2 ThickChord=0.1
  sections:
    n  Span     Root_Chord  Tip_Chord  Area     Sweep  Sweep_Location  Dihedral  Twist  Twist_Location  tip airfoil
    1  5.13981  6.5991      4.21545    27.7924  24.5   0               2.5       0      0.25            as above
    2  12.3958  4.21545     1.11018    33.0076  24.5   0               2.5       0      0.25            as above

Wing "Pylon", child of "Wing"
  location (X Y Z) 9.16831 5.6208 -0.833991, rotation -86 0 0; relative location -0.1 0 0.01, rotation -90 0 0
  symmetric about XZ
  bounding box size 1.48334 11.381 0.406821
  totals: TotalSpan=0.8 TotalProjectedSpan=0.8 TotalChord=0.962609 TotalArea=0.770087
  root: chord 1.20326, twist 0, NACA 4-series Camber=0 CamberLoc=0.2 ThickChord=0.1
  sections:
    n  Span  Root_Chord  Tip_Chord  Area      Sweep  Sweep_Location  Dihedral  Twist  Twist_Location  tip airfoil
    1  0.4   1.20326     0.721957   0.385043  -35    0               0         0      0.25            as above

Fuselage "Nacelle", child of "Pylon"
  location (X Y Z) 8.28823 5.68358 -1.7318, rotation -86 0 0; relative location -0.6 0.5 0, rotation 0 0 0
  symmetric about XZ
  bounding box size 3.29045 12.5917 1.22449
  Design: Length=3.29045
  cross sections:
    n  XLocPercent  YLocPercent  ZLocPercent  shape
    0  1            0            0            circle Circle_Diameter=1
    1  0.5          0            0            circle Circle_Diameter=0.94
    2  0            0            0            circle Circle_Diameter=0.905062
    3  0.3          0            0            circle Circle_Diameter=1.18183
    4  1            0            0            circle Circle_Diameter=1

Fuselage "PowerFace", child of "Nacelle"
  location (X Y Z) 8.78823 5.68358 -1.7318, rotation -86 0 0; relative location 0.5 0 0, rotation 0 0 0
  symmetric about XZ
  bounding box size 2.7 12.5069 1.1397
  Design: Length=2.7
  cross sections:
    n  XLocPercent  YLocPercent  ZLocPercent  shape
    0  0            0            0            point
    1  0            0            0            circle Circle_Diameter=1.1
    2  1            0            0            circle Circle_Diameter=1
    3  1            0            0            point

Wing "WingGeom", child of "Wing"
  location (X Y Z) 14.7 17.325 1.02662, rotation 80 0 0; relative location 8 17.3 2.53, rotation 80 0 0
  symmetric about XZ
  bounding box size 1.1 35.0187 0.99778
  totals: TotalSpan=2 TotalProjectedSpan=2 TotalChord=0.6435 TotalArea=1.287
  root: chord 1.1, twist 0, NACA 4-series Camber=0 CamberLoc=0.2 ThickChord=0.1
  sections:
    n  Span  Root_Chord  Tip_Chord  Area    Sweep  Sweep_Location  Dihedral  Twist  Twist_Location  tip airfoil
    1  1     1.1         0.187      0.6435  30     0               0         0      0.25            as above
