OpenVSP model (file version 4), 11 components.
Geometry view with OpenVSP parameter names; values to 6 digits, angles in degrees, lengths in the model's unit.
Overall bounding box: X_Min=-5.7 X_Len=35.728 Y_Min=-17.4447 Y_Len=34.8895 Z_Min=-2.32786 Z_Len=9.8559

Custom "Fuselage"
  location (X Y Z) -5.7 0 0, rotation 0 0 0
  bounding box size 35.4 3.37 3.37
  Design: AftCenter=0.333333 AftHeight=0.307 AftMult=2.1625 AftWidth=0.31525 Diameter=3.37 Length=35.4 NoseCenter=-0.075 NoseMult=1.255
  custom script TransportFuse0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

Wing "Empennage_vertical", child of "Fuselage"
  location (X Y Z) 23.8601 0 1.36957, rotation 90 0 0
  bounding box size 6.16796 0.464084 6.15848
  totals: TotalSpan=6.15848 TotalProjectedSpan=6.15848 TotalChord=3.24755 TotalArea=20
  root: chord 4.63936, twist 0, NACA 4-series Camber=0 CamberLoc=0.2 ThickChord=0.1
  sections:
    n  Span     Root_Chord  Tip_Chord  Area  Sweep  Sweep_Location  Dihedral  Twist  Twist_Location  tip airfoil
    1  6.15848  4.63936     1.85575    20    35     0               0         0      0.25            as above

Wing "Empennage_horizontal", child of "Fuselage"
  location (X Y Z) 25.2446 0.652174 0.869565, rotation 7 0 0
  symmetric about XZ
  bounding box size 4.48462 14.0549 0.974245
  totals: TotalSpan=12.8367 TotalProjectedSpan=12.8367 TotalChord=1.94754 TotalArea=25
  root: chord 3.11606, twist -0.721649, NACA 4-series Camber=0 CamberLoc=0.2 ThickChord=0.1
  sections:
    n  Span     Root_Chord  Tip_Chord  Area  Sweep  Sweep_Location  Dihedral  Twist  Twist_Location  tip airfoil
    1  6.41836  3.11606     0.779015   12.5  30     0               0         0      0.25            as above

Wing "Ailes", child of "Fuselage"
  location (X Y Z) 5.91304 1.65543 -0.12381, rotation 6 0 0; relative location 11.613 1.65543 -0.12381, rotation 6 0 0
  symmetric about XZ
  bounding box size 8.88201 34.7782 2.04189
  totals: TotalSpan=31.49 TotalProjectedSpan=31.49 TotalChord=4.12043 TotalArea=113.524 RelativeDihedralFlag=1
  root: chord 6.35, twist 0, NACA 4-series Camber=0 CamberLoc=0.2 ThickChord=0.1
  sections:
    n  Span     Root_Chord  Tip_Chord  Area     Sweep  Sweep_Location  Dihedral  Twist  Twist_Location  tip airfoil
    1  4.49857  6.35        4.29586    23.9456  25     0               0         0      0.25            as above
    2  11.2464  4.29586     1.54       32.8163  25     0               0         0      0.25            as above

Wing "Winglets_up", child of "Ailes"
  location (X Y Z) 13.8043 17.2909 1.52174, rotation 82.337 0 0
  symmetric about XZ
  bounding box size 1.27618 34.8808 1.02858
  totals: TotalSpan=2.05909 TotalProjectedSpan=2.05909 TotalChord=0.61659 TotalArea=1.26962
  root: chord 0.986544, twist 0, NACA 4-series Camber=0 CamberLoc=0.2 ThickChord=0.1
  sections:
    n  Span     Root_Chord  Tip_Chord  Area      Sweep  Sweep_Location  Dihedral  Twist  Twist_Location  tip airfoil
    1  1.02955  0.986544    0.246636   0.634808  45     0               0         0      0.25            as above

Wing "Attaches", child of "Ailes"
  location (X Y Z) 7.68575 3.77647 -0.000119933, rotation -84 0 0; relative location -0.534783 -2.82609 -0.0986957, rotation -90 0 0
  symmetric about XZ
  bounding box size 1.48334 7.70843 0.407881
  totals: TotalSpan=0.8 TotalProjectedSpan=0.8 TotalChord=0.962609 TotalArea=0.770087
  root: chord 1.20326, twist 0, NACA 4-series Camber=0 CamberLoc=0.2 ThickChord=0.1
  sections:
    n  Span  Root_Chord  Tip_Chord  Area      Sweep  Sweep_Location  Dihedral  Twist  Twist_Location  tip airfoil
    1  0.4   1.20326     0.721957   0.385043  -35    0               0         0      0.25            as above

Fuselage "Moteur 1", child of "Attaches"
  location (X Y Z) 9.08828 3.78516 -1.12275, rotation 96 0 -180; relative location 1.68261 0.717391 -0.108696, rotation 0 180 0
  bounding box size 3.45654 2.41079 2.41038
  Design: Length=3.13058
  cross sections:
    n  XLocPercent  YLocPercent  ZLocPercent  shape
    0  1            0            0            airfoil file ""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 Chord=1.82111 ThickChord=1
    1  0            0            0            circle Circle_Diameter=0.94
    2  0.3          0            0            airfoil file ""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 Chord=1.48489 ThickChord=0.5
    3  0.3          0            0            circle Circle_Diameter=1.18183
    4  1            0            0            airfoil file ""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 Chord=1.78364 ThickChord=1

Fuselage "Fond_moteur 1", child of "Moteur 1"
  location (X Y Z) 8.58828 3.78516 -1.12275, rotation 96 0 -180; relative location 0.5 0 0, rotation 0 0 0
  bounding box size 0.7 1.1257 1.1257
  Design: Length=0.7
  cross sections:
    n  XLocPercent  YLocPercent  ZLocPercent  shape
    0  0            0            0            airfoil file ""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 Chord=0 ThickChord=0
    1  0            0            0            circle Circle_Diameter=1.1
    2  1            0            0            circle Circle_Diameter=1
    3  1            0            0            point

Fuselage "Moteur 2", child of "Attaches"
  location (X Y Z) 9.08828 -3.76072 -1.12081, rotation 86 0 -180; relative location 1.68261 -0.0733043 -7.61304, rotation -10 180 0
  bounding box size 3.45654 2.41028 2.41052
  Design: Length=3.13058
  cross sections:
    n  XLocPercent  YLocPercent  ZLocPercent  shape
    0  1            0            0            airfoil file ""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 Chord=1.82111 ThickChord=1
    1  0            0            0            circle Circle_Diameter=0.94
    2  0.3          0            0            airfoil file ""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 Chord=1.48489 ThickChord=0.5
    3  0.3          0            0            circle Circle_Diameter=1.18183
    4  1            0            0            airfoil file ""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 Chord=1.78364 ThickChord=1

Fuselage "Fond_moteur 2", child of "Moteur 2"
  location (X Y Z) 8.58828 -3.76072 -1.12081, rotation 86 0 -180; relative location 0.5 0 0, rotation 0 0 0
  bounding box size 0.7 1.1185 1.1185
  Design: Length=0.7
  cross sections:
    n  XLocPercent  YLocPercent  ZLocPercent  shape
    0  0            0            0            airfoil file ""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 Chord=0 ThickChord=0
    1  0            0            0            circle Circle_Diameter=1.1
    2  1            0            0            circle Circle_Diameter=1
    3  1            0            0            point

Wing "Winglets_down", child of "Ailes"
  location (X Y Z) 13.804 17.2909 1.52174, rotation -81.7391 0 0; relative location 13.804 17.2909 1.52174, rotation 98.2609 180 180
  symmetric about XZ
  bounding box size 1.23255 34.8895 0.984548
  totals: TotalSpan=1.97182 TotalProjectedSpan=1.97182 TotalChord=0.616593 TotalArea=1.21581
  root: chord 0.98655, twist 0, NACA 4-series Camber=0 CamberLoc=0.2 ThickChord=0.1
  sections:
    n  Span     Root_Chord  Tip_Chord  Area      Sweep  Sweep_Location  Dihedral  Twist  Twist_Location  tip airfoil
    1  0.98591  0.98655     0.246637   0.607905  45     0               0         0      0.25            as above
