OpenVSP model (file version 4), 6 components.
Geometry view with OpenVSP parameter names; values to 6 digits, angles in degrees, lengths in the model's unit.
Overall bounding box: X_Min=0 X_Len=34.236 Y_Min=-15.9252 Y_Len=31.8505 Z_Min=-1.8256 Z_Len=7.9306

Custom "Fuselage"
  location (X Y Z) 0 0 0, rotation 0 0 0
  bounding box size 34.229 3.423 3.5371
  Design: AftCenter=0.3 AftHeight=0.3 AftMult=3 AftWidth=0.1 Diameter=3.423 Length=34.229 NoseCenter=-0.2 NoseMult=1.4
  custom script TransportFuse0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

Wing "HTail"
  location (X Y Z) 29.316 0 0.475, rotation 0 0 0
  symmetric about XZ
  bounding box size 4.65421 10.5346 0.5491
  totals: TotalSpan=10.55 TotalProjectedSpan=10.5346 TotalChord=2.6375 TotalArea=27.8256
  root: chord 3.907, twist 0, NACA 4-series Camber=0 CamberLoc=0.2 ThickChord=0.1
  sections:
    n  Span   Root_Chord  Tip_Chord  Area     Sweep   Sweep_Location  Dihedral  Twist  Twist_Location  tip airfoil
    1  5.275  3.907       1.368      13.9128  31.922  0               3.1       0      0.25            as above

Wing "VTail"
  location (X Y Z) 26.693 0 0.5, rotation 90 0 0
  bounding box size 7.543 0.553777 5.605
  totals: TotalSpan=5.605 TotalProjectedSpan=5.605 TotalChord=3.737 TotalArea=20.9459
  root: chord 5.536, twist 0, NACA 4-series Camber=0 CamberLoc=0.2 ThickChord=0.1
  sections:
    n  Span   Root_Chord  Tip_Chord  Area     Sweep  Sweep_Location  Dihedral  Twist  Twist_Location  tip airfoil
    1  5.605  5.536       1.938      20.9459  45     0               0         0      0.25            as above

Wing "Wing"
  location (X Y Z) 11.41 0.025 -0.12381, rotation 4 0 0
  symmetric about XZ
  bounding box size 9.60276 31.8505 2.91185
  totals: TotalSpan=32.19 TotalProjectedSpan=32.1459 TotalChord=3.7915 TotalArea=107.246 RelativeDihedralFlag=1
  root: chord 5.723, twist 0, NACA 4-series Camber=0 CamberLoc=0.2 ThickChord=0.1
  sections:
    n  Span     Root_Chord  Tip_Chord  Area     Sweep   Sweep_Location  Dihedral  Twist  Twist_Location  tip airfoil
    1  4.59857  5.723       4.006      22.3697  26.922  0               3         3      0.25            as above
    2  11.4964  4.006       1.431      31.253   26.922  0               3         3      0.25            as above

Wing "Pylon", child of "Wing"
  location (X Y Z) 13.8801 4.53512 0.542068, rotation -86 0 0; relative location -0.1 -0.5 0.01, rotation -90 0 0
  symmetric about XZ
  bounding box size 1.48334 9.19813 0.405747
  totals: TotalSpan=0.8 TotalProjectedSpan=0.8 TotalChord=0.962609 TotalArea=0.770087
  root: chord 1.20326, twist 0, NACA 4-series Camber=0 CamberLoc=0.2 ThickChord=0.1
  sections:
    n  Span  Root_Chord  Tip_Chord  Area      Sweep  Sweep_Location  Dihedral  Twist  Twist_Location  tip airfoil
    1  0.4   1.20326     0.721957   0.385043  -35    0               0         0      0.25            as above

Custom "PowerFace", child of "Pylon"
  location (X Y Z) 12.91 4.6 -0.65, rotation 0 0 0
  symmetric about XZ
  bounding box size 5.029 10.9296 1.75312
  Design: Camber=0 CamberLoc=0.2 Chord=5.029 Height=1.478 InvertFlag=0 Shape=0 ThickChord=0.05 Width=1.478
  custom script Duct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
