OpenVSP model (file version 4), 6 components.
Geometry view with OpenVSP parameter names; values to 6 digits, angles in degrees, lengths in the model's unit.
Overall bounding box: X_Min=-5.7 X_Len=38.5331 Y_Min=-17.3457 Y_Len=34.6914 Z_Min=-2.00533 Z_Len=10.861

Custom "Fuselage"
  location (X Y Z) -5.7 0 0, rotation 0 0 0
  bounding box size 38 3.76 3.88533
  Design: AftCenter=0.3 AftHeight=0.3 AftMult=3 AftWidth=0.1 Diameter=3.76 Length=38 NoseCenter=-0.2 NoseMult=1.4
  custom script TransportFuse0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

Wing "Empennage_Horizontal"
  location (X Y Z) 26.4196 0 1.12717, rotation 0 0 0
  symmetric about XZ
  bounding box size 6.41349 14.3012 0.641674
  totals: TotalSpan=14.32 TotalProjectedSpan=14.3012 TotalChord=2.75 TotalArea=39.38
  root: chord 4.1, twist 0, NACA 4-series Camber=0 CamberLoc=0.2 ThickChord=0.1
  sections:
    n  Span  Root_Chord  Tip_Chord  Area   Sweep  Sweep_Location  Dihedral  Twist  Twist_Location  tip airfoil
    1  7.16  4.1         1.4        19.69  35     0               2.93478   0      0.25            as above

Wing "Empennage_Vertical"
  location (X Y Z) 26 0 1.69565, rotation 90 0 0
  bounding box size 6.41349 0.560179 7.16
  totals: TotalSpan=7.16 TotalProjectedSpan=7.16 TotalChord=3.5 TotalArea=25.06
  root: chord 5.6, twist 0, NACA 4-series Camber=0 CamberLoc=0.2 ThickChord=0.1
  sections:
    n  Span  Root_Chord  Tip_Chord  Area   Sweep  Sweep_Location  Dihedral  Twist  Twist_Location  tip airfoil
    1  7.16  5.6         1.4        25.06  35     0               0         0      0.25            as above

Wing "Aile"
  location (X Y Z) 8.8 0.025 -0.775984, rotation 4 0 0
  symmetric about XZ
  bounding box size 10.9807 34.6914 2.99069
  totals: TotalSpan=36.32 TotalProjectedSpan=34.8671 TotalChord=2.43832 TotalArea=117.05 RelativeDihedralFlag=1
  root: chord 7.13316, twist 4, NACA 4-series Camber=0 CamberLoc=0.2 ThickChord=0.1
  sections:
    n  Span  Root_Chord  Tip_Chord  Area     Sweep  Sweep_Location  Dihedral  Twist  Twist_Location  tip airfoil
    1  5.6   7.13316     3.9        30.8929  30     0               0         0      0.25            as above
    2  6.28  3.9         2.2        19.154   30     0               0         0      0.25            as above
    3  3.14  2.2         1.35       5.5735   30     0               0         0      0.25            as above
    4  1.57  1.35        0.925      1.78588  30     0               0         0      0.25            as above
    5  1.57  0.925       0.5        1.11862  30     0               57.5      0      0.25            as above

Duct "Moteur_1"
  location (X Y Z) 11.2 4.04762 -1.1, rotation 0 0 0
  bounding box size 4 1.50013 1.52056
  Design: Camber=0 CamberLoc=0.2 Chord=4 Height=1.1 InvertFlag=0 Shape=0 ThickChord=0.1 Width=1.1
  custom script Duct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

Custom "Moteur_2"
  location (X Y Z) 11.2 -4.048 -1.1, rotation 0 0 0
  bounding box size 4 1.50013 1.52056
  Design: Camber=0 CamberLoc=0.2 Chord=4 Height=1.1 InvertFlag=0 Shape=0 ThickChord=0.1 Width=1.1
  custom script Duct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
