OpenVSP model (file version 4), 8 components.
Geometry view with OpenVSP parameter names; values to 6 digits, angles in degrees, lengths in the model's unit.
Overall bounding box: X_Min=0 X_Len=37.5 Y_Min=-16.1153 Y_Len=32.2306 Z_Min=-3.2594 Z_Len=10.3811

TransportFuse "Fuselage"
  location (X Y Z) 0 0 0, rotation 0 0 0
  bounding box size 37.5 3.5 3.5
  Design: AftCenter=0.25 AftHeight=0.29875 AftMult=3 AftWidth=0.1 Diameter=3.5 Length=37.5 NoseCenter=-0.1 NoseMult=1.5
  custom script TransportFuse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

Wing "Aile", child of "Fuselage"
  location (X Y Z) 11.9565 0 -1.08696, rotation 0 0 0
  symmetric about XZ
  bounding box size 9.86516 32.2306 1.48144
  totals: TotalSpan=32.2749 TotalProjectedSpan=32.2306 TotalChord=4.2 TotalArea=135.554
  root: chord 6.72, twist 1, NACA 4-series Camber=0 CamberLoc=0.2 ThickChord=0.15
  sections:
    n  Span     Root_Chord  Tip_Chord  Area     Sweep  Sweep_Location  Dihedral  Twist  Twist_Location  tip airfoil
    1  16.1374  6.72        1.68       67.7772  26.9   0               3         3      0.25            as above

Wing "Empennage_Horizontal", child of "Fuselage"
  location (X Y Z) 31.5761 0 0.66, rotation 0 0 0
  symmetric about XZ
  bounding box size 4.80802 10.8585 0.894219
  totals: TotalSpan=10.9 TotalProjectedSpan=10.8585 TotalChord=3.07073 TotalArea=33.4709
  root: chord 4.48, twist 0, NACA 4-series Camber=0 CamberLoc=0.2 ThickChord=0.15
  sections:
    n  Span  Root_Chord  Tip_Chord  Area     Sweep  Sweep_Location  Dihedral  Twist  Twist_Location  tip airfoil
    1  5.45  4.48        1.66146    16.7355  30     0               5         0      0.25            NACA 4-series Camber=0 CamberLoc=0.2 ThickChord=0.1

Wing "Empennage_Vertical", child of "Fuselage"
  location (X Y Z) 29.837 0 1.52174, rotation 90 0 0
  bounding box size 6.69896 0.50016 5.6
  totals: TotalSpan=5.6 TotalProjectedSpan=5.6 TotalChord=3.5 TotalArea=19.6
  root: chord 5, twist 0, NACA 4-series Camber=0 CamberLoc=0.2 ThickChord=0.1
  sections:
    n  Span  Root_Chord  Tip_Chord  Area  Sweep  Sweep_Location  Dihedral  Twist  Twist_Location  tip airfoil
    1  5.6   5           2          19.6  40     0               0         0      0.25            as above

Stack "Moteur_1"
  location (X Y Z) 12 5.6 -2.21622, rotation 0 0 0
  bounding box size 5.16736 2.08636 2.08636
  cross sections:
    n   XDelta     YDelta  YRotate  ZDelta  shape
    0   0          0       0        0       point
    1   0.288934   0       0        0       circle Circle_Diameter=0.703357
    2   -0.110656  0       0        0       circle Circle_Diameter=1.60227
    3   -0.663934  0       0        0       as above
    4   0.75       0       0        0       circle Circle_Diameter=2.08636
    5   1.5        0       0        0       file fuselage section Height=1.897 Width=1.897
    6   0.688525   0       2.5      0       circle Circle_Diameter=1.69517
    7   0          0       0        0       circle Circle_Diameter=1.42107
    8   1.02664    0       0        0       circle Circle_Diameter=1.04491
    9   1.05738    0       0        0       circle Circle_Diameter=0.66874
    10  0          0       0        0       circle Circle_Diameter=0.579545

Stack "StackGeom", child of "Moteur_1"
  location (X Y Z) 12.5543 5.6 -1.2, rotation 0 0 0
  bounding box size 6.03443 0.303831 1.02637
  cross sections:
    n  XDelta    YDelta  ZDelta      shape
    0  0         0       0           general fuselage BotStr=0.806864 BotTanAngle=90 CornerRad=0 Height=0 LowStr=0.815182 MaxWidthLoc=0 TopStr=0.83 TopTanAngle=90 UpStr=0.83 Width=0.09
    1  0.6       0       0.0245902   rounded rectangle RoundRectXSec_Radius=0.072017 RoundedRect_Height=0.144034 RoundedRect_Width=0.18
    2  0.904918  0       0.0368852   general fuselage BotStr=0.83 BotTanAngle=90 CornerRad=0 Height=0.409091 LowStr=0.83 MaxWidthLoc=0 TopStr=0.83 TopTanAngle=90 UpStr=0.83 Width=0.18
    3  0.6       0       -0.0491803  general fuselage BotStr=0.83 BotTanAngle=90 CornerRad=0 Height=0.759298 LowStr=0.83 MaxWidthLoc=0 TopStr=0.83 TopTanAngle=90 UpStr=0.83 Width=0.18
    4  0.6       0       -0.0860656  general fuselage BotStr=0.83 BotTanAngle=90 CornerRad=0 Height=0.789669 LowStr=0.83 MaxWidthLoc=0 TopStr=0.83 TopTanAngle=90 UpStr=0.83 Width=0.18
    5  0.6       0       -0.0737705  general fuselage BotStr=0.83 BotTanAngle=90 CornerRad=0 Height=0.9 LowStr=0.83 MaxWidthLoc=0 TopStr=0.83 TopTanAngle=90 UpStr=0.83 Width=0.18
    6  0.6       0       -0.0368852  as above
    7  1.82951   0       0.282787    general fuselage BotStr=0.83 BotTanAngle=90 CornerRad=0 Height=0.273347 LowStr=0.83 MaxWidthLoc=0 TopStr=0.83 TopTanAngle=90 UpStr=0.83 Width=0.18
    8  0.3       0       0           point

Stack "Moteur_2"
  location (X Y Z) 12 -5.6 -2.21622, rotation 0 0 0
  bounding box size 5.16736 2.08636 2.08636
  cross sections:
    n   XDelta     YDelta  YRotate  ZDelta  shape
    0   0          0       0        0       point
    1   0.288934   0       0        0       circle Circle_Diameter=0.703357
    2   -0.110656  0       0        0       circle Circle_Diameter=1.60227
    3   -0.663934  0       0        0       as above
    4   0.75       0       0        0       circle Circle_Diameter=2.08636
    5   1.5        0       0        0       file fuselage section Height=1.897 Width=1.897
    6   0.688525   0       2.5      0       circle Circle_Diameter=1.69517
    7   0          0       0        0       circle Circle_Diameter=1.42107
    8   1.02664    0       0        0       circle Circle_Diameter=1.04491
    9   1.05738    0       0        0       circle Circle_Diameter=0.66874
    10  0          0       0        0       circle Circle_Diameter=0.579545

Stack "StackGeom", child of "Moteur_2"
  location (X Y Z) 12.554 -5.6 -1.2, rotation 0 0 0
  bounding box size 6.03443 0.303831 1.02637
  cross sections:
    n  XDelta    YDelta  ZDelta      shape
    0  0         0       0           general fuselage BotStr=0.806864 BotTanAngle=90 CornerRad=0 Height=0 LowStr=0.815182 MaxWidthLoc=0 TopStr=0.83 TopTanAngle=90 UpStr=0.83 Width=0.09
    1  0.6       0       0.0245902   rounded rectangle RoundRectXSec_Radius=0.072017 RoundedRect_Height=0.144034 RoundedRect_Width=0.18
    2  0.904918  0       0.0368852   general fuselage BotStr=0.83 BotTanAngle=90 CornerRad=0 Height=0.409091 LowStr=0.83 MaxWidthLoc=0 TopStr=0.83 TopTanAngle=90 UpStr=0.83 Width=0.18
    3  0.6       0       -0.0491803  general fuselage BotStr=0.83 BotTanAngle=90 CornerRad=0 Height=0.759298 LowStr=0.83 MaxWidthLoc=0 TopStr=0.83 TopTanAngle=90 UpStr=0.83 Width=0.18
    4  0.6       0       -0.0860656  general fuselage BotStr=0.83 BotTanAngle=90 CornerRad=0 Height=0.789669 LowStr=0.83 MaxWidthLoc=0 TopStr=0.83 TopTanAngle=90 UpStr=0.83 Width=0.18
    5  0.6       0       -0.0737705  general fuselage BotStr=0.83 BotTanAngle=90 CornerRad=0 Height=0.9 LowStr=0.83 MaxWidthLoc=0 TopStr=0.83 TopTanAngle=90 UpStr=0.83 Width=0.18
    6  0.6       0       -0.0368852  as above
    7  1.82951   0       0.282787    general fuselage BotStr=0.83 BotTanAngle=90 CornerRad=0 Height=0.273347 LowStr=0.83 MaxWidthLoc=0 TopStr=0.83 TopTanAngle=90 UpStr=0.83 Width=0.18
    8  0.3       0       0           point
