OpenVSP model (file version 4), 8 components.
Geometry view with OpenVSP parameter names; values to 6 digits, angles in degrees, lengths in the model's unit.
Overall bounding box: X_Min=-0.109925 X_Len=37.2599 Y_Min=-16.9565 Y_Len=33.913 Z_Min=-3.63191 Z_Len=7.06631

Fuselage "Fuselage"
  location (X Y Z) 0 0 0, rotation 0 0 0
  bounding box size 35.9299 3.58 3.61536
  Design: Length=35.82
  cross sections:
    n  XLocPercent  YLocPercent  ZLocPercent  shape
    0  0            0            -0.0139587   point
    1  0.04         0            -0.0122836   general fuselage BotStr=0.83 BotTanAngle=90 CornerRad=0 Height=2 LowStr=0.83 MaxWidthLoc=0 TopStr=0.83 TopTanAngle=90 UpStr=0.83 Width=2.36
    2  0.065        0            -0.00558347  general fuselage BotStr=0.83 BotTanAngle=90 CornerRad=0 Height=2.9 LowStr=0.83 MaxWidthLoc=0 TopStr=0.83 TopTanAngle=90 UpStr=0.83 Width=2.9
    3  0.18462      0            0            general fuselage BotStr=0.83 BotTanAngle=90 CornerRad=0 Height=3.58 LowStr=0.83 MaxWidthLoc=0 TopStr=0.83 TopTanAngle=90 UpStr=0.83 Width=3.58
    4  0.375        0            0            as above
    5  0.615394     0            0            as above
    6  0.777114     0            0            general fuselage BotStr=0.83 BotTanAngle=90 CornerRad=0 Height=3.33327 LowStr=0.83 MaxWidthLoc=0 TopStr=0.83 TopTanAngle=90 UpStr=0.83 Width=3.395
    7  0.874028     0            0.00697934   general fuselage BotStr=0.83 BotTanAngle=90 CornerRad=0 Height=2.65427 LowStr=0.83 MaxWidthLoc=0 TopStr=0.83 TopTanAngle=90 UpStr=0.83 Width=2.77773
    8  0.924622     0            0.017773     general fuselage BotStr=0.83 BotTanAngle=90 CornerRad=0 Height=1.87962 LowStr=0.83 MaxWidthLoc=0 TopStr=0.83 TopTanAngle=90 UpStr=0.83 Width=1.89814
    9  1            0            0.0335008    point

Wing "Aile", child of "Fuselage"
  location (X Y Z) 11.93 0 -0.8, rotation 0 0 0
  symmetric about XZ
  bounding box size 9.61428 33.8593 1.4464
  totals: TotalSpan=33.93 TotalProjectedSpan=33.8593 TotalChord=3.515 TotalArea=119.264
  root: chord 6.03, twist 0, NACA 4-series Camber=0 CamberLoc=0.2 ThickChord=0.1
  sections:
    n  Span    Root_Chord  Tip_Chord  Area    Sweep  Sweep_Location  Dihedral  Twist  Twist_Location  tip airfoil
    1  16.965  6.03        1          59.632  26.92  0               3.7       0      0.25            as above

Fuselage "Moteur_1", child of "Aile"
  location (X Y Z) 11.7391 3.80435 -1.99565, rotation 0 0 0
  bounding box size 5.26 3.27182 3.27182
  Design: Length=5.26
  cross sections:
    n  XLocPercent  YLocPercent  ZLocPercent  shape
    0  0            0            0            circle Circle_Diameter=3.1
    1  0.0923913    0            0            as above
    2  0.5          0            0            as above
    3  0.75         0            0            as above
    4  1            0            0            point

Propeller "PropGeom", child of "Moteur_1"
  location (X Y Z) 13 3.804 -1.996, rotation 0 0 0
  symmetric about XZ
  bounding box size 0.143063 10.4127 2.78834
  Design: Diameter=2.8 NumBlade=18 Beta34=20 UseBeta34Flag=1 Feather=0 Rotate=0 ReverseFlag=0 FoldAngle=0 AF=151.538
  cross sections:
    n  RadiusFrac  shape
    0  0.2         circle Circle_Diameter=0.112
    1  0.45        NACA 4-series Camber=0.05 CamberLoc=0.4 Chord=0.252684 ThickChord=0.12
    2  0.7         NACA 4-series Camber=0.05 CamberLoc=0.4 Chord=0.28 ThickChord=0.05
    3  1           NACA 4-series Camber=0.01 CamberLoc=0.4 Chord=0.182 ThickChord=0.03
  Chord along r/R (cubic Bezier): 0.2: 0.08, 0.333333: 0.15, 0.466667: 0.2, 0.6: 0.2, 0.716667: 0.2, 0.833333: 0.2, 0.95: 0.2, 0.966667: 0.2, 0.983333: 0.2, 1: 0.13
  Twist along r/R (PCHIP): 0.2: 46.75, 0.75: 20, 1: 13

Fuselage "Moteur_2", child of "Aile"
  location (X Y Z) 11.7391 -3.804 -1.996, rotation 0 0 0
  bounding box size 5.26 3.27182 3.27182
  Design: Length=5.26
  cross sections:
    n  XLocPercent  YLocPercent  ZLocPercent  shape
    0  0            0            0            circle Circle_Diameter=3.1
    1  0.0923913    0            0            as above
    2  0.5          0            0            as above
    3  0.75         0            0            as above
    4  1            0            0            point

Wing "Winglet", child of "Aile"
  location (X Y Z) 20.5435 16.9565 0.286957, rotation 0 0 0
  symmetric about XZ
  bounding box size 1.28646 33.913 1.06178
  totals: TotalSpan=2 TotalProjectedSpan=1e-06 TotalChord=0.617188 TotalArea=1.23438
  root: chord 0.947917, twist 0, NACA 4-series Camber=0 CamberLoc=0.2 ThickChord=0.1
  sections:
    n  Span  Root_Chord  Tip_Chord  Area      Sweep  Sweep_Location  Dihedral  Twist  Twist_Location  tip airfoil
    1  1     0.947917    0.286458   0.617188  45     0               90        0      0.25            as above

Wing "Empennage_Horizontal", child of "Fuselage"
  location (X Y Z) 32.015 0 1, rotation 0 0 0
  symmetric about XZ
  bounding box size 4.48841 11.1574 0.727667
  totals: TotalSpan=11.2 TotalProjectedSpan=11.1574 TotalChord=2.395 TotalArea=26.824
  root: chord 3.79, twist 0, NACA 4-series Camber=0 CamberLoc=0.2 ThickChord=0.1
  sections:
    n  Span  Root_Chord  Tip_Chord  Area    Sweep  Sweep_Location  Dihedral  Twist  Twist_Location  tip airfoil
    1  5.6   3.79        1          13.412  31.92  0               5         0      0.25            as above

Wing "Empennage_Vertical", child of "Fuselage"
  location (X Y Z) 34.07 0 1.30435, rotation 0 0 0
  bounding box size 3.08 0 2.21713
  totals: TotalSpan=2.08 TotalProjectedSpan=1e-06 TotalChord=1.37 TotalArea=2.8496
  root: chord 1.74, twist 0, NACA 4-series Camber=0 CamberLoc=0.2 ThickChord=0.1
  sections:
    n  Span  Root_Chord  Tip_Chord  Area    Sweep  Sweep_Location  Dihedral  Twist  Twist_Location  tip airfoil
    1  2.08  1.74        1          2.8496  45     0               90        0      0.25            as above
