OpenVSP model (file version 4), 20 components.
Geometry view with OpenVSP parameter names; values to 6 digits, angles in degrees, lengths in the model's unit.
Overall bounding box: X_Min=0 X_Len=40.5199 Y_Min=-18.3543 Y_Len=36.7085 Z_Min=-4 Z_Len=11.97

Custom "Fuselage"
  location (X Y Z) 0 0 0, rotation 0 0 0
  bounding box size 37.23 3.72 3.844
  Design: AftCenter=0.3 AftHeight=0.3 AftMult=3 AftWidth=0.1 Diameter=3.72 Length=37.23 NoseCenter=-0.2 NoseMult=1.5
  custom script TransportFuse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

Wing "Empennage_Horizontal", child of "Fuselage"
  location (X Y Z) 33.2 0 1, rotation 0 0 0
  symmetric about XZ
  bounding box size 5.40366 11.569 0.363916
  totals: TotalSpan=11.58 TotalProjectedSpan=11.569 TotalChord=2.895 TotalArea=33.5241
  root: chord 3.9931, twist 0, NACA 4-series Camber=0 CamberLoc=0.2 ThickChord=0.0384513
  sections:
    n  Span  Root_Chord  Tip_Chord  Area    Sweep  Sweep_Location  Dihedral  Twist  Twist_Location  tip airfoil
    1  5.79  3.9931      1.7969     16.762  31.92  0               2.5       0      0.25            NACA 4-series Camber=0 CamberLoc=0.2 ThickChord=0.03845

Wing "Empennage_Vertical", child of "Fuselage"
  location (X Y Z) 31.85 0 1.67, rotation 90 0 0
  bounding box size 8.66991 0.202583 6.3
  totals: TotalSpan=6.3 TotalProjectedSpan=6.3 TotalChord=3.81818 TotalArea=24.0545
  root: chord 5.26646, twist 0, NACA 4-series Camber=0 CamberLoc=0.2 ThickChord=0.0384513
  sections:
    n  Span  Root_Chord  Tip_Chord  Area     Sweep  Sweep_Location  Dihedral  Twist  Twist_Location  tip airfoil
    1  6.3   5.26646     2.36991    24.0545  45     0               0         0      0.25            NACA 4-series Camber=0 CamberLoc=0.2 ThickChord=0.03845

Wing "Aile", child of "Fuselage"
  location (X Y Z) 12.41 0 -0.8, rotation 0 1 0
  symmetric about XZ
  bounding box size 11.1231 36.7085 3.20732
  totals: TotalSpan=40.3 TotalProjectedSpan=36.7085 TotalChord=2.46029 TotalArea=144.706
  root: chord 6.31076, twist 0, NACA 4-series Camber=0.0413182 CamberLoc=0.409091 ThickChord=0.138451
  sections:
    n  Span   Root_Chord  Tip_Chord  Area     Sweep    Sweep_Location  Dihedral  Twist  Twist_Location  tip airfoil
    1  17.75  6.31076     1.57769    70.01    26.9221  0               2.5       3      0.25            NACA 4-series Camber=0.0396818 CamberLoc=0.372727 ThickChord=0.138451
    2  2.4    1.57769     0.375      2.34323  35       0               75        3      0.25            NACA 4-series Camber=0.0147273 CamberLoc=0.2 ThickChord=0.272727

Wing "Turbofan_pylon 1", child of "Aile"
  location (X Y Z) 12.7 6 -1.6, rotation 90 0 0
  bounding box size 5.94377 0.50016 0.9
  totals: TotalSpan=0.9 TotalProjectedSpan=0.9 TotalChord=4 TotalArea=3.6
  root: chord 5, twist 0, NACA 4-series Camber=0 CamberLoc=0.2 ThickChord=0.1
  sections:
    n  Span  Root_Chord  Tip_Chord  Area  Sweep  Sweep_Location  Dihedral  Twist  Twist_Location  tip airfoil
    1  0.9   5           3          3.6   73     0               0         0      0.25            as above

Custom "Turbofan Moteur 1", child of "Turbofan_pylon 1"
  location (X Y Z) 13.2 6 -2.15, rotation 0 0 0
  bounding box size 4.06 2.62501 2.66078
  Design: Camber=0 CamberLoc=0.2 Chord=4.06 Height=2.3 InvertFlag=0 Shape=0 ThickChord=0.08 Width=2.3
  custom script Duct0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

Fuselage "Spinners", child of "Turbofan Moteur 1"
  location (X Y Z) 12.3304 6 -2.15, rotation 0 0 0
  bounding box size 0.45 0.525 0.525
  Design: Length=0.45
  cross sections:
    n  XLocPercent  YLocPercent  ZLocPercent  shape
    0  0            0            0            point
    1  0.51087      0            0            circle Circle_Diameter=0.525
    2  1            0            0            as above
    3  1            0            0            point

Wing "Fan_blade", child of "Turbofan Moteur 1"
  location (X Y Z) 12.51 6 -2.15, rotation 90 -20 0
  25 copies around X
  bounding box size 0.901653 1.96568 2.01479
  totals: TotalSpan=2 TotalProjectedSpan=2 TotalChord=0.2 TotalArea=0.4
  root: chord 0.1, twist 0, NACA 4-series Camber=0 CamberLoc=0.2 ThickChord=0.1
  sections:
    n  Span  Root_Chord  Tip_Chord  Area  Sweep     Sweep_Location  Dihedral  Twist  Twist_Location  tip airfoil
    1  1     0.1         0.3        0.2   -8.16667  0               0         -40    0.25            NACA 4-series Camber=0 CamberLoc=0.2 ThickChord=0.0416667

Fuselage "FuselageGeom", child of "Turbofan Moteur 1"
  location (X Y Z) 13.5 6 -2.15, rotation 0 0 0
  bounding box size 2.8 1.2 1.2
  Design: Length=2.8
  cross sections:
    n  XLocPercent  YLocPercent  ZLocPercent  shape
    0  0            0            0            circle Circle_Diameter=1
    1  0.538043     0            0            circle Circle_Diameter=1.2
    2  1            0            0            point

Wing "Turbofan_pylon 2", child of "Aile"
  location (X Y Z) 12.7 -6 -1.6, rotation 90 0 0
  bounding box size 5.94377 0.50016 0.9
  totals: TotalSpan=0.9 TotalProjectedSpan=0.9 TotalChord=4 TotalArea=3.6
  root: chord 5, twist 0, NACA 4-series Camber=0 CamberLoc=0.2 ThickChord=0.1
  sections:
    n  Span  Root_Chord  Tip_Chord  Area  Sweep  Sweep_Location  Dihedral  Twist  Twist_Location  tip airfoil
    1  0.9   5           3          3.6   73     0               0         0      0.25            as above

Custom "Turbofan Moteur 2", child of "Turbofan_pylon 2"
  location (X Y Z) 13.2 -6 -2.15, rotation 0 0 0
  bounding box size 4.06 2.62501 2.66078
  Design: Camber=0 CamberLoc=0.2 Chord=4.06 Height=2.3 InvertFlag=0 Shape=0 ThickChord=0.08 Width=2.3
  custom script Duct0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

Fuselage "Spinners", child of "Turbofan Moteur 2"
  location (X Y Z) 12.3304 -6 -2.15, rotation 0 0 0
  bounding box size 0.45 0.525 0.525
  Design: Length=0.45
  cross sections:
    n  XLocPercent  YLocPercent  ZLocPercent  shape
    0  0            0            0            point
    1  0.51087      0            0            circle Circle_Diameter=0.525
    2  1            0            0            as above
    3  1            0            0            point

Wing "Fan_blade", child of "Turbofan Moteur 2"
  location (X Y Z) 12.51 -6 -2.15, rotation 90 -20 0
  25 copies around X
  bounding box size 0.901653 1.96568 2.01479
  totals: TotalSpan=2 TotalProjectedSpan=2 TotalChord=0.2 TotalArea=0.4
  root: chord 0.1, twist 0, NACA 4-series Camber=0 CamberLoc=0.2 ThickChord=0.1
  sections:
    n  Span  Root_Chord  Tip_Chord  Area  Sweep     Sweep_Location  Dihedral  Twist  Twist_Location  tip airfoil
    1  1     0.1         0.3        0.2   -8.16667  0               0         -40    0.25            NACA 4-series Camber=0 CamberLoc=0.2 ThickChord=0.0416667

Fuselage "FuselageGeom", child of "Turbofan Moteur 2"
  location (X Y Z) 13.5 -6 -2.15, rotation 0 0 0
  bounding box size 2.8 1.2 1.2
  Design: Length=2.8
  cross sections:
    n  XLocPercent  YLocPercent  ZLocPercent  shape
    0  0            0            0            circle Circle_Diameter=1
    1  0.538043     0            0            circle Circle_Diameter=1.2
    2  1            0            0            point

Custom "train avant"
  location (X Y Z) 5 0 -1.8, rotation 0 90 0
  symmetric about XZ
  bounding box size 0.8 0.83332 2.1
  Design: PresetTrigger=0 StrutDiameter=0.2 StrutLength=1.8 TireDiameter=0.8 TireSelect=0 TireThickness=0.2 UnitMult=0.0254 Units=3 WheelDiameter=0.7 WhlFlag=0
  custom script StrutGear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

Custom "train principal 1"
  location (X Y Z) 17.7 3.7 -0.7, rotation 0 90 0
  symmetric about XZ
  bounding box size 1.2 1.14998 3.3
  Design: PresetTrigger=0 StrutDiameter=0.2 StrutLength=2.8 TireDiameter=1.2 TireSelect=0 TireThickness=0.3 UnitMult=0.0254 Units=3 WheelDiameter=1 WhlFlag=0
  custom script StrutGear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

Pod "PodGeom", child of "train principal 1"
  location (X Y Z) 17.7 3.7 -2.7, rotation -45 0 -90
  bounding box size 0.128471 2.12132 2.12132
  Design: FineRatio=46.7031 Length=3

Custom "train principal 2"
  location (X Y Z) 17.7 -3.7 -0.7, rotation 0 90 0
  symmetric about XZ
  bounding box size 1.2 1.14998 3.3
  Design: PresetTrigger=0 StrutDiameter=0.2 StrutLength=2.8 TireDiameter=1.2 TireSelect=0 TireThickness=0.3 UnitMult=0.0254 Units=3 WheelDiameter=1 WhlFlag=0
  custom script StrutGear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

Pod "PodGeom", child of "train principal 2"
  location (X Y Z) 17.7 -3.7 -2.7, rotation -135 0 -90
  bounding box size 0.128471 2.12132 2.12132
  Design: FineRatio=46.7031 Length=3

Fuselage "GearPod"
  location (X Y Z) 10.5 0 -1.1, rotation 0 0 0
  bounding box size 11 3.3 2.19732
  Design: Length=11
  cross sections:
    n  XLocPercent  YLocPercent  ZLocPercent  shape
    0  0            0            0            point
    1  0.175        0            0            rounded rectangle RoundRectXSec_Radius=0.125 RoundedRect_Height=1.5 RoundedRect_Width=3.3
    2  0.825        0            0            as above
    3  1            0            0            point
