OpenVSP model (file version 4), 5 components.
Geometry view with OpenVSP parameter names; values to 6 digits, angles in degrees, lengths in the model's unit.
Overall bounding box: X_Min=-6.42857 X_Len=39.7367 Y_Min=-17.6223 Y_Len=35.2445 Z_Min=-3.71923 Z_Len=12.3697

Custom "Fuselage"
  location (X Y Z) -6.42857 0 0, rotation 0 0 0
  bounding box size 38.62 3.8 3.92667
  Design: AftCenter=0.3 AftHeight=0.3 AftMult=3 AftWidth=0.1 Diameter=3.8 Length=38.62 NoseCenter=-0.2 NoseMult=1.5
  custom script TransportFuse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

Wing "Aile", child of "Fuselage"
  location (X Y Z) 10 0 -1, rotation 4 1 0
  symmetric about XZ
  bounding box size 10.8236 35.2445 1.71918
  totals: TotalSpan=35.0286 TotalProjectedSpan=35.0286 TotalChord=4.24817 TotalArea=148.808
  root: chord 6.98, twist 3, NACA 63-series A=0 IdealCl=0 ThickChord=0.14
  sections:
    n  Span     Root_Chord  Tip_Chord  Area     Sweep  Sweep_Location  Dihedral  Twist  Twist_Location  tip airfoil
    1  17.5143  6.98        1.51635    74.4038  28     0               0         0      0.25            NACA 4-series Camber=0 CamberLoc=0.2 ThickChord=0.1

Custom "Moteur_1", child of "Aile"
  location (X Y Z) 15.143 -6.514 -2.3, rotation 0 0 0; relative location 5.143 -6.514 -1.3, rotation 0 0 0
  symmetric about XZ
  bounding box size 5.5 15.8283 2.83846
  Design: Camber=0.15 CamberLoc=0.2 Chord=5.5 Height=1.7 InvertFlag=0 Shape=0 ThickChord=0.2 Width=1.7
  custom script Duct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

Wing "Empennage_Horizontal", child of "Fuselage"
  location (X Y Z) 25.12 0 0.92437, rotation 0 0 0
  symmetric about XZ
  bounding box size 6.12529 12.5944 0.444
  totals: TotalSpan=12.44 TotalProjectedSpan=12.44 TotalChord=3.105 TotalArea=38.6262
  root: chord 4.44, twist 0, biconvex ThickChord=0.1
  sections:
    n  Span  Root_Chord  Tip_Chord  Area     Sweep  Sweep_Location  Dihedral  Twist  Twist_Location  tip airfoil
    1  6.22  4.44        1.77       19.3131  35     0               0         0      0.25            NACA 4-series Camber=0 CamberLoc=0.2 ThickChord=0.1

Wing "Empennage_Vertical", child of "Fuselage"
  location (X Y Z) 25.1471 0 1.59664, rotation 90 0 0
  bounding box size 8.16107 0.498424 7.05385
  totals: TotalSpan=7.05385 TotalProjectedSpan=7.05385 TotalChord=3.61242 TotalArea=25.4815
  root: chord 4.98265, twist 0, NACA 4-series Camber=0 CamberLoc=0.2 ThickChord=0.1
  sections:
    n  Span     Root_Chord  Tip_Chord  Area     Sweep  Sweep_Location  Dihedral  Twist  Twist_Location  tip airfoil
    1  7.05385  4.98265     2.24219    25.4815  40     0               0         0      0.25            as above
