OpenVSP model (file version 4), 9 components.
Geometry view with OpenVSP parameter names; values to 6 digits, angles in degrees, lengths in the model's unit.
Overall bounding box: X_Min=0 X_Len=33.8 Y_Min=-15.9206 Y_Len=31.8411 Z_Min=-2.78072 Z_Len=9.88072

Custom "Fuselage"
  location (X Y Z) 0 0 0, rotation 0 0 0
  bounding box size 33.8 3.76 3.88533
  Design: AftCenter=0.3 AftHeight=0.15 AftMult=2.8 AftWidth=0.1 Diameter=3.76 Length=33.8 NoseCenter=-0.2 NoseMult=1.5
  custom script TransportFuse0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

Wing "Empennage_Horizontal"
  location (X Y Z) 28.3 0 0.7, rotation 3 0 0
  symmetric about XZ
  bounding box size 4.93148 10.9307 0.71828
  totals: TotalSpan=10.9642 TotalProjectedSpan=10.9575 TotalChord=2.40237 TotalArea=26.34
  root: chord 3.43195, twist 0, NACA 4-series Camber=0 CamberLoc=0.2 ThickChord=0.1
  sections:
    n  Span     Root_Chord  Tip_Chord  Area   Sweep  Sweep_Location  Dihedral  Twist  Twist_Location  tip airfoil
    1  5.48209  3.43195     1.37278    13.17  33     0               2         3      0.25            as above

Wing "Empennage_Vertical"
  location (X Y Z) 26.8 0 1.6, rotation 90 0 0
  bounding box size 6.77692 0.499119 5.5
  totals: TotalSpan=5.5 TotalProjectedSpan=5.5 TotalChord=3.49272 TotalArea=19.21
  root: chord 4.9896, twist 0, NACA 4-series Camber=0 CamberLoc=0.2 ThickChord=0.1
  sections:
    n  Span  Root_Chord  Tip_Chord  Area   Sweep  Sweep_Location  Dihedral  Twist  Twist_Location  tip airfoil
    1  5.5   4.9896      1.99584    19.21  41     0               0         0      0.25            as above

Fuselage "GearPod"
  location (X Y Z) 10.3 0 -1, rotation 0 0 0
  bounding box size 5.5 1.65 1.09866
  Design: Length=5.5
  cross sections:
    n  XLocPercent  YLocPercent  ZLocPercent  shape
    0  0            0            0            point
    1  0.175        0            0            rounded rectangle RoundRectXSec_Radius=0.125 RoundedRect_Height=0.75 RoundedRect_Width=1.65
    2  0.825        0            0            as above
    3  1            0            0            point

Wing "Aile", child of "GearPod"
  location (X Y Z) 10.3 0.025 -1.12381, rotation 4 0 0; relative location 0 0.025 -0.12381, rotation 4 0 0
  symmetric about XZ
  bounding box size 9.56952 31.6315 2.19316
  totals: TotalSpan=31.7414 TotalProjectedSpan=31.7353 TotalChord=4.03971 TotalArea=110.904 RelativeDihedralFlag=1
  root: chord 6.86199, twist 0, NACA 4-series Camber=0 CamberLoc=0.2 ThickChord=0.137
  sections:
    n  Span     Root_Chord  Tip_Chord  Area     Sweep  Sweep_Location  Dihedral  Twist  Twist_Location  tip airfoil
    1  4.9916   6.86199     4.15966    27.5078  28.43  0               2         3      0.25            as above
    2  10.8791  4.15966     0.977521   27.944   28.43  0               0         0      0.25            as above

Wing "Attache_1_2", child of "Aile"
  location (X Y Z) 13.2393 5.21636 -0.508573, rotation -86 0 0; relative location 0 -0.2 0.01, rotation -90 0 0
  symmetric about XZ
  bounding box size 2.22502 10.6246 0.60862
  totals: TotalSpan=1.2 TotalProjectedSpan=1.2 TotalChord=1.44391 TotalArea=1.7327
  root: chord 1.80489, twist 0, NACA 4-series Camber=0 CamberLoc=0.2 ThickChord=0.1
  sections:
    n  Span  Root_Chord  Tip_Chord  Area      Sweep  Sweep_Location  Dihedral  Twist  Twist_Location  tip airfoil
    1  0.6   1.80489     1.08294    0.866348  -35    0               0         0      0.25            as above

Fuselage "Moteur_1_2", child of "Attache_1_2"
  location (X Y Z) 10.3192 5.10753 -1.81936, rotation -86 0 0; relative location -2.5 0.7 -0.2, rotation 0 0 0
  symmetric about XZ
  bounding box size 3.68727 12.1378 1.92273
  Design: Length=3.68727
  cross sections:
    n  XLocPercent  YLocPercent  ZLocPercent  shape
    0  1            0            0            circle Circle_Diameter=1.44
    1  0.5          0            0            circle Circle_Diameter=1.504
    2  0            0            0            circle Circle_Diameter=1.4481
    3  0.3          0            0            circle Circle_Diameter=1.89093
    4  1            0            0            circle Circle_Diameter=1.44

Fuselage "Turbine_1_2", child of "Moteur_1_2"
  location (X Y Z) 10.8192 5.10753 -1.81936, rotation -86 0 0; relative location 0.5 0 0, rotation 0 0 0
  symmetric about XZ
  bounding box size 1.12 12.0047 1.78959
  Design: Length=1.12
  cross sections:
    n  XLocPercent  YLocPercent  ZLocPercent  shape
    0  0            0            0            point
    1  0            0            0            circle Circle_Diameter=1.76
    2  1            0            0            circle Circle_Diameter=1.6
    3  1            0            0            point

Wing "Sharklet_1_2", child of "Attache_1_2"
  location (X Y Z) 19.8166 15.8706 0.519135, rotation -86 0 180; relative location 6.8 -0.6 10.7, rotation 0 0 180
  symmetric about XZ
  bounding box size 1.42012 31.8411 0.604124
  totals: TotalSpan=1.2 TotalProjectedSpan=1.2 TotalChord=0.8 TotalArea=0.96
  root: chord 1, twist 0, NACA 4-series Camber=0 CamberLoc=0.2 ThickChord=0.1
  sections:
    n  Span  Root_Chord  Tip_Chord  Area  Sweep  Sweep_Location  Dihedral  Twist  Twist_Location  tip airfoil
    1  0.6   1           0.6        0.48  -35    0               0         0      0.25            as above
