OpenVSP model (file version 4), 13 components.
Geometry view with OpenVSP parameter names; values to 6 digits, angles in degrees, lengths in the model's unit.
Overall bounding box: X_Min=-5.7 X_Len=33.174 Y_Min=-15.7673 Y_Len=31.5347 Z_Min=-2.63583 Z_Len=8.00583

Custom "Fuselage"
  location (X Y Z) -5.7 0 0, rotation 0 0 0
  bounding box size 33 3.68 3.80267
  Design: AftCenter=0.3 AftHeight=0.3 AftMult=3 AftWidth=0.1 Diameter=3.68 Length=33 NoseCenter=-0.2 NoseMult=1.4
  custom script TransportFuse0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

Wing "Empennage_Horizontal"
  location (X Y Z) 23.1587 0 0.475, rotation 0 0 0
  symmetric about XZ
  bounding box size 3.93317 8.48 0.214371
  totals: TotalSpan=8.48 TotalProjectedSpan=8.48 TotalChord=1.55357 TotalArea=13.1743
  root: chord 2.14286, twist 0, NACA 4-series Camber=0 CamberLoc=0.2 ThickChord=0.1
  sections:
    n  Span  Root_Chord  Tip_Chord  Area     Sweep  Sweep_Location  Dihedral  Twist  Twist_Location  tip airfoil
    1  4.24  2.14286     0.964286   6.58714  35     0               0         0      0.25            as above

Wing "Empannage_Vertical"
  location (X Y Z) 23.2283 0 0.5, rotation 90 0 0
  bounding box size 4.24572 0.185897 4.87
  totals: TotalSpan=4.87 TotalProjectedSpan=4.87 TotalChord=1.34643 TotalArea=6.55711
  root: chord 1.85714, twist 0, NACA 4-series Camber=0 CamberLoc=0.2 ThickChord=0.1
  sections:
    n  Span  Root_Chord  Tip_Chord  Area     Sweep  Sweep_Location  Dihedral  Twist  Twist_Location  tip airfoil
    1  4.87  1.85714     0.835714   6.55711  35     0               0         0      0.25            as above

Fuselage "GearPod"
  location (X Y Z) -0.7 0 -0.51, rotation 0 0 0
  bounding box size 5.5 1.65 1.09866
  Design: Length=5.5
  cross sections:
    n  XLocPercent  YLocPercent  ZLocPercent  shape
    0  0            0            0            point
    1  0.175        0            0            rounded rectangle RoundRectXSec_Radius=0.125 RoundedRect_Height=0.75 RoundedRect_Width=1.65
    2  0.825        0            0            as above
    3  1            0            0            point

Wing "Aile", child of "GearPod"
  location (X Y Z) 2.93478 0.025 -0.63381, rotation 4 0 0; relative location 3.63478 0.025 -0.12381, rotation 4 0 0
  symmetric about XZ
  bounding box size 9.85159 31.5347 2.45411
  totals: TotalSpan=31.71 TotalProjectedSpan=31.6976 TotalChord=3.72831 TotalArea=99.861 RelativeDihedralFlag=1
  root: chord 6.3097, twist 1, NACA 4-series Camber=0 CamberLoc=0.2 ThickChord=0.15
  sections:
    n  Span    Root_Chord  Tip_Chord  Area     Sweep  Sweep_Location  Dihedral  Twist  Twist_Location  tip airfoil
    1  4.53    6.3097      3.84946    23.0105  28     0               3         3      0.25            NACA 4-series Camber=0 CamberLoc=0.2 ThickChord=0.1
    2  11.325  3.84946     0.904624   26.92    30     0               0         0      0.25            as above

Custom "Moteur_1"
  location (X Y Z) 6.41667 -6 -1.56667, rotation 0 0 0
  bounding box size 2.75075 2.10958 2.13832
  Design: Camber=0 CamberLoc=0.2 Chord=2.75075 Height=1.8 InvertFlag=0 Shape=0 ThickChord=0.1125 Width=1.8
  custom script Duct0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

Wing "Moteur_1_Pylon", child of "Moteur_1"
  location (X Y Z) 5.46429 -6 -0.716667, rotation 90 0 0
  bounding box size 2.43598 0.320127 0.83598
  totals: TotalSpan=0.83598 TotalProjectedSpan=0.83598 TotalChord=1.6 TotalArea=1.33757
  root: chord 1.6, twist 0, NACA 4-series Camber=0 CamberLoc=0.2 ThickChord=0.2
  sections:
    n  Span     Root_Chord  Tip_Chord  Area     Sweep  Sweep_Location  Dihedral  Twist  Twist_Location  tip airfoil
    1  0.83598  1.6         1.6        1.33757  45     0               0         0      0.25            as above

Fuselage "Moteur_1_Spinners"
  location (X Y Z) 5.43841 -6 -1.56667, rotation 0 0 0
  bounding box size 0.3 0.35 0.35
  Design: Length=0.3
  cross sections:
    n  XLocPercent  YLocPercent  ZLocPercent  shape
    0  0            0            0            point
    1  0.51087      0            0            circle Circle_Diameter=0.35
    2  1            0            0            as above
    3  1            0            0            point

Fuselage "Moteur_1_Fuselage"
  location (X Y Z) 5.87319 -6 -1.56667, rotation 0 0 0
  bounding box size 2.85 1.2 1.2
  Design: Length=2.85
  cross sections:
    n  XLocPercent  YLocPercent  ZLocPercent  shape
    0  0            0            0            circle Circle_Diameter=1
    1  0.538043     0            0            circle Circle_Diameter=1.2
    2  1            0            0            point

Custom "Moteur_2"
  location (X Y Z) 6.66667 6.16667 -1.5, rotation 0 0 0
  bounding box size 2.75075 2.10958 2.13832
  Design: Camber=0 CamberLoc=0.2 Chord=2.75075 Height=1.8 InvertFlag=0 Shape=0 ThickChord=0.1125 Width=1.8
  custom script Duct0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

Wing "Moteur_2_Pylon", child of "Moteur_2"
  location (X Y Z) 5.71429 6.16667 -0.65, rotation 90 0 0
  bounding box size 2.43598 0.320127 0.835978
  totals: TotalSpan=0.835978 TotalProjectedSpan=0.835978 TotalChord=1.6 TotalArea=1.33757
  root: chord 1.6, twist 0, NACA 4-series Camber=0 CamberLoc=0.2 ThickChord=0.2
  sections:
    n  Span      Root_Chord  Tip_Chord  Area     Sweep  Sweep_Location  Dihedral  Twist  Twist_Location  tip airfoil
    1  0.835978  1.6         1.6        1.33757  45     0               0         0      0.25            as above

Fuselage "Moteur_2_Spinners"
  location (X Y Z) 5.68841 6.16667 -1.5, rotation 0 0 0
  bounding box size 0.3 0.35 0.35
  Design: Length=0.3
  cross sections:
    n  XLocPercent  YLocPercent  ZLocPercent  shape
    0  0            0            0            point
    1  0.51087      0            0            circle Circle_Diameter=0.35
    2  1            0            0            as above
    3  1            0            0            point

Fuselage "Moteur_2_Fuselage"
  location (X Y Z) 6.12319 6.16667 -1.5, rotation 0 0 0
  bounding box size 2.85 1.2 1.2
  Design: Length=2.85
  cross sections:
    n  XLocPercent  YLocPercent  ZLocPercent  shape
    0  0            0            0            circle Circle_Diameter=1
    1  0.538043     0            0            circle Circle_Diameter=1.2
    2  1            0            0            point
