OpenVSP model (file version 4), 5 components.
Geometry view with OpenVSP parameter names; values to 6 digits, angles in degrees, lengths in the model's unit.
Overall bounding box: X_Min=0 X_Len=37.5933 Y_Min=-17.5 Y_Len=35 Z_Min=-1.75 Z_Len=9.63422

Fuselage "Fuselage"
  location (X Y Z) 0 0 0, rotation 0 0 0
  bounding box size 37.5933 3.5 3.5
  Design: Length=37.57
  cross sections:
    n  XLocPercent  YLocPercent  ZLocPercent  shape
    0  0            0            0            point
    1  0.25         0            0            circle Circle_Diameter=3.5
    2  0.5          0            0            as above
    3  0.75         0            0            as above
    4  1            0            0.03         point

Wing "Aile", child of "Fuselage"
  location (X Y Z) 14 0 0.76087, rotation 0 0 0
  symmetric about XZ
  bounding box size 10.6397 35 0.629052
  totals: TotalSpan=35 TotalProjectedSpan=35 TotalChord=3.57573 TotalArea=112.168
  root: chord 6.28852, twist 0, NACA 4-series Camber=0 CamberLoc=0.2 ThickChord=0.1
  sections:
    n  Span     Root_Chord  Tip_Chord  Area     Sweep  Sweep_Location  Dihedral  Twist  Twist_Location  tip airfoil
    1  6.21585  6.28852     3.42436    30.1869  28.43  0               0         0      0.25            as above
    2  11.2842  3.42436     1.16567    25.8973  28.43  0               0         0      0.25            as above

Wing "Empennage_Horizontal", child of "Aile"
  location (X Y Z) 32 0 0.76087, rotation 0 0 0
  symmetric about XZ
  bounding box size 4.62929 13.1082 0.338242
  totals: TotalSpan=13.1082 TotalProjectedSpan=13.1082 TotalChord=2.11317 TotalArea=27.7
  root: chord 3.38108, twist 0, NACA 4-series Camber=0 CamberLoc=0.2 ThickChord=0.1
  sections:
    n  Span     Root_Chord  Tip_Chord  Area   Sweep  Sweep_Location  Dihedral  Twist  Twist_Location  tip airfoil
    1  6.55412  3.38108     0.84527    13.85  30     0               0         0      0.25            as above

Wing "Empennage_Vertical", child of "Empennage_Horizontal"
  location (X Y Z) 32.7065 0 1.19565, rotation 90 0 0.108696
  bounding box size 4.81443 0.388421 6.68857
  totals: TotalSpan=6.67942 TotalProjectedSpan=6.67942 TotalChord=2.42686 TotalArea=16.21
  root: chord 3.88297, twist 0, NACA 4-series Camber=0 CamberLoc=0.2 ThickChord=0.1
  sections:
    n  Span     Root_Chord  Tip_Chord  Area   Sweep  Sweep_Location  Dihedral  Twist  Twist_Location  tip airfoil
    1  6.67942  3.88297     0.970743   16.21  30     0               0         0      0.25            as above

Fuselage "moteur 1 et 2"
  location (X Y Z) 14.6717 2.23913 -0.434783, rotation 0 0.217391 0
  symmetric about XZ
  bounding box size 3.62733 6.44806 1.97002
  Design: Length=3.61
  cross sections:
    n  XLocPercent  YLocPercent  ZLocPercent  ZRotate   shape
    0  1            0            0            0.818182  circle Circle_Diameter=1.97
    1  0.5          0            0            0         circle Circle_Diameter=0.94
    2  0            0            0            0         circle Circle_Diameter=0.905062
    3  0.3          0            0            0         circle Circle_Diameter=1.18183
    4  1            0            0            0.818182  circle Circle_Diameter=1.97
