OpenVSP model (file version 4), 5 components.
Geometry view with OpenVSP parameter names; values to 6 digits, angles in degrees, lengths in the model's unit.
Overall bounding box: X_Min=0 X_Len=34.2457 Y_Min=-14.9454 Y_Len=29.8907 Z_Min=-2.36186 Z_Len=8.68235

TransportFuse "TransportFuse"
  location (X Y Z) 0 0 0, rotation 0 0 0
  bounding box size 34.2 3.42 3.534
  Design: AftCenter=0.3 AftHeight=0.3 AftMult=3 AftWidth=0.1 Diameter=3.42 Length=34.2 NoseCenter=-0.2 NoseMult=1.5
  custom script TransportFuse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

Wing "WingGeom", child of "TransportFuse"
  location (X Y Z) 11 0 -0.978261, rotation 0 0 0
  symmetric about XZ
  bounding box size 9.49522 29.8907 1.66244
  totals: TotalSpan=30 TotalProjectedSpan=29.8907 TotalChord=3.8333 TotalArea=114.999
  root: chord 6.14702, twist 0, NACA 4-series Camber=0 CamberLoc=0.2 ThickChord=0.1
  sections:
    n  Span  Root_Chord  Tip_Chord  Area     Sweep  Sweep_Location  Dihedral  Twist  Twist_Location  tip airfoil
    1  15    6.14702     1.51958    57.4995  28     0               4.8913    0      0.25            as above

Duct "Duct", child of "WingGeom"
  location (X Y Z) 16.9524 -7.61905 -1.21636, rotation 0 0 0; relative location 5.95238 -7.61905 -0.238095, rotation 0 0 0
  symmetric about XZ
  bounding box size 3.8 17.4983 2.29101
  Design: Camber=0 CamberLoc=0.2 Chord=3.8 Height=1.5 InvertFlag=0 Shape=0 ThickChord=0.2 Width=1.5
  custom script Duct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

Wing "WingGeom", child of "TransportFuse"
  location (X Y Z) 28.8656 0 0.869565, rotation 0 0 0
  symmetric about XZ
  bounding box size 5.29648 13.4545 0.448421
  totals: TotalSpan=13.4545 TotalProjectedSpan=13.4545 TotalChord=3.10115 TotalArea=41.7246
  root: chord 4.48278, twist 0, NACA 4-series Camber=0 CamberLoc=0.2 ThickChord=0.1
  sections:
    n  Span     Root_Chord  Tip_Chord  Area     Sweep  Sweep_Location  Dihedral  Twist  Twist_Location  tip airfoil
    1  6.72727  4.48278     1.71952    20.8623  28     0               0         0      0.25            as above

Wing "WingGeom", child of "TransportFuse"
  location (X Y Z) 30.087 0 1.19565, rotation 90 0 0
  bounding box size 4.15871 0.357667 5.12484
  totals: TotalSpan=5.12484 TotalProjectedSpan=5.12484 TotalChord=2.38757 TotalArea=12.2359
  root: chord 3.57526, twist 0, NACA 4-series Camber=0 CamberLoc=0.2 ThickChord=0.1
  sections:
    n  Span     Root_Chord  Tip_Chord  Area     Sweep  Sweep_Location  Dihedral  Twist  Twist_Location  tip airfoil
    1  5.12484  3.57526     1.19988    12.2359  30     0               0         0      0.25            as above
