OpenVSP model (file version 4), 6 components.
Geometry view with OpenVSP parameter names; values to 6 digits, angles in degrees, lengths in the model's unit.
Overall bounding box: X_Min=-5.7 X_Len=36.5015 Y_Min=-22.2788 Y_Len=44.5576 Z_Min=-3.18 Z_Len=8.27426

Custom "Fuselage"
  location (X Y Z) -5.7 0 0, rotation 0 0 0
  bounding box size 34.7 3.47 3.58567
  Design: AftCenter=0.3 AftHeight=0.3 AftMult=3 AftWidth=0.1 Diameter=3.47 Length=34.7 NoseCenter=-0.2 NoseMult=1.4
  custom script TransportFuse0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

Wing "Empennage_Horizontal"
  location (X Y Z) 25 0.5 0.6, rotation 0 0 0
  symmetric about XZ
  bounding box size 5.80147 14.5647 0.233966
  totals: TotalSpan=13.5647 TotalProjectedSpan=13.5647 TotalChord=1.69558 TotalArea=23
  root: chord 2.33873, twist 0, NACA 4-series Camber=0 CamberLoc=0.2 ThickChord=0.1
  sections:
    n  Span     Root_Chord  Tip_Chord  Area  Sweep  Sweep_Location  Dihedral  Twist  Twist_Location  tip airfoil
    1  6.78233  2.33873     1.05243    11.5  35     0               0         0      0.25            as above

Wing "Empennage_Vertical"
  location (X Y Z) 25.15 0 1.27, rotation 90 0 0
  bounding box size 4.26023 0.351796 3.82426
  totals: TotalSpan=3.82426 TotalProjectedSpan=3.82426 TotalChord=2.54951 TotalArea=9.75
  root: chord 3.51657, twist 0, NACA 4-series Camber=0 CamberLoc=0.2 ThickChord=0.1
  sections:
    n  Span     Root_Chord  Tip_Chord  Area  Sweep  Sweep_Location  Dihedral  Twist  Twist_Location  tip airfoil
    1  3.82426  3.51657     1.58245    9.75  35     0               0         0      0.25            as above

Wing "Aile"
  location (X Y Z) 3.4 0.025 -0.63381, rotation 0 1 0
  symmetric about XZ
  bounding box size 13.0634 44.5576 2.35465
  totals: TotalSpan=46.4972 TotalProjectedSpan=44.6105 TotalChord=1.48883 TotalArea=111.249 RelativeDihedralFlag=1
  root: chord 3.95531, twist 3, NACA 4-series Camber=0 CamberLoc=0.2 ThickChord=0.155
  sections:
    n  Span     Root_Chord  Tip_Chord  Area     Sweep  Sweep_Location  Dihedral  Twist  Twist_Location  tip airfoil
    1  22.2486  3.95531     1          55.1243  28.43  0               3         0      0.25            NACA 4-series Camber=0 CamberLoc=0.2 ThickChord=0.1
    2  1        1           0          0.5      20     0               85        0      0.25            as above

Pod "Moteur_1", child of "Aile"
  location (X Y Z) 7.5 9 -1.8, rotation 0 0 0
  bounding box size 3.45 2.76 2.76
  Design: FineRatio=2.5 Length=3.45

Pod "Moteur_2", child of "Aile"
  location (X Y Z) 7.5 -9 -1.8, rotation 0 0 0
  bounding box size 3.45 2.76 2.76
  Design: FineRatio=2.5 Length=3.45
