OpenVSP model (file version 4), 10 components.
Geometry view with OpenVSP parameter names; values to 6 digits, angles in degrees, lengths in the model's unit.
Overall bounding box: X_Min=0 X_Len=36.2288 Y_Min=-15.2554 Y_Len=30.5108 Z_Min=-3.22574 Z_Len=9.15857

Fuselage "Fuselage"
  location (X Y Z) 0 0 0, rotation 0 0 0
  bounding box size 34.7 3.86 4.37886
  Design: Length=34.7
  cross sections:
    n  XLocPercent  YLocPercent  ZLocPercent  shape
    0  0            0            0            point
    1  0.155643     0            0            circle Circle_Diameter=3.86
    2  0.761377     0            0            as above
    3  1            0            0.0269967    point

Wing "Aile"
  location (X Y Z) 13 0 -1, rotation 2.5 1 0
  symmetric about XZ
  bounding box size 10.1664 30.5108 2.37611
  totals: TotalSpan=30.6669 TotalProjectedSpan=30.6377 TotalChord=4.13 TotalArea=119.3 RelativeDihedralFlag=1
  root: chord 7.08662, twist 3, NACA 4-series Camber=0 CamberLoc=0.2 ThickChord=0.1379
  sections:
    n  Span     Root_Chord  Tip_Chord  Area     Sweep  Sweep_Location  Dihedral  Twist  Twist_Location  tip airfoil
    1  6.26287  7.08662     3.79288    34.0685  28.43  0               2.5       0      0.25            as above
    2  9.07057  3.79288     1.84761    25.5813  28.43  0               2.5       0      0.25            as above

Wing "Empennage_Horizontal"
  location (X Y Z) 30.7 0 1, rotation 0 0 0
  symmetric about XZ
  bounding box size 5.27096 11.5758 0.386014
  totals: TotalSpan=11.5758 TotalProjectedSpan=11.5758 TotalChord=2.89396 TotalArea=33.5
  root: chord 3.85861, twist 0, NACA 4-series Camber=0 CamberLoc=0.2 ThickChord=0.1
  sections:
    n  Span     Root_Chord  Tip_Chord  Area   Sweep  Sweep_Location  Dihedral  Twist  Twist_Location  tip airfoil
    1  5.78792  3.85861     1.92931    16.75  30     0               0         0      0.25            as above

Wing "Empennage_Vertical"
  location (X Y Z) 30 0 1.08, rotation 90 0 0
  bounding box size 6.22883 0.431501 4.85283
  totals: TotalSpan=4.85283 TotalProjectedSpan=4.85283 TotalChord=3.23522 TotalArea=15.7
  root: chord 4.31363, twist 0, NACA 4-series Camber=0 CamberLoc=0.2 ThickChord=0.1
  sections:
    n  Span     Root_Chord  Tip_Chord  Area  Sweep  Sweep_Location  Dihedral  Twist  Twist_Location  tip airfoil
    1  4.85283  4.31363     2.15682    15.7  40     0               0         0      0.25            as above

Wing "Moteur_1"
  location (X Y Z) 15.8 5 -0.8, rotation -90 0 0
  bounding box size 4.5938 0.341723 0.5
  totals: TotalSpan=0.5 TotalProjectedSpan=0.5 TotalChord=3 TotalArea=1.5
  root: chord 3.41587, twist 0, NACA 4-series Camber=0 CamberLoc=0.2 ThickChord=0.1
  sections:
    n  Span  Root_Chord  Tip_Chord  Area  Sweep  Sweep_Location  Dihedral  Twist  Twist_Location  tip airfoil
    1  0.5   3.41587     2.58413    1.5   -67    0               0         0      0.25            as above

Custom "Duct1", child of "Moteur_1"
  location (X Y Z) 15.5 5 -2.174, rotation 0 0 0
  bounding box size 3.55 2.07523 2.10348
  Design: Camber=0 CamberLoc=0.2 Chord=3.55 Height=1.365 InvertFlag=0 Shape=0 ThickChord=0.2 Width=1.365
  custom script Duct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

Fuselage "FuselageGeom1", child of "Duct1"
  location (X Y Z) 13.9 5 -2.174, rotation 0 0 0
  bounding box size 3.55 1.9474 1.9474
  Design: Length=3.55
  cross sections:
    n  XLocPercent  YLocPercent  ZLocPercent  shape
    0  0            0            0            point
    1  0            0            0            circle Circle_Diameter=1.365
    2  0.233333     0            0            circle Circle_Diameter=1.74338
    3  1            0            0            point

Wing "Moteur_2"
  location (X Y Z) 15.8 -5 -0.8, rotation -90 0 0
  bounding box size 4.5938 0.341723 0.5
  totals: TotalSpan=0.5 TotalProjectedSpan=0.5 TotalChord=3 TotalArea=1.5
  root: chord 3.41587, twist 0, NACA 4-series Camber=0 CamberLoc=0.2 ThickChord=0.1
  sections:
    n  Span  Root_Chord  Tip_Chord  Area  Sweep  Sweep_Location  Dihedral  Twist  Twist_Location  tip airfoil
    1  0.5   3.41587     2.58413    1.5   -67    0               0         0      0.25            as above

Custom "Duct2", child of "Moteur_2"
  location (X Y Z) 15.5 -5 -2.174, rotation 0 0 0
  bounding box size 3.55 2.07523 2.10348
  Design: Camber=0 CamberLoc=0.2 Chord=3.55 Height=1.365 InvertFlag=0 Shape=0 ThickChord=0.2 Width=1.365
  custom script Duct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

Fuselage "FuselageGeom2", child of "Duct2"
  location (X Y Z) 13.9 -5 -2.174, rotation 0 0 0
  bounding box size 3.55 1.9474 1.9474
  Design: Length=3.55
  cross sections:
    n  XLocPercent  YLocPercent  ZLocPercent  shape
    0  0            0            0            point
    1  0            0            0            circle Circle_Diameter=1.365
    2  0.233333     0            0            circle Circle_Diameter=1.74338
    3  1            0            0            point
