OpenVSP model (file version 4), 10 components.
Geometry view with OpenVSP parameter names; values to 6 digits, angles in degrees, lengths in the model's unit.
Overall bounding box: X_Min=0 X_Len=44.1357 Y_Min=-16.2757 Y_Len=32.5513 Z_Min=-4.39189 Z_Len=12.3627

Fuselage "Fuselage"
  location (X Y Z) 0 0 0, rotation 0 0 0
  bounding box size 44.1357 4.54588 4.7723
  Design: Length=44.1357
  cross sections:
    n  XLocPercent  YLocPercent  ZLocPercent  shape
    0  0            0            -0.02        point
    1  0.13587      0            0            ellipse Ellipse_Height=3.95 Ellipse_Width=3.95
    2  0.5          0            0            as above
    3  0.75         0            0            as above
    4  0.875        0            0.00679348   as above
    5  0.923307     0            0.0142663    ellipse Ellipse_Height=3 Ellipse_Width=3
    6  0.972074     0            0.0272083    ellipse Ellipse_Height=2 Ellipse_Width=2
    7  1            0            0.03163      point

Wing "Aile"
  location (X Y Z) 12 0 -1.92813, rotation 0 0 0
  symmetric about XZ
  bounding box size 10.5318 32.5513 1.22068
  totals: TotalSpan=32.596 TotalProjectedSpan=32.5513 TotalChord=3.9 TotalArea=127.124
  root: chord 6.86016, twist 0, NACA 4-series Camber=0 CamberLoc=0.2 ThickChord=0.1
  sections:
    n  Span    Root_Chord  Tip_Chord  Area     Sweep  Sweep_Location  Dihedral  Twist  Twist_Location  tip airfoil
    1  16.298  6.86016     0.939842   63.5622  30.48  0               3         3      0.5             NACA 4-series Camber=0 CamberLoc=0.2 ThickChord=0

Wing "Empennage_Horizontal"
  location (X Y Z) 36.6957 0 1.23913, rotation 0 0 0
  symmetric about XZ
  bounding box size 5.4966 11.9284 0.311506
  totals: TotalSpan=11.9284 TotalProjectedSpan=11.9284 TotalChord=2.17968 TotalArea=26
  root: chord 3.11383, twist 0, NACA 4-series Camber=0 CamberLoc=0.2 ThickChord=0.1
  sections:
    n  Span     Root_Chord  Tip_Chord  Area  Sweep  Sweep_Location  Dihedral  Twist  Twist_Location  tip airfoil
    1  5.96418  3.11383     1.24553    13    35.48  0               0         0      0.25            as above

Wing "Empennage_Vertical"
  location (X Y Z) 35 0 2.10084, rotation 90 0 0
  bounding box size 7.66837 0.685933 5.87
  totals: TotalSpan=5.87 TotalProjectedSpan=5.87 TotalChord=4.8 TotalArea=28.176
  root: chord 6.85714, twist 0, NACA 4-series Camber=0 CamberLoc=0.2 ThickChord=0.1
  sections:
    n  Span  Root_Chord  Tip_Chord  Area    Sweep  Sweep_Location  Dihedral  Twist  Twist_Location  tip airfoil
    1  5.87  6.85714     2.74286    28.176  40     0               0         0      0.25            as above

Fuselage "Moteur_1"
  location (X Y Z) 15 -4.87 -2.739, rotation 5.1087 0 0
  bounding box size 2 2.55783 2.55783
  Design: Length=2
  cross sections:
    n  XLocPercent  YLocPercent  ZLocPercent  shape
    0  0            0            0            circle Circle_Diameter=1.8
    1  1            0            0            as above

Fuselage "Powerface_1", child of "Moteur_1"
  location (X Y Z) 15 -4.87 -2.739, rotation 7.5 0 0
  bounding box size 5.98321 1.79806 1.79806
  Design: Length=5.95
  cross sections:
    n  XLocPercent  YLocPercent  ZLocPercent  shape
    0  0            0            0            point
    1  0.0457563    0            0            circle Circle_Diameter=1.75
    2  0.935462     0            0            as above
    3  1            0            0            point

Fuselage "Pylon_1", child of "Powerface_1"
  location (X Y Z) 15.5 -4.87 -2.93478, rotation 0 0 0
  bounding box size 4 1.41421 2.91421
  Design: Length=4
  cross sections:
    n  XLocPercent  YLocPercent  ZLocPercent  shape
    0  0            0            0            file fuselage section Height=1.5 Width=0
    1  1            0            0            as above

Fuselage "Moteur_2"
  location (X Y Z) 15 4.87 -2.73913, rotation 0 0 5.97826
  bounding box size 2.77333 2.70445 2.71924
  Design: Length=2.6
  cross sections:
    n  XLocPercent  YLocPercent  ZLocPercent  shape
    0  0            0            0            circle Circle_Diameter=1.8
    1  1            0            0            as above

Fuselage "Powerface_2", child of "Moteur_2"
  location (X Y Z) 15.46 4.87 -2.739, rotation 0 0 0
  bounding box size 5.98321 1.75 1.75
  Design: Length=5.95
  cross sections:
    n  XLocPercent  YLocPercent  ZLocPercent  shape
    0  0            0            0            point
    1  0.0457563    0            0            circle Circle_Diameter=1.75
    2  0.935462     0            0            as above
    3  1            0            0            point

Fuselage "Pylon_2", child of "Powerface_2"
  location (X Y Z) 15.46 4.87 -2.93478, rotation 0 0 0
  bounding box size 2.6 0.919239 2.41924
  Design: Length=2.6
  cross sections:
    n  XLocPercent  YLocPercent  ZLocPercent  shape
    0  0            0            0            file fuselage section Height=1.5 Width=0
    1  1            0            0            as above
