OpenVSP model (file version 4), 16 components.
Geometry view with OpenVSP parameter names; values to 6 digits, angles in degrees, lengths in the model's unit.
Overall bounding box: X_Min=0 X_Len=33.0065 Y_Min=-14.8687 Y_Len=29.7374 Z_Min=-2.86884 Z_Len=9.68062

Custom "Fuselage"
  location (X Y Z) 0 0 0, rotation 0 0 0
  bounding box size 32.6 3.26 3.36867
  Design: AftCenter=0.3 AftHeight=0.3 AftMult=3 AftWidth=0.1 Diameter=3.26 Length=32.6 NoseCenter=-0.2 NoseMult=1.09
  custom script TransportFuse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

Wing "Aile", child of "Fuselage"
  location (X Y Z) 10.8667 0 -0.25, rotation 0 0 0
  symmetric about XZ
  bounding box size 9.68628 29.6795 1.04177
  totals: TotalSpan=29.7078 TotalProjectedSpan=29.6795 TotalChord=3.91907 TotalArea=103
  root: chord 6.93128, twist 0, NACA 4-series Camber=0 CamberLoc=0.2 ThickChord=0.1
  sections:
    n  Span     Root_Chord  Tip_Chord  Area     Sweep  Sweep_Location  Dihedral  Twist  Twist_Location  tip airfoil
    1  3.71347  6.93128     4.82769    21.8333  30.48  0               2.5       2.5    0.25            as above
    2  1.85674  4.82769     3.73441    7.94877  30.48  0               2.5       2.5    0.25            as above
    3  1.85674  3.73441     3.17639    6.41576  30.48  0               2.5       2.5    0.25            as above
    4  7.42694  3.17639     0.944333   15.3022  30.48  0               2.5       2.5    0.25            as above

Wing "Wingtip_fence", child of "Aile"
  location (X Y Z) 19.6 14.85 0.4, rotation -90 0 0
  symmetric about XZ
  bounding box size 0.379741 29.7374 0.495961
  totals: TotalSpan=0.991922 TotalProjectedSpan=0.991922 TotalChord=0.233494 TotalArea=0.231608
  root: chord 0.373591, twist 0, NACA 4-series Camber=0 CamberLoc=0.2 ThickChord=0.1
  sections:
    n  Span      Root_Chord  Tip_Chord  Area      Sweep  Sweep_Location  Dihedral  Twist  Twist_Location  tip airfoil
    1  0.495961  0.373591    0.0933977  0.115804  30     0               0         0      0.25            as above

Wing "Wingtip_fence", child of "Wingtip_fence"
  location (X Y Z) 19.6 14.85 0.4, rotation 90 0 0
  symmetric about XZ
  bounding box size 0.379741 29.7374 0.495961
  totals: TotalSpan=0.991922 TotalProjectedSpan=0.991922 TotalChord=0.233494 TotalArea=0.231608
  root: chord 0.373591, twist 0, NACA 4-series Camber=0 CamberLoc=0.2 ThickChord=0.1
  sections:
    n  Span      Root_Chord  Tip_Chord  Area      Sweep  Sweep_Location  Dihedral  Twist  Twist_Location  tip airfoil
    1  0.495961  0.373591    0.0933977  0.115804  30     0               0         0      0.25            as above

Wing "Empennage_Vertical", child of "Fuselage"
  location (X Y Z) 27.289 0 1.5, rotation 90 0 0
  symmetric about XZ
  bounding box size 5.71751 0.444178 5.31178
  totals: TotalSpan=10.6236 TotalProjectedSpan=10.6236 TotalChord=3.21926 TotalArea=34.2
  root: chord 4.44036, twist 0, NACA 4-series Camber=0 CamberLoc=0.2 ThickChord=0.1
  sections:
    n  Span     Root_Chord  Tip_Chord  Area  Sweep  Sweep_Location  Dihedral  Twist  Twist_Location  tip airfoil
    1  5.31178  4.44036     1.99816    17.1  35     0               0         0      0.25            as above

Wing "Empennage_horizontal", child of "Fuselage"
  location (X Y Z) 27.48 0 0.6, rotation 0 0 0
  symmetric about XZ
  bounding box size 5.01185 9.49096 0.469296
  totals: TotalSpan=9.5 TotalProjectedSpan=9.49096 TotalChord=2.62 TotalArea=24.89
  root: chord 3.61379, twist 0, NACA 4-series Camber=0 CamberLoc=0.2 ThickChord=0.1
  sections:
    n  Span  Root_Chord  Tip_Chord  Area    Sweep  Sweep_Location  Dihedral  Twist  Twist_Location  tip airfoil
    1  4.75  3.61379     1.62621    12.445  35.48  0               2.5       0      0.25            as above

Fuselage "Element_moteur_1_1", child of "Fuselage"
  location (X Y Z) 12.4 4.8 -1.55, rotation 0 0 0
  bounding box size 1.5 0.35 0.35
  Design: Length=1.5
  cross sections:
    n  XLocPercent  YLocPercent  ZLocPercent  shape
    0  0            0            0            point
    1  0.51087      0            0            circle Circle_Diameter=0.35
    2  1            0            0            as above
    3  1            0            0            point

Fuselage "Element_moteur_1_2", child of "Fuselage"
  location (X Y Z) 12.4 4.8 -1.55, rotation 0 0 0
  bounding box size 1.5 0.245577 0.245577
  Design: Length=1.5
  cross sections:
    n  XLocPercent  YLocPercent  ZLocPercent  shape
    0  0            0            0            circle Circle_Diameter=0.0800529
    1  0.538043     0            0            circle Circle_Diameter=0.0960634
    2  1            0            0            point

Wing "Element_moteur_1_3", child of "Fuselage"
  location (X Y Z) 13.4 4.8 -0.439937, rotation 90 0 0
  bounding box size 1.56503 0.232194 0.457274
  totals: TotalSpan=0.457274 TotalProjectedSpan=0.457274 TotalChord=1.13413 TotalArea=0.51861
  root: chord 1.16051, twist 0, NACA 4-series Camber=0 CamberLoc=0.2 ThickChord=0.2
  sections:
    n  Span      Root_Chord  Tip_Chord  Area     Sweep  Sweep_Location  Dihedral  Twist  Twist_Location  tip airfoil
    1  0.457274  1.16051     1.10776    0.51861  45     0               0         0      0.25            as above

Custom "Moteur_1", child of "Fuselage"
  location (X Y Z) 13.4 4.8 -1.55, rotation 0 0 0
  bounding box size 3.81 2.60224 2.63767
  Design: Camber=0 CamberLoc=0.2 Chord=3.81 Height=1.84 InvertFlag=0 Shape=0 ThickChord=0.2 Width=1.84
  custom script Duct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

Fuselage "Element_moteur_2_1", child of "Moteur_1"
  location (X Y Z) 12.4 -4.8 -1.55, rotation 0 0 0
  bounding box size 1.5 0.35 0.35
  Design: Length=1.5
  cross sections:
    n  XLocPercent  YLocPercent  ZLocPercent  shape
    0  0            0            0            point
    1  0.51087      0            0            circle Circle_Diameter=0.35
    2  1            0            0            as above
    3  1            0            0            point

Custom "Element_moteur_1_4", child of "Element_moteur_2_1"
  location (X Y Z) 13.4 4.8 -1.55, rotation 0 0 0
  bounding box size 0 1.5 1.5
  Design: Diameter=1.5
  custom script Disk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

Custom "Element_moteur_2_4", child of "Element_moteur_1_4"
  location (X Y Z) 13.4 -4.8 -1.55, rotation 0 0 0
  bounding box size 0 1.5 1.5
  Design: Diameter=1.5
  custom script Disk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

Fuselage "Element_moteur_2_2", child of "Moteur_1"
  location (X Y Z) 12.4 -4.8 -1.55, rotation 0 0 0
  bounding box size 0.228151 0.0960634 0.0960634
  Design: Length=0.228151
  cross sections:
    n  XLocPercent  YLocPercent  ZLocPercent  shape
    0  0            0            0            circle Circle_Diameter=0.0800529
    1  0.538043     0            0            circle Circle_Diameter=0.0960634
    2  1            0            0            point

Wing "Element_moteur_2_3", child of "Moteur_1"
  location (X Y Z) 13.4 -4.8 -0.44, rotation 90 0 0
  bounding box size 1.5914 0.226916 0.45727
  totals: TotalSpan=0.45727 TotalProjectedSpan=0.45727 TotalChord=1.13413 TotalArea=0.518604
  root: chord 1.13413, twist 0, NACA 4-series Camber=0 CamberLoc=0.2 ThickChord=0.2
  sections:
    n  Span     Root_Chord  Tip_Chord  Area      Sweep  Sweep_Location  Dihedral  Twist  Twist_Location  tip airfoil
    1  0.45727  1.13413     1.13413    0.518604  45     0               0         0      0.25            as above

Custom "Moteur_2", child of "Moteur_1"
  location (X Y Z) 13.4 -4.8 -1.55, rotation 0 0 0
  bounding box size 3.81 2.60224 2.63767
  Design: Camber=0 CamberLoc=0.2 Chord=3.81 Height=1.84 InvertFlag=0 Shape=0 ThickChord=0.2 Width=1.84
  custom script Duct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
