OpenVSP model (file version 4), 9 components.
Geometry view with OpenVSP parameter names; values to 6 digits, angles in degrees, lengths in the model's unit.
Overall bounding box: X_Min=-5.7 X_Len=33.3 Y_Min=-14.8753 Y_Len=29.7506 Z_Min=-2.65263 Z_Len=9.01676

Custom "Fuselage"
  location (X Y Z) -5.7 0 0, rotation 0 0 0
  bounding box size 33.3 3.3 3.44662
  Design: AftCenter=0.366667 AftHeight=0.274 AftMult=3.1525 AftWidth=0.26575 Diameter=3.3 Length=33.3 NoseCenter=-0.2 NoseMult=1.5025
  custom script TransportFuse0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

Wing "Empennage_Horizontal", child of "Fuselage"
  location (X Y Z) 21.2517 0 0.631948, rotation 0 0 0
  symmetric about XZ
  bounding box size 5.34115 9.98609 0.650195
  totals: TotalSpan=10.0253 TotalProjectedSpan=9.98609 TotalChord=3.2 TotalArea=32.081
  root: chord 4.57143, twist 1.38462, NACA 4-series Camber=0 CamberLoc=0.2 ThickChord=0.01
  sections:
    n  Span     Root_Chord  Tip_Chord  Area     Sweep  Sweep_Location  Dihedral  Twist  Twist_Location  tip airfoil
    1  5.01265  4.57143     1.82857    16.0405  35     0               5.06874   0      0.25            NACA 4-series Camber=0 CamberLoc=0.2 ThickChord=0.1

Wing "Empennage_Vertical", child of "Fuselage"
  location (X Y Z) 20.9672 0 1.31434, rotation 90 0 0
  bounding box size 5.86868 0.419384 5.04979
  totals: TotalSpan=5.04979 TotalProjectedSpan=5.04979 TotalChord=2.01667 TotalArea=10.1838
  root: chord 3.00785, twist 0, NACA 4-series Camber=0 CamberLoc=0.2 Scale=1.39375 ThickChord=0.1
  sections:
    n  Span     Root_Chord  Tip_Chord  Area     Sweep    Sweep_Location  Dihedral  Twist     Twist_Location  tip airfoil
    1  5.04979  3.00785     1.02548    10.1838  38.7318  0.4             0         0.181818  0.509091        NACA 4-series Camber=0 CamberLoc=0.2 ThickChord=0.1

Wing "Ailes", child of "Fuselage"
  location (X Y Z) 3.91304 0 -1.30435, rotation 0 0 0
  symmetric about XZ
  bounding box size 10.285 29.7505 1.31655
  totals: TotalSpan=29.7913 TotalProjectedSpan=29.7505 TotalChord=3.78136 TotalArea=112.652
  root: chord 6.05018, twist 1, NACA 4-series Camber=0 CamberLoc=0.2 ThickChord=0.15
  sections:
    n  Span     Root_Chord  Tip_Chord  Area     Sweep  Sweep_Location  Dihedral  Twist  Twist_Location  tip airfoil
    1  14.8957  6.05018     1.51255    56.3259  30.5   0               3         3      0.25            NACA 4-series Camber=0 CamberLoc=0.2 ThickChord=0.1

Wing "Mâts réacteurs"
  location (X Y Z) 6.18461 5.32609 -1.72914, rotation 90.2174 0 0.108696
  symmetric about XZ
  bounding box size 2.2289 10.7782 0.32043
  totals: TotalSpan=0.634118 TotalProjectedSpan=0.634118 TotalChord=1.42963 TotalArea=0.906553
  root: chord 1.576, twist 0, NACA 4-series Camber=0 CamberLoc=0.2 Scale=1.39375 ThickChord=0
  sections:
    n  Span      Root_Chord  Tip_Chord  Area      Sweep    Sweep_Location  Dihedral  Twist  Twist_Location  tip airfoil
    1  0.317059  1.576       1.28325    0.453276  50.0045  0.4             0         0      0.586364        NACA 4-series Camber=0 CamberLoc=0.2 ThickChord=0.1

Fuselage "Nacelles", child of "Mâts réacteurs"
  location (X Y Z) 4.99148 5.38139 -2.05873, rotation 91.0869 0.0559973 0.108683; relative location -1.68876 -0.644589 -0.0540541, rotation 0.869565 0.0543478 0
  symmetric about XZ
  bounding box size 3.31756 11.9554 1.19241
  Design: Length=3.31529
  cross sections:
    n  XLocPercent  YLocPercent  ZLocPercent  shape
    0  1            0            0            circle Circle_Diameter=0.90045
    1  0.5          0            0            circle Circle_Diameter=0.94047
    2  0            0            0            circle Circle_Diameter=0.905515
    3  0.3          0            0            circle Circle_Diameter=1.18242
    4  1            0            0            circle Circle_Diameter=0.90045

Stack "Moteur n°1", child of "Nacelles"
  location (X Y Z) 5.32609 5.43478 -2.06522, rotation 0 0 0
  bounding box size 1.70058 1.0026 0.8355
  cross sections:
    n  XDelta   YDelta  ZDelta  shape
    0  0        0       0       point
    1  0.3342   0       0       ellipse Ellipse_Height=0.8355 Ellipse_Width=1.0026
    2  0.6684   0       0       as above
    3  0.3342   0       0       as above
    4  -1.3368  0       0       point

Stack "Moteur n°2", child of "Nacelles"
  location (X Y Z) 5.54348 -5.32609 -2.06522, rotation 0 0 0
  bounding box size 1.70042 1.0025 0.835417
  cross sections:
    n  XDelta    YDelta  ZDelta  shape
    0  0         0       0       point
    1  0.334167  0       0       ellipse Ellipse_Height=0.835417 Ellipse_Width=1.0025
    2  0.668333  0       0       as above
    3  0.334167  0       0       as above
    4  -1.33667  0       0       point

Wing "Winglets"
  location (X Y Z) 12.5977 14.8043 -0.53349, rotation 90 0 0
  symmetric about XZ
  bounding box size 1.76052 29.7506 0.459201
  totals: TotalSpan=0.918402 TotalProjectedSpan=0.918402 TotalChord=1.30989 TotalArea=1.203
  root: chord 1.20019, twist 0, NACA 4-series Camber=0 CamberLoc=0.2 Scale=1.39375 ThickChord=0.0681818
  sections:
    n  Span      Root_Chord  Tip_Chord  Area      Sweep  Sweep_Location  Dihedral  Twist  Twist_Location  tip airfoil
    1  0.459201  1.20019     1.41959    0.601502  0      0.4             0         0      0.586364        NACA 4-series Camber=0 CamberLoc=0.2 ThickChord=0.1
