OpenVSP model (file version 4), 5 components.
Geometry view with OpenVSP parameter names; values to 6 digits, angles in degrees, lengths in the model's unit.
Overall bounding box: X_Min=0 X_Len=34.3229 Y_Min=-16.5723 Y_Len=33.1447 Z_Min=-2.802 Z_Len=9.9266

Fuselage "Fuselage"
  location (X Y Z) 0 0 0, rotation 0 0 0
  bounding box size 34.23 3.97487 4.05221
  Design: Length=34.23
  cross sections:
    n  XLocPercent  YLocPercent  ZLocPercent  shape
    0  0            0            -0.005       point
    1  0.0502232    0            -0.005       ellipse Ellipse_Height=2.14084 Ellipse_Width=2.33645
    2  0.0770493    0            0.002        ellipse Ellipse_Height=3.06355 Ellipse_Width=3.16108
    3  0.178988     0            0            ellipse Ellipse_Height=3.95 Ellipse_Width=3.95
    4  0.5          0            0            as above
    5  0.75         0            0.00546448   ellipse Ellipse_Height=3.31233 Ellipse_Width=3.64212
    6  0.875        0            0.0163934    ellipse Ellipse_Height=2.35685 Ellipse_Width=2.54261
    7  1            0            0.0273224    point

Wing "Aile", child of "Fuselage"
  location (X Y Z) 11 0 -0.869565, rotation 0 0 0
  symmetric about XZ
  bounding box size 10.9369 33.1447 2.16483
  totals: TotalSpan=34.72 TotalProjectedSpan=33.1447 TotalChord=2.19257 TotalArea=116.579
  root: chord 5.7, twist 1, NACA 4-series Camber=0 CamberLoc=0.2 ThickChord=0.1
  sections:
    n  Span     Root_Chord  Tip_Chord  Area      Sweep   Sweep_Location  Dihedral  Twist  Twist_Location  tip airfoil
    1  16.3275  5.7         1.33       57.3911   30.476  0               3         3      0.25            as above
    2  1.03252  1.33        0.41028    0.898441  40      0               75        0      0.25            as above

Duct "Moteur_1_2", child of "Aile"
  location (X Y Z) 14.6429 5.2381 -1.66667, rotation 0 0 0
  symmetric about XZ
  bounding box size 2.55 12.7164 2.27067
  Design: Camber=0 CamberLoc=0.2 Chord=2.55 Height=1.73 InvertFlag=0 Shape=0 ThickChord=0.2 Width=1.73
  custom script Duct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

Wing "Empennage_Horizontal", child of "Fuselage"
  location (X Y Z) 29.1304 0 0.869565, rotation 0 0 0
  symmetric about XZ
  bounding box size 5.19242 11.7102 0.406336
  totals: TotalSpan=11.7173 TotalProjectedSpan=11.7102 TotalChord=2.01791 TotalArea=23.6445
  root: chord 2.94569, twist 0, NACA 4-series Camber=0 CamberLoc=0.2 ThickChord=0.1
  sections:
    n  Span     Root_Chord  Tip_Chord  Area     Sweep  Sweep_Location  Dihedral  Twist  Twist_Location  tip airfoil
    1  5.85866  2.94569     1.09014    11.8223  35     0               2         0      0.25            as above

Wing "Empennage_Vertical", child of "Fuselage"
  location (X Y Z) 27.3913 0 1.30435, rotation 90 0 0
  bounding box size 6.22465 0.536521 5.82025
  totals: TotalSpan=5.82025 TotalProjectedSpan=5.82025 TotalChord=3.35219 TotalArea=19.5106
  root: chord 5.3635, twist 0, NACA 4-series Camber=0 CamberLoc=0.2 ThickChord=0.1
  sections:
    n  Span     Root_Chord  Tip_Chord  Area     Sweep  Sweep_Location  Dihedral  Twist  Twist_Location  tip airfoil
    1  5.82025  5.3635      1.34087    19.5106  40     0               0         0      0.25            as above
