OpenVSP model (file version 4), 8 components.
Geometry view with OpenVSP parameter names; values to 6 digits, angles in degrees, lengths in the model's unit.
Overall bounding box: X_Min=0 X_Len=36.1674 Y_Min=-16.5964 Y_Len=33.1928 Z_Min=-3.71165 Z_Len=11.3688

Custom "Fuselage"
  location (X Y Z) 0 0 0, rotation 0 0 0
  bounding box size 33.974 3.3974 3.42142
  Design: AftCenter=0.35 AftHeight=0.3 AftMult=3 AftWidth=0.1 Diameter=3.3974 Length=33.974 NoseCenter=-0.15 NoseMult=1.5
  custom script TransportFuse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

Wing "Aile", child of "Fuselage"
  location (X Y Z) 11.328 0 -1.19565, rotation 0 0 0
  symmetric about XZ
  bounding box size 11.3646 33.1928 2.54658
  totals: TotalSpan=35.3862 TotalProjectedSpan=33.1928 TotalChord=2.22075 TotalArea=115.728
  root: chord 5.522, twist 0, NACA 4-series Camber=0 CamberLoc=0.2 ThickChord=0.137
  sections:
    n  Span     Root_Chord  Tip_Chord  Area     Sweep  Sweep_Location  Dihedral  Twist  Twist_Location  tip airfoil
    1  16.3931  5.522       1.3805     56.5767  30     0               3         0      0.25            as above
    2  1.3      1.3805      0.6        1.28733  45     0               80        0      0.25            NACA 4-series Camber=0 CamberLoc=0.2 ThickChord=0.1

Wing "WingGeom", child of "Aile"
  location (X Y Z) 13.3117 6.557 -1.77565, rotation 90 0 0; relative location 1.9837 6.557 -0.58, rotation 90 0 0
  symmetric about XZ
  bounding box size 4.69798 13.3641 0.8
  totals: TotalSpan=1.6 TotalProjectedSpan=1.6 TotalChord=2.25 TotalArea=3.6
  root: chord 2, twist 0, NACA 4-series Camber=0 CamberLoc=0.2 ThickChord=0.1
  sections:
    n  Span  Root_Chord  Tip_Chord  Area  Sweep  Sweep_Location  Dihedral  Twist  Twist_Location  tip airfoil
    1  0.8   2           2.5        1.8   70     0               0         0      0.25            as above

Stack "Moteur_1", child of "WingGeom"
  location (X Y Z) 16.8617 6.557 -2.67565, rotation 0 0 180; relative location 3.55 0 -0.9, rotation 0 0 180
  bounding box size 3.86245 2.072 2.072
  cross sections:
    n  XDelta   YDelta  ZDelta  shape
    0  0        0       0       point
    1  1        0       0       circle Circle_Diameter=2.072
    2  2.36245  0       0       as above
    3  0.5      0       0       point

Stack "Moteur_2", child of "WingGeom"
  location (X Y Z) 16.8617 -6.557 -2.67565, rotation 0 0 180; relative location 3.55 -13.114 -0.9, rotation 0 0 180
  bounding box size 3.86245 2.072 2.072
  cross sections:
    n  XDelta   YDelta  ZDelta  shape
    0  0        0       0       point
    1  1        0       0       circle Circle_Diameter=2.072
    2  2.36245  0       0       as above
    3  0.5      0       0       point

Wing "Empennage_Horizontal", child of "Fuselage"
  location (X Y Z) 30.291 0 1.19, rotation 0 0 0
  symmetric about XZ
  bounding box size 5.08437 10.314 0.368496
  totals: TotalSpan=10.314 TotalProjectedSpan=10.314 TotalChord=2.57845 TotalArea=26.5941
  root: chord 3.6835, twist 0, NACA 4-series Camber=0 CamberLoc=0.2 ThickChord=0.1
  sections:
    n  Span   Root_Chord  Tip_Chord  Area     Sweep  Sweep_Location  Dihedral  Twist  Twist_Location  tip airfoil
    1  5.157  3.6835      1.4734     13.2971  35     0               0         0      0.25            as above

Wing "Empennage_Vertical", child of "Fuselage"
  location (X Y Z) 28.7965 0 1.65, rotation 90 0 0
  bounding box size 7.3709 0.51802 6.0071
  totals: TotalSpan=6.0071 TotalProjectedSpan=6.0071 TotalChord=3.75445 TotalArea=22.5534
  root: chord 5.17855, twist 0, NACA 4-series Camber=0 CamberLoc=0.2 ThickChord=0.1
  sections:
    n  Span    Root_Chord  Tip_Chord  Area     Sweep  Sweep_Location  Dihedral  Twist  Twist_Location  tip airfoil
    1  6.0071  5.17855     2.33035    22.5534  40     0               0         0      0.25            as above

Fuselage "FuselageGeom"
  location (X Y Z) 10.2717 0 -0.84935, rotation 0 0 0
  bounding box size 10 3.3974 1.6987
  Design: Length=10
  cross sections:
    n  XLocPercent  YLocPercent  ZLocPercent  shape
    0  0            0            0            point
    1  0.11         0            0            rounded rectangle RoundRectXSec_Radius=0.2 RoundedRect_Height=1.6987 RoundedRect_Width=3.3974
    2  0.5          0            0            as above
    3  0.9          0            0            as above
    4  1            0            0            point
