OpenVSP model (file version 4), 5 components.
Geometry view with OpenVSP parameter names; values to 6 digits, angles in degrees, lengths in the model's unit.
Overall bounding box: X_Min=0 X_Len=34.65 Y_Min=-17.5727 Y_Len=35.1455 Z_Min=-2.36 Z_Len=9.58

Fuselage "Fuselage"
  location (X Y Z) 0 0 0, rotation 0 0 0
  bounding box size 34.65 3.5 3.95505
  Design: Length=34.65
  cross sections:
    n  XLocPercent  YLocPercent  ZLocPercent  shape
    0  0            0            -0.0108696   point
    1  0.25         0            0            ellipse Ellipse_Height=3.5 Ellipse_Width=3.5
    2  0.5          0            0            as above
    3  0.75         0            0            as above
    4  1            0            0.013        point

Wing "Aile", child of "Fuselage"
  location (X Y Z) 11.55 1.3 -0.5, rotation 3 -1 0
  symmetric about XZ
  bounding box size 11.2201 35.1455 1.5241
  totals: TotalSpan=32.6 TotalProjectedSpan=32.6 TotalChord=4.07 TotalArea=132.682
  root: chord 6.512, twist 0, NACA 4-series Camber=0 CamberLoc=0.2 ThickChord=0.137
  sections:
    n  Span  Root_Chord  Tip_Chord  Area    Sweep  Sweep_Location  Dihedral  Twist  Twist_Location  tip airfoil
    1  16.3  6.512       1.628      66.341  30.48  0               0         0      0.25            NACA 4-series Camber=0 CamberLoc=0.2 ThickChord=0.1

Stack "Moteur_1", child of "Aile"
  location (X Y Z) 14.4 8.36957 -1.3, rotation 0 0 0
  symmetric about XZ
  bounding box size 3.14 18.8591 2.12
  cross sections:
    n  XDelta    YDelta  ZDelta  shape
    0  0         0       0       point
    1  0.262295  0       0       ellipse Ellipse_Height=2.12 Ellipse_Width=2.12
    2  0.93      0       0       as above
    3  0.9       0       0       ellipse Ellipse_Height=1.9 Ellipse_Width=1.9
    4  1         0       0       point

Wing "Empennage_Horizontal", child of "Fuselage"
  location (X Y Z) 27 1.19565 0, rotation 3 -1 0
  symmetric about XZ
  bounding box size 4.88766 13.005 0.603741
  totals: TotalSpan=10.63 TotalProjectedSpan=10.63 TotalChord=2.75 TotalArea=29.2325
  root: chord 4.4, twist 0, NACA 4-series Camber=0 CamberLoc=0.2 ThickChord=0.1
  sections:
    n  Span   Root_Chord  Tip_Chord  Area     Sweep  Sweep_Location  Dihedral  Twist  Twist_Location  tip airfoil
    1  5.315  4.4         1.1        14.6162  35.48  0               0         0      0.25            as above

Wing "Empennage_Vertical", child of "Fuselage"
  location (X Y Z) 27 0 1.05, rotation 90 0 0
  bounding box size 6.032 0.603392 6.17
  totals: TotalSpan=6.17 TotalProjectedSpan=6.17 TotalChord=3.77 TotalArea=23.2609
  root: chord 6.032, twist 0, NACA 4-series Camber=0 CamberLoc=0.2 ThickChord=0.1
  sections:
    n  Span  Root_Chord  Tip_Chord  Area     Sweep  Sweep_Location  Dihedral  Twist  Twist_Location  tip airfoil
    1  6.17  6.032       1.508      23.2609  35     0               0         0      0.25            as above
