OpenVSP model (file version 4), 11 components.
Geometry view with OpenVSP parameter names; values to 6 digits, angles in degrees, lengths in the model's unit.
Overall bounding box: X_Min=0 X_Len=35.857 Y_Min=-17.5628 Y_Len=35.1255 Z_Min=-3.24974 Z_Len=11.1159

TransportFuse "TransportFuse"
  location (X Y Z) 0 0 0, rotation 0 0 0
  bounding box size 35.36 3.57 3.57
  Design: AftCenter=0.258333 AftHeight=0.23275 AftMult=2.4925 AftWidth=0.26575 Diameter=3.57 Length=35.36 NoseCenter=-0.133333 NoseMult=1.255
  custom script TransportFuse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

Wing "Voilure", child of "TransportFuse"
  location (X Y Z) 10.8304 0 -1.18316, rotation 0 1 0
  symmetric about XZ
  bounding box size 10.8 34.952 1.28389
  totals: TotalSpan=35 TotalProjectedSpan=34.952 TotalChord=3.8686 TotalArea=135.401
  root: chord 6.91803, twist 0, NACA 4-series Camber=0 CamberLoc=0.2 ThickChord=0.13
  sections:
    n  Span  Root_Chord  Tip_Chord  Area     Sweep    Sweep_Location  Dihedral  Twist  Twist_Location  tip airfoil
    1  8.75  6.91803     3.73724    46.6168  28.5569  0               3         1.5    0.25            NACA 4-series Camber=0 CamberLoc=0.2 ThickChord=0.1
    2  8.75  3.73724     1.0819     21.0837  29.4589  0               3         1.5    0.25            as above

Wing "Attaches Moteurs", child of "Voilure"
  location (X Y Z) 12.9521 -6.09195 -1.03448, rotation -90 0 0
  symmetric about XZ
  bounding box size 5.44735 12.6946 0.657693
  totals: TotalSpan=1.31539 TotalProjectedSpan=1.31539 TotalChord=3.95028 TotalArea=5.19614
  root: chord 5.10497, twist 0, NACA 4-series Camber=0 CamberLoc=0.2 ThickChord=0.1
  sections:
    n  Span      Root_Chord  Tip_Chord  Area     Sweep  Sweep_Location  Dihedral  Twist  Twist_Location  tip airfoil
    1  0.657693  5.10497     2.79558    2.59807  -27.5  0               0         0      0.25            as above

Duct "Nacelles", child of "Attaches Moteurs"
  location (X Y Z) 13.0357 -6.092 -2.38095, rotation 0 0 0
  symmetric about XZ
  bounding box size 2.56743 13.8982 1.73757
  Design: Camber=0 CamberLoc=1 Chord=2.56743 Height=1.5 InvertFlag=0 Shape=0 ThickChord=0.0833333 Width=1.5
  custom script Duct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

Ellipsoid "Moteurs", child of "Attaches Moteurs"
  location (X Y Z) 12.1652 -6.092 -2.38839, rotation 0 0 0
  symmetric about XZ
  bounding box size 3.48333 13.544 1.36
  Design: A_Radius=1.74167 B_Radius=0.68 C_Radius=0.68

Disk "Pâles", child of "Moteurs"
  location (X Y Z) 12.154 -6.092 -2.388, rotation 0 0 0
  symmetric about XZ
  bounding box size 0 13.684 1.5
  Design: Diameter=1.5
  custom script Disk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

Wing "Wingtip_above", child of "Voilure"
  location (X Y Z) 20.7903 -17.4784 -0.460349, rotation 92.9885 0 -1; relative location 9.94582 -17.4784 0.896525, rotation 92.9881 0.052133 -0.00135971
  symmetric about XZ
  bounding box size 0.500904 35.0473 0.757404
  totals: TotalSpan=1.51248 TotalProjectedSpan=1.51248 TotalChord=0.307531 TotalArea=0.465135
  root: chord 0.492049, twist 0, NACA 4-series Camber=0 CamberLoc=0.2 ThickChord=0.1
  sections:
    n  Span      Root_Chord  Tip_Chord  Area      Sweep  Sweep_Location  Dihedral  Twist  Twist_Location  tip airfoil
    1  0.756241  0.492049    0.123012   0.232567  25.75  0               0         0      0.25            as above

Wing "Wintip_below", child of "Voilure"
  location (X Y Z) 20.79 -17.478 -0.46, rotation -96.8966 0 1; relative location 9.9455 -17.478 0.896868, rotation -96.8955 0.120071 0.00723398
  symmetric about XZ
  bounding box size 0.483512 35.1255 0.654245
  totals: TotalSpan=1.29808 TotalProjectedSpan=1.29808 TotalChord=0.300481 TotalArea=0.390047
  root: chord 0.480769, twist 0, NACA 4-series Camber=0 CamberLoc=0.2 ThickChord=0.1
  sections:
    n  Span      Root_Chord  Tip_Chord  Area      Sweep  Sweep_Location  Dihedral  Twist  Twist_Location  tip airfoil
    1  0.649039  0.480769    0.120192   0.195024  30     0               0         0      0.25            as above

Wing "Empennage Vertical", child of "TransportFuse"
  location (X Y Z) 28.659 0 1.03448, rotation 90 0 0
  bounding box size 7.19805 0.536723 6.83165
  totals: TotalSpan=6.83165 TotalProjectedSpan=6.83165 TotalChord=3.89 TotalArea=26.5751
  root: chord 5.36552, twist 0, NACA 4-series Camber=0 CamberLoc=0.2 ThickChord=0.1
  sections:
    n  Span     Root_Chord  Tip_Chord  Area     Sweep  Sweep_Location  Dihedral  Twist  Twist_Location  tip airfoil
    1  6.83165  5.36552     2.41448    26.5751  35     0               0         0      0.25            as above

Wing "Empennage Horizontal", child of "TransportFuse"
  location (X Y Z) 29.4902 0.574713 0.45977, rotation 0 0 0
  symmetric about XZ
  bounding box size 4.82895 11.6111 0.563045
  totals: TotalSpan=10.476 TotalProjectedSpan=10.4617 TotalChord=2.88817 TotalArea=30.2565
  root: chord 4.13793, twist 0, NACA 4-series Camber=0 CamberLoc=0.2 ThickChord=0.1
  sections:
    n  Span     Root_Chord  Tip_Chord  Area     Sweep    Sweep_Location  Dihedral  Twist  Twist_Location  tip airfoil
    1  5.23801  4.13793     1.63841    15.1283  31.3462  0               3         0      0.25            as above

Ellipsoid "Lien Ailes-Fuselage", child of "TransportFuse"
  location (X Y Z) 10.6548 0 -1.36905, rotation 0 0.47619 0
  bounding box size 8.25524 4.95 1.24197
  Design: A_Radius=4.125 B_Radius=2.475 C_Radius=0.602083
