OpenVSP model (file version 4), 10 components.
Geometry view with OpenVSP parameter names; values to 6 digits, angles in degrees, lengths in the model's unit.
Overall bounding box: X_Min=0 X_Len=37.5312 Y_Min=-16.4878 Y_Len=32.9756 Z_Min=-3.83862 Z_Len=11.073

Fuselage "Fuselage"
  location (X Y Z) 0 0 0, rotation 0 0 0
  bounding box size 36.09 4 4.0064
  Design: Length=36.09
  cross sections:
    n   XLocPercent  YLocPercent  ZLocPercent  shape
    0   0            0            -0.0122283   point
    1   0.0241572    0            -0.0122283   ellipse Ellipse_Height=1.4 Ellipse_Width=1.6
    2   0.0605952    0            -0.0071106   ellipse Ellipse_Height=2.5 Ellipse_Width=2.8
    3   0.0974945    0            0.00116796   ellipse Ellipse_Height=3.6 Ellipse_Width=3.5
    4   0.189371     0            0            ellipse Ellipse_Height=4 Ellipse_Width=4
    5   0.5          0            0            as above
    6   0.722112     0            0            ellipse Ellipse_Height=4 Ellipse_Width=3.3
    7   0.846345     0            0.0091712    ellipse Ellipse_Height=3 Ellipse_Width=2.3
    8   0.929244     0            0.0192952    ellipse Ellipse_Height=1.9 Ellipse_Width=1.4
    9   0.981658     0            0.0271739    ellipse Ellipse_Height=0.942727 Ellipse_Width=0.7
    10  1            0            0.0321739    point

Wing "Aile"
  location (X Y Z) 12.03 1 -1.2, rotation 0 0 0
  symmetric about XZ
  bounding box size 10.1899 32.9756 1.58975
  totals: TotalSpan=32.806 TotalProjectedSpan=30.9756 TotalChord=2.12316 TotalArea=112.283
  root: chord 6.20618, twist 0, NACA 4-series Camber=0 CamberLoc=0.2 ThickChord=0.1
  sections:
    n  Span    Root_Chord  Tip_Chord  Area      Sweep   Sweep_Location  Dihedral  Twist  Twist_Location  tip airfoil
    1  15.403  6.20618     1          55.4984   30.476  0               1         0      0.25            as above
    2  1       1           0.286458   0.643229  40      0               85        0      0.25            as above

Wing "Empennage_Horizontal"
  location (X Y Z) 31.9 0.15 1.05, rotation 0 0 0
  symmetric about XZ
  bounding box size 5.63122 12.9721 0.399793
  totals: TotalSpan=12.674 TotalProjectedSpan=12.6721 TotalChord=2.59533 TotalArea=32.8932
  root: chord 3.99665, twist 0, NACA 4-series Camber=0 CamberLoc=0.2 ThickChord=0.1
  sections:
    n  Span   Root_Chord  Tip_Chord  Area     Sweep  Sweep_Location  Dihedral  Twist  Twist_Location  tip airfoil
    1  6.337  3.99665     1.194      16.4466  35     0               1         0      0.25            as above

Wing "Empennage_Vertical"
  location (X Y Z) 29.8 0 1.30435, rotation 90 0 0
  symmetric about XZ
  bounding box size 6.80586 0.609194 5.93
  totals: TotalSpan=11.86 TotalProjectedSpan=11.86 TotalChord=3.96 TotalArea=46.9656
  root: chord 6.09, twist 0, NACA 4-series Camber=0 CamberLoc=0.2 ThickChord=0.1
  sections:
    n  Span  Root_Chord  Tip_Chord  Area     Sweep  Sweep_Location  Dihedral  Twist  Twist_Location  tip airfoil
    1  5.93  6.09        1.83       23.4828  40     0               0         0      0.25            as above

Custom "Moteur_1"
  location (X Y Z) 14.5 6 -2.63333, rotation 0 0 0
  bounding box size 2.89 2.37818 2.41057
  Design: Camber=0 CamberLoc=0.2 Chord=2.89 Height=1.8 InvertFlag=0 Shape=0 ThickChord=0.2 Width=1.8
  custom script Duct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

Custom "TransportFuse", child of "Moteur_1"
  location (X Y Z) 13.0333 6 -2.63333, rotation 0 0 0
  bounding box size 4.1001 1.65085 1.65085
  Design: AftCenter=0 AftHeight=0.48025 AftMult=2.3275 AftWidth=0.50335 Diameter=1.65085 Length=4.1 NoseCenter=0 NoseMult=2.6575
  custom script TransportFuse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

Wing "WingGeom", child of "Moteur_1"
  location (X Y Z) 13.3548 6 -1.73913, rotation 0 0 0
  bounding box size 3.65981 0 0.812372
  totals: TotalSpan=0.593751 TotalProjectedSpan=1e-06 TotalChord=2.18534 TotalArea=1.29755
  root: chord 2.34218, twist 0, NACA 4-series Camber=0 CamberLoc=0.2 ThickChord=0.1
  sections:
    n  Span      Root_Chord  Tip_Chord  Area     Sweep  Sweep_Location  Dihedral  Twist  Twist_Location  tip airfoil
    1  0.593751  2.34218     2.0285     1.29755  70     0               90        0      0.25            as above

Custom "Moteur_2"
  location (X Y Z) 14.5 -6 -2.63333, rotation 0 0 0
  bounding box size 2.89 2.37818 2.41057
  Design: Camber=0 CamberLoc=0.2 Chord=2.89 Height=1.8 InvertFlag=0 Shape=0 ThickChord=0.2 Width=1.8
  custom script Duct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

Custom "TransportFuse", child of "Moteur_2"
  location (X Y Z) 13.0333 -6 -2.63333, rotation 0 0 0
  bounding box size 4.1001 1.65085 1.65085
  Design: AftCenter=0 AftHeight=0.48025 AftMult=2.3275 AftWidth=0.50335 Diameter=1.65085 Length=4.1 NoseCenter=0 NoseMult=2.6575
  custom script TransportFuse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

Wing "WingGeom", child of "Moteur_2"
  location (X Y Z) 13.3548 -6 -1.73913, rotation 0 0 0
  bounding box size 3.65981 0 0.812372
  totals: TotalSpan=0.593751 TotalProjectedSpan=1e-06 TotalChord=2.18534 TotalArea=1.29755
  root: chord 2.34218, twist 0, NACA 4-series Camber=0 CamberLoc=0.2 ThickChord=0.1
  sections:
    n  Span      Root_Chord  Tip_Chord  Area     Sweep  Sweep_Location  Dihedral  Twist  Twist_Location  tip airfoil
    1  0.593751  2.34218     2.0285     1.29755  70     0               90        0      0.25            as above
