OpenVSP model (file version 4), 8 components.
Geometry view with OpenVSP parameter names; values to 6 digits, angles in degrees, lengths in the model's unit.
Overall bounding box: X_Min=0 X_Len=39.9382 Y_Min=-17.8161 Y_Len=35.6322 Z_Min=-3.22042 Z_Len=12.4671

Fuselage "Fuselage"
  location (X Y Z) 0 0 0, rotation 0 0 0
  bounding box size 36.8074 4.37098 4.34922
  Design: Length=36.8
  cross sections:
    n   XLocPercent  YLocPercent  ZLocPercent  shape
    0   0            0            -0.0142663   point
    1   0.0395402    0            -0.0118886   general fuselage BotStr=0.83 BotTanAngle=90 CornerRad=0 Height=2.13698 LowStr=0.83 MaxWidthLoc=0 TopStr=0.83 TopTanAngle=90 UpStr=0.83 Width=2.5699
    2   0.0655441    0            -0.00339674  general fuselage BotStr=0.83 BotTanAngle=90 CornerRad=0 Height=3.16911 LowStr=0.83 MaxWidthLoc=0 TopStr=0.83 TopTanAngle=90 UpStr=0.83 Width=3.34061
    3   0.25         0            0            general fuselage BotStr=0.83 BotTanAngle=90 CornerRad=0 Height=4.2 LowStr=0.83 MaxWidthLoc=0 TopStr=0.83 TopTanAngle=90 UpStr=0.83 Width=4.2
    4   0.375        0            0            general fuselage BotStr=1.71654 BotTanAngle=90 CornerRad=0 Height=4.2 LowStr=1.46378 MaxWidthLoc=0 TopStr=0.83 TopTanAngle=90 UpStr=0.83 Width=4.2
    5   0.5          0            0            general fuselage BotStr=1.74426 BotTanAngle=90 CornerRad=0 Height=4.2 LowStr=1.72415 MaxWidthLoc=0 TopStr=0.83 TopTanAngle=90 UpStr=0.83 Width=4.2
    6   0.638587     0            0            general fuselage BotStr=1.21445 BotTanAngle=90 CornerRad=0 Height=4.2 LowStr=0.973227 MaxWidthLoc=0 TopStr=0.83 TopTanAngle=90 UpStr=0.83 Width=4.2
    7   0.754        0            0.00271739   general fuselage BotStr=0.83 BotTanAngle=90 CornerRad=0 Height=3.86573 LowStr=0.83 MaxWidthLoc=0 TopStr=0.83 TopTanAngle=90 UpStr=0.83 Width=4
    8   0.875        0            0.0152853    general fuselage BotStr=0.83 BotTanAngle=90 CornerRad=0 Height=2.72222 LowStr=0.83 MaxWidthLoc=0 TopStr=0.83 TopTanAngle=90 UpStr=0.83 Width=2.60712
    9   0.953804     0            0.0244565    general fuselage BotStr=0.83 BotTanAngle=90 CornerRad=0 Height=1.82183 LowStr=0.83 MaxWidthLoc=0 TopStr=0.83 TopTanAngle=90 UpStr=0.83 Width=1.53799
    10  0.989762     0            0.0285326    general fuselage BotStr=0.83 BotTanAngle=90 CornerRad=0 Height=1.33958 LowStr=0.83 MaxWidthLoc=0 TopStr=0.83 TopTanAngle=90 UpStr=0.83 Width=0.954617
    11  1            0            0.029212     ellipse Ellipse_Height=1.01501 Ellipse_Width=0

Wing "Aile", child of "Fuselage"
  location (X Y Z) 12.2666 0 -1.28261, rotation 0 0 0
  symmetric about XZ
  bounding box size 11.8598 35.6322 1.88082
  totals: TotalSpan=35.02 TotalProjectedSpan=34.9987 TotalChord=3.8922 TotalArea=136.305
  root: chord 6.22734, twist 0, NACA 4-series Camber=0 CamberLoc=0.2 ThickChord=0.13709
  sections:
    n  Span   Root_Chord  Tip_Chord  Area     Sweep    Sweep_Location  Dihedral  Twist  Twist_Location  tip airfoil
    1  17.51  6.22734     1.55706    68.1524  30.4762  0               2         3      0.25            CST airfoil ContLERad=1 Invert=1 LowDegree=2 ThickChord=0.156818 UpDegree=2 Au=[0.0887243 0.0296989 0.186285] Al=[-0.0887243 -0.0998452 -0.381407]

Wing "Empennage_Horizontal", child of "Fuselage"
  location (X Y Z) 32.943 0 1, rotation 0 0 0
  symmetric about XZ
  bounding box size 5.65051 11.6089 0.659604
  totals: TotalSpan=11.183 TotalProjectedSpan=11.1677 TotalChord=2.79576 TotalArea=31.265
  root: chord 3.85622, twist 0, NACA 4-series Camber=0 CamberLoc=0.2 ThickChord=0.13
  sections:
    n  Span    Root_Chord  Tip_Chord  Area     Sweep  Sweep_Location  Dihedral  Twist  Twist_Location  tip airfoil
    1  5.5915  3.85622     1.7353     15.6325  35     0               3         0      0.25            as above

Wing "Empennage_Vertical", child of "Fuselage"
  location (X Y Z) 29.5 0 1.55, rotation 90 0 0
  bounding box size 10.4382 0.800169 7.69672
  totals: TotalSpan=7.52067 TotalProjectedSpan=7.52067 TotalChord=5.57327 TotalArea=35.3501
  root: chord 6.4833, twist 0, NACA 4-series Camber=0 CamberLoc=0.2 ThickChord=0.123381
  sections:
    n  Span      Root_Chord  Tip_Chord  Area     Sweep  Sweep_Location  Dihedral  Twist  Twist_Location  tip airfoil
    1  0.470042  6.4833      6.26044    2.99504  45     0               0         0      0.25            NACA 4-series Camber=0 CamberLoc=0.2 DeltaX=-0.035 Scale=1.035 ThickChord=0.123381
    2  0.235021  6.26044     6.149      1.45824  45     0               0         0      0.25            NACA 4-series Camber=0 CamberLoc=0.2 DeltaX=-0.02 Scale=1.02 ThickChord=0.123381
    3  0.235021  6.149       6.03757    1.43205  45     0               0         0      0.25            NACA 4-series Camber=0 CamberLoc=0.2 DeltaX=-0.015 Scale=1.015 ThickChord=0.123381
    4  0.940084  6.03757     5.59185    5.46631  45     0               0         0      0.25            NACA 4-series Camber=0 CamberLoc=0.2 ThickChord=0.123381
    5  1.88017   5.59185     4.70039    9.67557  45     0               0         0      0.25            as above
    6  3.76034   4.70039     2.91749    14.3229  45     0               0         0      0.25            as above

Custom "Seat_PAX"
  location (X Y Z) 29 -1.38 -0.21, rotation 0 -90 0
  bounding box size 24.7812 3.145 1.28227
  Design: BackAngle=15 BackHeight=0.9 BackThick=0.1 SeatHeight=0.35 SeatLength=0.5 Width=0.44
  Layout: AisleWidth=0.5 NumLeft=3 NumMiddle=0 NumRight=3 NumRow=33 SeatGap=0.001 SeatPitch=0.75
  custom script SeatGroup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

Custom "Seat_PNT"
  location (X Y Z) 2.20238 -0.47619 -0.238095, rotation 0 -90 0
  bounding box size 0.967934 1.51095 1.32744
  Design: BackAngle=25 BackHeight=1 BackThick=0.1 SeatHeight=0.35 SeatLength=0.5 Width=0.5
  Layout: AisleWidth=1 NumLeft=0 NumMiddle=2 NumRight=0 NumRow=1 SeatGap=0.51095 SeatPitch=3.48402
  custom script SeatGroup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

Custom "Seat_PNC"
  location (X Y Z) 3.86905 -1.33929 -0.238095, rotation 0 -90 0
  bounding box size 0.967934 3.14691 1.32744
  Design: BackAngle=25 BackHeight=1 BackThick=0.1 SeatHeight=0.35 SeatLength=0.5 Width=0.5
  Layout: AisleWidth=1.14391 NumLeft=2 NumMiddle=0 NumRight=2 NumRow=1 SeatGap=0.001 SeatPitch=0.225717
  custom script SeatGroup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

Custom "Moteurs_1_et_2"
  location (X Y Z) 15.5357 6.66667 -2.08333, rotation 0 0 0
  symmetric about XZ
  bounding box size 4.27 15.577 2.27418
  Design: Camber=0 CamberLoc=0 Chord=4.27 Height=1.21 InvertFlag=0 Shape=0 ThickChord=0.242 Width=1.21
  custom script Duct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
