OpenVSP model (file version 4), 6 components.
Geometry view with OpenVSP parameter names; values to 6 digits, angles in degrees, lengths in the model's unit.
Overall bounding box: X_Min=0 X_Len=17.9329 Y_Min=-8.475 Y_Len=16.95 Z_Min=-1.94825 Z_Len=4.83086

Fuselage "Fuselage"
  location (X Y Z) 0 0 0, rotation 0 0 0
  bounding box size 17.25 1.95 1.92846
  Design: Length=17.25
  cross sections:
    n  XLocPercent  YLocPercent  ZLocPercent  shape
    0  0            0            -0.092       point
    1  0.0480183    0            -0.0853659   ellipse Ellipse_Height=0.729592 Ellipse_Width=1.21173
    2  0.114565     0            -0.072561    ellipse Ellipse_Height=1.16327 Ellipse_Width=1.72194
    3  0.257928     0            -0.05        ellipse Ellipse_Height=1.9 Ellipse_Width=1.95
    4  0.467959     0            -0.05        as above
    5  0.630389     0            -0.0483343   ellipse Ellipse_Height=1.84975 Ellipse_Width=1.53061
    6  0.968448     0            -0.022       ellipse Ellipse_Height=0.663265 Ellipse_Width=0.382653
    7  0.987879     0            -0.02        ellipse Ellipse_Height=0.598449 Ellipse_Width=0.264864
    8  1            0            -0.0196037   point

Wing "Ailes", child of "Fuselage"
  location (X Y Z) 6.08696 0 -1.73913, rotation 0 0 0
  symmetric about XZ
  bounding box size 5.63434 16.95 0.95702
  totals: TotalSpan=17.7384 TotalProjectedSpan=16.95 TotalChord=1.72283 TotalArea=34.6173
  root: chord 4.18099, twist 0, NACA 4-series Camber=0 CamberLoc=0.2 ThickChord=0.1
  sections:
    n  Span     Root_Chord  Tip_Chord  Area     Sweep  Sweep_Location  Dihedral  Twist  Twist_Location  tip airfoil
    1  2.87328  4.18099     2.11263    9.04165  35     0               1         0      0.25            as above
    2  5.4683   2.11263     0.802083   7.96926  26     0               1.8       0      0.25            as above
    3  0.52764  0.802083    0.326565   0.29776  50     0               75        0      0.25            as above

Wing "Empennage_Vertical", child of "Fuselage"
  location (X Y Z) 14.3913 0 -0.217391, rotation 90 0 0
  bounding box size 3.54158 0.277193 3.1
  totals: TotalSpan=3.1 TotalProjectedSpan=3.1 TotalChord=1.90104 TotalArea=5.89323
  root: chord 2.77083, twist 0, NACA 4-series Camber=0 CamberLoc=0.2 ThickChord=0.1
  sections:
    n  Span  Root_Chord  Tip_Chord  Area     Sweep  Sweep_Location  Dihedral  Twist  Twist_Location  tip airfoil
    1  3.1   2.77083     1.03125    5.89323  39     0               0         0      0.25            as above

Wing "Empennage_Horizontal", child of "Empennage_Vertical"
  location (X Y Z) 15.2826 0 0.434783, rotation 0 0 0
  symmetric about XZ
  bounding box size 2.4919 6.2 0.160378
  totals: TotalSpan=6.2 TotalProjectedSpan=6.2 TotalChord=1.11572 TotalArea=6.91746
  root: chord 1.60221, twist 0, NACA 4-series Camber=0 CamberLoc=0.2 ThickChord=0.1
  sections:
    n  Span  Root_Chord  Tip_Chord  Area     Sweep  Sweep_Location  Dihedral  Twist  Twist_Location  tip airfoil
    1  3.1   1.60221     0.629231   3.45873  31     0               0         0      0.25            as above

Wing "Support_moteurs", child of "Fuselage"
  location (X Y Z) 12.2174 0 -0.1, rotation 0 0 0
  symmetric about XZ
  bounding box size 2.6 1.78125 0.260103
  totals: TotalSpan=1.78125 TotalProjectedSpan=1.78125 TotalChord=2.6 TotalArea=4.63125
  root: chord 2.6, twist 0, NACA 4-series Camber=0 CamberLoc=0.2 ThickChord=0.1
  sections:
    n  Span      Root_Chord  Tip_Chord  Area     Sweep  Sweep_Location  Dihedral  Twist  Twist_Location  tip airfoil
    1  0.890626  2.6         2.6        2.31563  0      0               0         0      0.25            as above

Custom "Moteurs_1_2", child of "Support_moteurs"
  location (X Y Z) 13.4674 1.13 -0.2, rotation 0 0 0; relative location 1.25 1.13 -0.1, rotation 0 0 0
  symmetric about XZ
  bounding box size 2.8 3.26439 1.11009
  Design: Camber=0 CamberLoc=0.2 Chord=2.8 Height=0.734267 InvertFlag=0 Shape=0 ThickChord=0.129167 Width=0.642608
  custom script Duct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
