OpenVSP model (file version 4), 7 components.
Geometry view with OpenVSP parameter names; values to 6 digits, angles in degrees, lengths in the model's unit.
Overall bounding box: X_Min=-0.0246457 X_Len=15.6943 Y_Min=-7.5765 Y_Len=15.153 Z_Min=-1.10698 Z_Len=3.70698

Fuselage "Fuselage"
  location (X Y Z) 0 0 0, rotation 0 0 0
  bounding box size 14.5976 1.74 1.90726
  Design: Length=14.53
  cross sections:
    n  XLocPercent  YLocPercent  YRotate   ZLocPercent  shape
    0  0            0            0         -0.0323724   point
    1  0.125378     0            0         -0.0229797   ellipse Ellipse_Height=1 Ellipse_Width=1.65
    2  0.224829     0            0         0.002        ellipse Ellipse_Height=1.74 Ellipse_Width=1.74
    3  0.337844     0            0         0.002        general fuselage BotStr=0.972727 BotTanAngle=90 CornerRad=0.35 Height=1.74 LowStr=0.45 MaxWidthLoc=0 TopStr=0.83 TopTanAngle=90 UpStr=0.83 Width=1.74
    4  0.463241     0            0         -0.0035      general fuselage BotStr=1.45 BotTanAngle=90 CornerRad=0.35 Height=1.9 LowStr=1 MaxWidthLoc=0 TopStr=0.83 TopTanAngle=90 UpStr=0.83 Width=1.74
    5  0.555514     0            0         -0.003       as above
    6  0.674577     0            0         0.002        general fuselage BotStr=1.30909 BotTanAngle=90 CornerRad=0.35 Height=1.74 LowStr=0.72314 MaxWidthLoc=0 TopStr=0.83 TopTanAngle=90 UpStr=0.83 Width=1.74
    7  0.750595     0            0         0.00475543   general fuselage BotStr=1.49091 BotTanAngle=90 CornerRad=0.35 Height=1.45 LowStr=0.799752 MaxWidthLoc=0 TopStr=0.83 TopTanAngle=90 UpStr=0.83 Width=1.7
    8  0.860633     0            0         0.017        ellipse Ellipse_Height=0.935213 Ellipse_Width=0.621818
    9  1            0            -22.0909  0.0287911    rounded rectangle RoundRectXSec_Radius=0.0227273 RoundedRect_Height=0.228306 RoundedRect_Width=0.0454545

Wing "Aile", child of "Fuselage"
  location (X Y Z) 5.95238 0 -0.8, rotation 0 0 0
  symmetric about XZ
  bounding box size 2.35048 15.153 0.887938
  totals: TotalSpan=15.19 TotalProjectedSpan=15.153 TotalChord=1.61596 TotalArea=24.5464
  root: chord 2.35048, twist 0, NACA 4-series Camber=0 CamberLoc=0.2 ThickChord=0.225
  sections:
    n  Span   Root_Chord  Tip_Chord  Area     Sweep  Sweep_Location  Dihedral  Twist  Twist_Location  tip airfoil
    1  7.595  2.35048     0.881431   12.2732  4      0               4         0      0.25            NACA 4-series Camber=0 CamberLoc=0.2 ThickChord=0.1

Wing "Empennage_Vertical", child of "Fuselage"
  location (X Y Z) 11.8 0 0.52, rotation 90 0 0
  symmetric about XZ
  bounding box size 3.58148 0.311261 2.08
  totals: TotalSpan=4.16 TotalProjectedSpan=4.16 TotalChord=2.09135 TotalArea=8.7
  root: chord 2.68121, twist 0, NACA 4-series Camber=0 CamberLoc=0.2 ThickChord=0.1
  sections:
    n  Span  Root_Chord  Tip_Chord  Area  Sweep  Sweep_Location  Dihedral  Twist  Twist_Location  tip airfoil
    1  2.08  2.68121     1.50148    4.35  45     0               0         0      0.25            as above

Wing "Empennage_Horizontal", child of "Empennage_Vertical"
  location (X Y Z) 13.7 0 2.38095, rotation 0 0 0
  symmetric about XZ
  bounding box size 1.96966 7.265 0.149977
  totals: TotalSpan=7.265 TotalProjectedSpan=7.265 TotalChord=0.904336 TotalArea=6.57
  root: chord 1.29191, twist 0, NACA 4-series Camber=0 CamberLoc=0.2 ThickChord=0.1
  sections:
    n  Span    Root_Chord  Tip_Chord  Area   Sweep  Sweep_Location  Dihedral  Twist  Twist_Location  tip airfoil
    1  3.6325  1.29191     0.516763   3.285  21.8   0               0         0      0.25            as above

Stack "Moteur_1"
  location (X Y Z) 8.27027 1.39785 0.642824, rotation 0 2.25806 0
  bounding box size 2.25042 0.82934 0.829981
  cross sections:
    n  XDelta     YDelta  ZDelta  shape
    0  0          0       0       point
    1  0.163842   0       0       ellipse Ellipse_Height=0.743802 Ellipse_Width=0.7438
    2  1.11727    0       0       ellipse Ellipse_Height=0.82934 Ellipse_Width=0.82934
    3  0.45592    0       0       ellipse Ellipse_Height=0.7 Ellipse_Width=0.7
    4  0.444771   0       0       ellipse Ellipse_Height=0.480184 Ellipse_Width=0.48018
    5  0.0678657  0       0       point

Box "Pilon"
  location (X Y Z) 8.58824 0.714286 0.47619, rotation 20 2.47059 0
  symmetric about XZ
  bounding box size 2.50372 2.54924 0.580728
  Design: Height=0.120789 Length=2.50083 SquareFlag=0 Width=1.07019
  custom script Box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

Stack "Moteur_2"
  location (X Y Z) 8.27027 -1.398 0.642824, rotation 0 2.25806 0
  bounding box size 2.25042 0.82934 0.829981
  cross sections:
    n  XDelta     YDelta  ZDelta  shape
    0  0          0       0       point
    1  0.163842   0       0       ellipse Ellipse_Height=0.743802 Ellipse_Width=0.7438
    2  1.11727    0       0       ellipse Ellipse_Height=0.82934 Ellipse_Width=0.82934
    3  0.45592    0       0       ellipse Ellipse_Height=0.7 Ellipse_Width=0.7
    4  0.444771   0       0       ellipse Ellipse_Height=0.480184 Ellipse_Width=0.48018
    5  0.0678657  0       0       point
