OpenVSP model (file version 4), 8 components.
Geometry view with OpenVSP parameter names; values to 6 digits, angles in degrees, lengths in the model's unit.
Overall bounding box: X_Min=0 X_Len=34.9003 Y_Min=-14.0266 Y_Len=28.0533 Z_Min=-2.035 Z_Len=7.13762

Custom "Fuselage"
  location (X Y Z) 0 0 0, rotation 0 0 0
  bounding box size 32.5 3.3 3.73028
  Design: AftCenter=0.275 AftHeight=0.46375 AftMult=2.905 AftWidth=0.01 Diameter=3.3 Length=32.5 NoseCenter=-0.283333 NoseMult=1.255
  custom script TransportFuse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

Wing "Support moteur", child of "Fuselage"
  location (X Y Z) 22.6087 0 0.434783, rotation 0 0 0
  symmetric about XZ
  bounding box size 5.54495 5.95467 0.554672
  totals: TotalSpan=5.95467 TotalProjectedSpan=5.95467 TotalChord=4.56033 TotalArea=27.1553
  root: chord 5.54495, twist 0, NACA 4-series Camber=0 CamberLoc=0 ThickChord=0.1
  sections:
    n  Span     Root_Chord  Tip_Chord  Area     Sweep  Sweep_Location  Dihedral  Twist     Twist_Location  tip airfoil
    1  2.97734  5.54495     3.5757     13.5776  0      0               0         -5.45455  0.25            NACA 4-series Camber=0 CamberLoc=0.2 ThickChord=0.1

Fuselage "Moteur_1", child of "Fuselage"
  location (X Y Z) 20.7609 -2.7 0.434783, rotation 0 0 0
  bounding box size 7.51378 2.48196 2.48196
  Design: Length=6.413
  cross sections:
    n  XLocPercent  YLocPercent  ZLocPercent  shape
    0  1            0            0            circle Circle_Diameter=0.829091
    1  0.25         0            0            circle Circle_Diameter=1.97045
    2  0.5          0            0            circle Circle_Diameter=1.95
    3  0.75         0            0            circle Circle_Diameter=1.92
    4  1            0            0            circle Circle_Diameter=0.829091

Fuselage "Moteur_2", child of "Fuselage"
  location (X Y Z) 20.7609 2.7 0.434783, rotation 0 0 0
  bounding box size 7.51378 2.48196 2.48196
  Design: Length=6.413
  cross sections:
    n  XLocPercent  YLocPercent  ZLocPercent  shape
    0  1            0            0            circle Circle_Diameter=0.829091
    1  0.25         0            0            circle Circle_Diameter=1.97045
    2  0.5          0            0            circle Circle_Diameter=1.95
    3  0.75         0            0            circle Circle_Diameter=1.92
    4  1            0            0            circle Circle_Diameter=0.829091

Wing "Aile"
  location (X Y Z) 13.696 0 -0.869565, rotation 0 0 0
  symmetric about XZ
  bounding box size 6.81944 28.0533 0.957955
  totals: TotalSpan=28.08 TotalProjectedSpan=28.0533 TotalChord=2.06348 TotalArea=97.0011
  root: chord 5.57806, twist 0, NACA 4-series Camber=0 CamberLoc=0.2 Invert=1 ThickChord=0.1
  sections:
    n  Span         Root_Chord  Tip_Chord  Area         Sweep  Sweep_Location  Dihedral  Twist  Twist_Location  tip airfoil
    1  14.0393      5.57806     1.33113    48.5001      17.5   0.25            2.5       0      0.25            NACA 4-series Camber=0 CamberLoc=0.2 ThickChord=0.1
    2  0.000697391  1.33113     0.013591   0.000468897  17.5   0.25            0         0      0.25            NACA 4-series Camber=0 CamberLoc=0.2 ThickChord=0

Wing "Empennage_Horizontal"
  location (X Y Z) 30.6522 0 4.67391, rotation 0 0 0
  symmetric about XZ
  bounding box size 4.24813 10.04 0.289373
  totals: TotalSpan=10.04 TotalProjectedSpan=10.04 TotalChord=2.164 TotalArea=21.7266
  root: chord 2.89258, twist 0, NACA 4-series Camber=0 CamberLoc=0.2 ThickChord=0.1
  sections:
    n  Span  Root_Chord  Tip_Chord  Area     Sweep  Sweep_Location  Dihedral  Twist  Twist_Location  tip airfoil
    1  5.02  2.89258     1.43542    10.8633  26     0.25            0         0      0.25            as above

Wing "Empennnage_Vertical"
  location (X Y Z) 27.1304 0 1.52174, rotation 90 0 0
  symmetric about XZ
  bounding box size 6.92706 0.495682 3.58088
  totals: TotalSpan=7.16177 TotalProjectedSpan=7.16177 TotalChord=4.19458 TotalArea=30.0406
  root: chord 4.95524, twist 0, NACA 4-series Camber=0 CamberLoc=0.2 ThickChord=0.1
  sections:
    n  Span     Root_Chord  Tip_Chord  Area     Sweep  Sweep_Location  Dihedral  Twist  Twist_Location  tip airfoil
    1  3.58088  4.95524     3.43391    15.0203  41     0.25            0         0      0.25            as above

Wing "Dorsale"
  location (X Y Z) 24.5652 0 1.63043, rotation 90 0 0
  symmetric about XZ
  bounding box size 3.82438 0.269898 1.1875
  totals: TotalSpan=2.375 TotalProjectedSpan=2.375 TotalChord=1.34896 TotalArea=3.20378
  root: chord 2.69792, twist 0, NACA 4-series Camber=0 CamberLoc=0.2 ThickChord=0.1
  sections:
    n  Span    Root_Chord  Tip_Chord  Area     Sweep  Sweep_Location  Dihedral  Twist  Twist_Location  tip airfoil
    1  1.1875  2.69792     0          1.60189  72.75  0               0         0      0.25            as above
