OpenVSP model (file version 4), 9 components.
Geometry view with OpenVSP parameter names; values to 6 digits, angles in degrees, lengths in the model's unit.
Overall bounding box: X_Min=-5.7 X_Len=32.4641 Y_Min=-14.5078 Y_Len=29.0657 Z_Min=-1.73056 Z_Len=6.38056

TransportFuse "Fuselage"
  location (X Y Z) -5.7 0 0, rotation 0 0 0
  bounding box size 29.413 2.5 2.65833
  Design: AftCenter=0.17 AftHeight=0.1 AftMult=3 AftWidth=0.1 Diameter=2.5 Length=29.413 NoseCenter=-0.23 NoseMult=1.697
  custom script TransportFuse0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

Wing "Pylon", child of "Fuselage"
  location (X Y Z) 16.4733 -0.644825 0.411986, rotation 144.374 0 0; relative location -0.1 0.6 0.41, rotation 144.374 0 0
  symmetric about XZ
  bounding box size 5.24776 2.73084 0.836755
  totals: TotalSpan=1.424 TotalProjectedSpan=1.424 TotalChord=4.47238 TotalArea=6.36867
  root: chord 4.74921, twist 0, NACA 4-series Camber=0 CamberLoc=0.2 ThickChord=0.1
  sections:
    n  Span   Root_Chord  Tip_Chord  Area     Sweep  Sweep_Location  Dihedral  Twist  Twist_Location  tip airfoil
    1  0.712  4.74921     4.19555    3.18433  -35    0               0         0      0.25            as above

Fuselage "Nacelle", child of "Pylon"
  location (X Y Z) 15.3748 -1.62999 1.11796, rotation 144.374 0 0; relative location -0.6 0.5 0, rotation 0 0 0
  symmetric about XZ
  bounding box size 4.93336 4.71587 1.45589
  Design: Length=4.93336
  cross sections:
    n  XLocPercent  YLocPercent  ZLocPercent  shape
    0  1            0            0            circle Circle_Diameter=1.02064
    1  0.5          0            0            circle Circle_Diameter=0.94
    2  0            0            0            circle Circle_Diameter=0.905062
    3  0.3          0            0            circle Circle_Diameter=1.18183
    4  1            0            0            circle Circle_Diameter=1.02064

Fuselage "PowerFace", child of "Nacelle"
  location (X Y Z) 15.8748 -1.62999 1.11796, rotation 144.374 0 0; relative location 0.5 0 0, rotation 0 0 0
  symmetric about XZ
  bounding box size 4.31584 4.50796 1.24799
  Design: Length=4.31584
  cross sections:
    n  XLocPercent  YLocPercent  ZLocPercent  shape
    0  0            0            0            general fuselage BotStr=0.83 BotTanAngle=90 CornerRad=0 Height=0 LowStr=0.83 MaxWidthLoc=0 TopStr=0.83 TopTanAngle=90 UpStr=0.83 Width=0
    1  0            0            0            circle Circle_Diameter=1.1
    2  1            0            0            circle Circle_Diameter=1
    3  1            0            0            point

Wing "VTail"
  location (X Y Z) 19.419 0 0.5, rotation 90 0 0
  bounding box size 5.63524 0.480079 4.15
  totals: TotalSpan=4.15 TotalProjectedSpan=4.15 TotalChord=3.4324 TotalArea=14.2445
  root: chord 4.13542, twist 0, NACA 4-series Camber=0 CamberLoc=0.2 ThickChord=0.1
  sections:
    n  Span  Root_Chord  Tip_Chord  Area     Sweep  Sweep_Location  Dihedral  Twist  Twist_Location  tip airfoil
    1  4.15  4.13542     2.72938    14.2445  35     0               0         0      0.25            as above

Wing "HTail", child of "VTail"
  location (X Y Z) 22.159 0 4.375, rotation 0 0 0; relative location 2.74 0 3.875, rotation 0 0 0
  symmetric about XZ
  bounding box size 4.6051 10.72 0.307637
  totals: TotalSpan=10.72 TotalProjectedSpan=10.72 TotalChord=2.08025 TotalArea=22.3003
  root: chord 2.65, twist 0, NACA 4-series Camber=0 CamberLoc=0.2 ThickChord=0.1
  sections:
    n  Span  Root_Chord  Tip_Chord  Area     Sweep  Sweep_Location  Dihedral  Twist  Twist_Location  tip airfoil
    1  5.36  2.65        1.5105     11.1501  30     0               0         0      0.25            as above

Fuselage "GearPod"
  location (X Y Z) 5.1 0 -1.01, rotation 0 0 0
  bounding box size 8.25 1.65 1.44113
  Design: Length=8.25
  cross sections:
    n  XLocPercent  YLocPercent  ZLocPercent  shape
    0  0            0            0            point
    1  0.175        0            0            rounded rectangle RoundRectXSec_Radius=0.125 RoundedRect_Height=0.75 RoundedRect_Width=1.65
    2  0.825        0            0            as above
    3  1            0            0            point

Wing "Wing", child of "GearPod"
  location (X Y Z) 5.8 0.025 -1.13381, rotation 4 0 0; relative location 0.7 0.025 -0.12381, rotation 4 0 0
  symmetric about XZ
  bounding box size 8.73678 28.4607 1.42261
  totals: TotalSpan=28.468 TotalProjectedSpan=28.468 TotalChord=3.71048 TotalArea=105.63 RelativeDihedralFlag=1
  root: chord 5.93677, twist 0, NACA 4-series Camber=0 CamberLoc=0.2 ThickChord=0.1
  sections:
    n  Span    Root_Chord  Tip_Chord  Area    Sweep  Sweep_Location  Dihedral  Twist  Twist_Location  tip airfoil
    1  14.234  5.93677     1.48419    52.815  27     0               0         0      0.25            as above

Wing "WingGeom", child of "Wing"
  location (X Y Z) 13.07 14.175 -0.129048, rotation 78.525 0 0; relative location 7.27 14.15 1.00476, rotation 78.525 0 0
  symmetric about XZ
  bounding box size 1.94538 29.0657 1.78579
  totals: TotalSpan=3.6 TotalProjectedSpan=3.6 TotalChord=0.9425 TotalArea=3.393
  root: chord 1.45, twist 0, NACA 4-series Camber=0 CamberLoc=0.2 ThickChord=0.1
  sections:
    n  Span  Root_Chord  Tip_Chord  Area    Sweep  Sweep_Location  Dihedral  Twist  Twist_Location  tip airfoil
    1  1.8   1.45        0.435      1.6965  40     0               0         0      0.25            as above
