OpenVSP model (file version 4), 10 components.
Geometry view with OpenVSP parameter names; values to 6 digits, angles in degrees, lengths in the model's unit.
Overall bounding box: X_Min=0 X_Len=23.852 Y_Min=-14.4082 Y_Len=28.8163 Z_Min=-1.248 Z_Len=6.22402

Custom "Fuselage"
  location (X Y Z) 0 0 0, rotation 0 0 0
  bounding box size 23.19 2.34 2.418
  Design: AftCenter=0.3 AftHeight=0.3 AftMult=3 AftWidth=0.1 Diameter=2.34 Length=23.19 NoseCenter=-0.2 NoseMult=1.5
  custom script TransportFuse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

Wing "Aile", child of "Fuselage"
  location (X Y Z) 9.41 1.1 -0.6, rotation 0 0 0
  symmetric about XZ
  bounding box size 8.78369 28.41 0.514185
  totals: TotalSpan=26.21 TotalProjectedSpan=26.21 TotalChord=3.07 TotalArea=70.7262
  root: chord 4.88406, twist 0, NACA 4-series Camber=0 CamberLoc=0.2 ThickChord=0.1
  sections:
    n  Span    Root_Chord  Tip_Chord  Area     Sweep  Sweep_Location  Dihedral  Twist  Twist_Location  tip airfoil
    1  3.0464  4.88406     3.73487    13.1283  34.5   0               0         0      0.25            as above
    2  3.3549  3.73487     2.60591    10.6363  30     0               0         0      0.25            as above
    3  6.7037  2.60591     0.854395   11.5984  30     0               0         0      0.25            as above

Wing "Derive", child of "Aile"
  location (X Y Z) 17.3 14.2 -0.6, rotation 80 0 0
  symmetric about XZ
  bounding box size 1.27735 28.8163 0.998713
  totals: TotalSpan=2 TotalProjectedSpan=2 TotalChord=0.8 TotalArea=1.6
  root: chord 0.9, twist 0, NACA 4-series Camber=0 CamberLoc=0.2 ThickChord=0.1
  sections:
    n  Span  Root_Chord  Tip_Chord  Area  Sweep  Sweep_Location  Dihedral  Twist  Twist_Location  tip airfoil
    1  1     0.9         0.7        0.8   30     0               0         0      0.25            as above

Wing "empennage_vertical", child of "Fuselage"
  location (X Y Z) 18 0 1.17, rotation 90 0 -1
  bounding box size 4.14414 0.40733 3.87708
  totals: TotalSpan=3.86 TotalProjectedSpan=3.86 TotalChord=2.545 TotalArea=9.8237
  root: chord 4.072, twist 0, NACA 4-series Camber=0 CamberLoc=0.2 ThickChord=0.1
  sections:
    n  Span  Root_Chord  Tip_Chord  Area    Sweep  Sweep_Location  Dihedral  Twist  Twist_Location  tip airfoil
    1  3.86  4.072       1.018      9.8237  38.4   0               0         0      0.25            as above

Wing "empennage_horizontal", child of "empennage_vertical"
  location (X Y Z) 19.4 0 2.17, rotation 0 0 0; relative location 1.4 0 1, rotation 0 0 0
  symmetric about XZ
  bounding box size 4.45199 7.6976 0.577093
  totals: TotalSpan=7.74 TotalProjectedSpan=7.6976 TotalChord=1.725 TotalArea=13.3515
  root: chord 2.06533, twist 0, NACA 4-series Camber=0 CamberLoc=0.2 ThickChord=0.1
  sections:
    n  Span  Root_Chord  Tip_Chord  Area     Sweep  Sweep_Location  Dihedral  Twist  Twist_Location  tip airfoil
    1  3.87  2.06533     1.38467    6.67575  38.4   0               -6        0      0.25            as above

Wing "support moteur 2", child of "Fuselage"
  location (X Y Z) 16.7 0 1.1, rotation 90 0 0
  bounding box size 4.8 0.480153 0.3
  totals: TotalSpan=0.3 TotalProjectedSpan=0.3 TotalChord=3 TotalArea=0.9
  root: chord 4.8, twist 0, NACA 4-series Camber=0 CamberLoc=0.2 ThickChord=0.1
  sections:
    n  Span  Root_Chord  Tip_Chord  Area  Sweep  Sweep_Location  Dihedral  Twist  Twist_Location  tip airfoil
    1  0.3   4.8         1.2        0.9   30     0               0         0      0.25            as above

Custom "moteur_2", child of "support moteur 2"
  location (X Y Z) 18.4 0 1.75, rotation 0 0 0; relative location 1.7 0 0.65, rotation 0 0 0
  bounding box size 3 0.80022 0.811121
  Design: Camber=0 CamberLoc=0.2 Chord=3 Height=0.65 InvertFlag=0 Shape=0 ThickChord=0.05 Width=0.65
  custom script Duct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

Wing "Support moteur 1 et 3", child of "Fuselage"
  location (X Y Z) 18 0.7 0, rotation 0 0 -5
  symmetric about XZ
  bounding box size 1.77487 2.72423 0.131755
  totals: TotalSpan=1.4 TotalProjectedSpan=1.4 TotalChord=1.205 TotalArea=1.68701
  root: chord 1.09375, twist 0, NACA 4-series Camber=0 CamberLoc=0.2 ThickChord=0.1
  sections:
    n  Span  Root_Chord  Tip_Chord  Area      Sweep  Sweep_Location  Dihedral  Twist  Twist_Location  tip airfoil
    1  0.7   1.09375     1.31626    0.843503  30     0               0         0      0.25            as above

Custom "moteur_1", child of "Support moteur 1 et 3"
  location (X Y Z) 19.0834 1.60904 0, rotation 0 0 0; relative location 1 1 0, rotation 0 0 5
  bounding box size 3 0.85022 0.861802
  Design: Camber=0 CamberLoc=0.2 Chord=3 Height=0.7 InvertFlag=0 Shape=0 ThickChord=0.05 Width=0.7
  custom script Duct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

Custom "moteur_3", child of "Support moteur 1 et 3"
  location (X Y Z) 19.083 -1.609 0, rotation 0 0 0; relative location 1.28012 -2.20582 0, rotation 0 0 5
  bounding box size 3 0.85022 0.861802
  Design: Camber=0 CamberLoc=0.2 Chord=3 Height=0.7 InvertFlag=0 Shape=0 ThickChord=0.05 Width=0.7
  custom script Duct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
