OpenVSP model (file version 5), 12 components.
Geometry view with OpenVSP parameter names; values to 6 digits, angles in degrees, lengths in the model's unit.
Overall bounding box: X_Min=-0.058125 X_Len=71.2451 Y_Min=-31.8247 Y_Len=63.6494 Z_Min=-4.66909 Z_Len=17.7126

Fuselage "FuselageGeom"
  location (X Y Z) 0 0 0, rotation 0 0 0
  bounding box size 70.0581 6.27834 7.99186
  Design: Length=70
  cross sections:
    n  XLocPercent  YLocPercent  ZLocPercent  shape
    0  0            0            0            point
    1  0.00405713   0            0            circle Circle_Diameter=1.24504
    2  0.0678647    0            0.00271739   ellipse Ellipse_Height=5.83058 Ellipse_Width=4.49587
    3  0.101739     0            0.00543478   ellipse Ellipse_Height=7.0125 Ellipse_Width=5.30718
    4  0.297058     0            0            ellipse Ellipse_Height=7.70795 Ellipse_Width=6.19778
    5  0.43077      0            0            ellipse Ellipse_Height=6.73636 Ellipse_Width=6.15961
    6  0.675167     0            0            ellipse Ellipse_Height=6.73636 Ellipse_Width=6.21772
    7  0.987642     0            0.0271739    ellipse Ellipse_Height=2.13008 Ellipse_Width=0.755424
    8  1            0            0.0298913    point

Wing "WingGeom", child of "FuselageGeom"
  location (X Y Z) 16.6576 0 -1.957, rotation 0 0 0
  symmetric about XZ
  bounding box size 33.4205 63.6494 4.41903
  totals: TotalSpan=64 TotalProjectedSpan=63.6494 TotalChord=9.3583 TotalArea=529.191 TotalAR=7.65554
  root: chord 15.29, twist 0, NACA 4-series Camber=0 CamberLoc=0.2 DeltaX=0.0818182 Scale=1.11818 ThickChord=0.1
  sections:
    n  Span  Root_Chord  Tip_Chord  Area     Sweep  Sweep_Location  Dihedral  Twist  Twist_Location  tip airfoil
    1  10    15.29       9.23828    122.641  40     0.686364        6         0      0.25            CST airfoil ContLERad=1 LowDegree=15 ThickChord=0.344364 UpDegree=15 Au=[0.146873 0.122643 0.18351 0.000960755 0.429222 -0.407158 0.905622 -0.786984 0.987795 -0.539727 0.525406 -0.0785289 0.192291 0.0955442 0.121255 0.116262] Al=[-0.146873 -0.122643 -0.18351 -0.000960755 -0.429222 0.407158 -0.905622 0.786984 -0.987795 0.539727 -0.525406 0.0785289 -0.192291 -0.0955442 -0.121255 -0.116262]
    2  22    9.23828     3.66667    141.954  40     0               6         0      0.25            CST airfoil ContLERad=1 LowDegree=7 ThickChord=0.119291 UpDegree=7 Au=[0.170988 0.157287 0.162312 0.143623 0.149218 0.137218 0.140721 0.141105] Al=[-0.170988 -0.157287 -0.162312 -0.143623 -0.149218 -0.137218 -0.140721 -0.141105]

Wing "WingGeom", child of "FuselageGeom"
  location (X Y Z) 56.9837 0 3.04348, rotation 90 0 0
  bounding box size 14.2033 0.914816 10
  totals: TotalSpan=10 TotalProjectedSpan=10 TotalChord=5.71429 TotalArea=57.1429 TotalAR=1.75
  root: chord 9.14286, twist 0, NACA 4-series Camber=0 CamberLoc=0.2 ThickChord=0.1
  sections:
    n  Span  Root_Chord  Tip_Chord  Area     Sweep  Sweep_Location  Dihedral  Twist  Twist_Location  tip airfoil
    1  10    9.14286     2.28571    57.1429  50     0               0         0      0.25            as above

Wing "WingGeom", child of "FuselageGeom"
  location (X Y Z) 58.6957 0 1.52174, rotation 0 0 0
  symmetric about XZ
  bounding box size 11.6301 21.836 1.94091
  totals: TotalSpan=22 TotalProjectedSpan=21.836 TotalChord=6 TotalArea=132 TotalAR=3.61221
  root: chord 9.6, twist 0, NACA 4-series Camber=0 CamberLoc=0.2 ThickChord=0.1
  sections:
    n  Span  Root_Chord  Tip_Chord  Area  Sweep  Sweep_Location  Dihedral  Twist  Twist_Location  tip airfoil
    1  11    9.6         2.4        66    40     0               7         0      0.25            as above

Stack "StackGeom"
  location (X Y Z) 26.5 11.3 -3, rotation 0 0 0
  bounding box size 8.26778 3.33818 3.33818
  cross sections:
    n   XDelta     YDelta  YRotate  ZDelta  shape
    0   0          0       0        0       point
    1   0.462295   0       0        0       circle Circle_Diameter=1.12537
    2   -0.177049  0       0        0       circle Circle_Diameter=2.56364
    3   -1.0623    0       0        0       as above
    4   1.2        0       0        0       circle Circle_Diameter=3.33818
    5   2.4        0       0        0       file fuselage section Height=3.0352 Width=3.0352
    6   1.10164    0       2.5      0       circle Circle_Diameter=2.71227
    7   0          0       0        0       circle Circle_Diameter=2.27371
    8   1.64262    0       0        0       circle Circle_Diameter=1.67185
    9   1.6918     0       0        0       circle Circle_Diameter=1.06998
    10  0          0       0        0       circle Circle_Diameter=0.927273

Stack "StackGeom", child of "StackGeom"
  location (X Y Z) 26.826 11.3 -1.35, rotation 0 0 0
  bounding box size 10.0574 0.506386 1.71062
  cross sections:
    n  XDelta   YDelta  ZDelta      shape
    0  0        0       0           general fuselage BotStr=0.806864 BotTanAngle=90 CornerRad=0 Height=0 LowStr=0.815182 MaxWidthLoc=0 TopStr=0.83 TopTanAngle=90 UpStr=0.83 Width=0.15
    1  1        0       0.0409836   rounded rectangle RoundRectXSec_Radius=0.0767045 RoundedRect_Height=0.240057 RoundedRect_Width=0.3
    2  1.5082   0       0.0614754   general fuselage BotStr=0.83 BotTanAngle=90 CornerRad=0 Height=0.681818 LowStr=0.83 MaxWidthLoc=0 TopStr=0.83 TopTanAngle=90 UpStr=0.83 Width=0.3
    3  1        0       -0.0819672  general fuselage BotStr=0.83 BotTanAngle=90 CornerRad=0 Height=1.2655 LowStr=0.83 MaxWidthLoc=0 TopStr=0.83 TopTanAngle=90 UpStr=0.83 Width=0.3
    4  1        0       -0.143443   general fuselage BotStr=0.83 BotTanAngle=90 CornerRad=0 Height=1.31612 LowStr=0.83 MaxWidthLoc=0 TopStr=0.83 TopTanAngle=90 UpStr=0.83 Width=0.3
    5  1        0       -0.122951   general fuselage BotStr=0.83 BotTanAngle=90 CornerRad=0 Height=1.5 LowStr=0.83 MaxWidthLoc=0 TopStr=0.83 TopTanAngle=90 UpStr=0.83 Width=0.3
    6  1        0       -0.0614754  as above
    7  3.04918  0       0.471311    general fuselage BotStr=0.83 BotTanAngle=90 CornerRad=0 Height=0.455579 LowStr=0.83 MaxWidthLoc=0 TopStr=0.83 TopTanAngle=90 UpStr=0.83 Width=0.3
    8  0.5      0       0           point

Stack "StackGeom"
  location (X Y Z) 26.5 -11.3 -3, rotation 0 0 0
  bounding box size 8.26778 3.33818 3.33818
  cross sections:
    n   XDelta     YDelta  YRotate  ZDelta  shape
    0   0          0       0        0       point
    1   0.462295   0       0        0       circle Circle_Diameter=1.12537
    2   -0.177049  0       0        0       circle Circle_Diameter=2.56364
    3   -1.0623    0       0        0       as above
    4   1.2        0       0        0       circle Circle_Diameter=3.33818
    5   2.4        0       0        0       file fuselage section Height=3.0352 Width=3.0352
    6   1.10164    0       2.5      0       circle Circle_Diameter=2.71227
    7   0          0       0        0       circle Circle_Diameter=2.27371
    8   1.64262    0       0        0       circle Circle_Diameter=1.67185
    9   1.6918     0       0        0       circle Circle_Diameter=1.06998
    10  0          0       0        0       circle Circle_Diameter=0.927273

Stack "StackGeom", child of "StackGeom"
  location (X Y Z) 26.826 -11.3 -1.35, rotation 0 0 0
  bounding box size 10.0574 0.506386 1.71062
  cross sections:
    n  XDelta   YDelta  ZDelta      shape
    0  0        0       0           general fuselage BotStr=0.806864 BotTanAngle=90 CornerRad=0 Height=0 LowStr=0.815182 MaxWidthLoc=0 TopStr=0.83 TopTanAngle=90 UpStr=0.83 Width=0.15
    1  1        0       0.0409836   rounded rectangle RoundRectXSec_Radius=0.0767045 RoundedRect_Height=0.240057 RoundedRect_Width=0.3
    2  1.5082   0       0.0614754   general fuselage BotStr=0.83 BotTanAngle=90 CornerRad=0 Height=0.681818 LowStr=0.83 MaxWidthLoc=0 TopStr=0.83 TopTanAngle=90 UpStr=0.83 Width=0.3
    3  1        0       -0.0819672  general fuselage BotStr=0.83 BotTanAngle=90 CornerRad=0 Height=1.2655 LowStr=0.83 MaxWidthLoc=0 TopStr=0.83 TopTanAngle=90 UpStr=0.83 Width=0.3
    4  1        0       -0.143443   general fuselage BotStr=0.83 BotTanAngle=90 CornerRad=0 Height=1.31612 LowStr=0.83 MaxWidthLoc=0 TopStr=0.83 TopTanAngle=90 UpStr=0.83 Width=0.3
    5  1        0       -0.122951   general fuselage BotStr=0.83 BotTanAngle=90 CornerRad=0 Height=1.5 LowStr=0.83 MaxWidthLoc=0 TopStr=0.83 TopTanAngle=90 UpStr=0.83 Width=0.3
    6  1        0       -0.0614754  as above
    7  3.04918  0       0.471311    general fuselage BotStr=0.83 BotTanAngle=90 CornerRad=0 Height=0.455579 LowStr=0.83 MaxWidthLoc=0 TopStr=0.83 TopTanAngle=90 UpStr=0.83 Width=0.3
    8  0.5      0       0           point

Stack "StackGeom"
  location (X Y Z) 33 19.8 -2.4, rotation 0 0 0
  bounding box size 8.26778 3.33818 3.33818
  cross sections:
    n   XDelta     YDelta  YRotate  ZDelta  shape
    0   0          0       0        0       point
    1   0.462295   0       0        0       circle Circle_Diameter=1.12537
    2   -0.177049  0       0        0       circle Circle_Diameter=2.56364
    3   -1.0623    0       0        0       as above
    4   1.2        0       0        0       circle Circle_Diameter=3.33818
    5   2.4        0       0        0       file fuselage section Height=3.0352 Width=3.0352
    6   1.10164    0       2.5      0       circle Circle_Diameter=2.71227
    7   0          0       0        0       circle Circle_Diameter=2.27371
    8   1.64262    0       0        0       circle Circle_Diameter=1.67185
    9   1.6918     0       0        0       circle Circle_Diameter=1.06998
    10  0          0       0        0       circle Circle_Diameter=0.927273

Stack "StackGeom", child of "StackGeom"
  location (X Y Z) 33.326 19.8 -0.75, rotation 0 0 0
  bounding box size 10.0574 0.506386 1.71062
  cross sections:
    n  XDelta   YDelta  ZDelta      shape
    0  0        0       0           general fuselage BotStr=0.806864 BotTanAngle=90 CornerRad=0 Height=0 LowStr=0.815182 MaxWidthLoc=0 TopStr=0.83 TopTanAngle=90 UpStr=0.83 Width=0.15
    1  1        0       0.0409836   rounded rectangle RoundRectXSec_Radius=0.0767045 RoundedRect_Height=0.240057 RoundedRect_Width=0.3
    2  1.5082   0       0.0614754   general fuselage BotStr=0.83 BotTanAngle=90 CornerRad=0 Height=0.681818 LowStr=0.83 MaxWidthLoc=0 TopStr=0.83 TopTanAngle=90 UpStr=0.83 Width=0.3
    3  1        0       -0.0819672  general fuselage BotStr=0.83 BotTanAngle=90 CornerRad=0 Height=1.2655 LowStr=0.83 MaxWidthLoc=0 TopStr=0.83 TopTanAngle=90 UpStr=0.83 Width=0.3
    4  1        0       -0.143443   general fuselage BotStr=0.83 BotTanAngle=90 CornerRad=0 Height=1.31612 LowStr=0.83 MaxWidthLoc=0 TopStr=0.83 TopTanAngle=90 UpStr=0.83 Width=0.3
    5  1        0       -0.122951   general fuselage BotStr=0.83 BotTanAngle=90 CornerRad=0 Height=1.5 LowStr=0.83 MaxWidthLoc=0 TopStr=0.83 TopTanAngle=90 UpStr=0.83 Width=0.3
    6  1        0       -0.0614754  as above
    7  3.04918  0       0.471311    general fuselage BotStr=0.83 BotTanAngle=90 CornerRad=0 Height=0.455579 LowStr=0.83 MaxWidthLoc=0 TopStr=0.83 TopTanAngle=90 UpStr=0.83 Width=0.3
    8  0.5      0       0           point

Stack "StackGeom"
  location (X Y Z) 33 -19.8 -2.4, rotation 0 0 0
  bounding box size 8.26778 3.33818 3.33818
  cross sections:
    n   XDelta     YDelta  YRotate  ZDelta  shape
    0   0          0       0        0       point
    1   0.462295   0       0        0       circle Circle_Diameter=1.12537
    2   -0.177049  0       0        0       circle Circle_Diameter=2.56364
    3   -1.0623    0       0        0       as above
    4   1.2        0       0        0       circle Circle_Diameter=3.33818
    5   2.4        0       0        0       file fuselage section Height=3.0352 Width=3.0352
    6   1.10164    0       2.5      0       circle Circle_Diameter=2.71227
    7   0          0       0        0       circle Circle_Diameter=2.27371
    8   1.64262    0       0        0       circle Circle_Diameter=1.67185
    9   1.6918     0       0        0       circle Circle_Diameter=1.06998
    10  0          0       0        0       circle Circle_Diameter=0.927273

Stack "StackGeom", child of "StackGeom"
  location (X Y Z) 33.326 -19.8 -0.75, rotation 0 0 0
  bounding box size 10.0574 0.506386 1.71062
  cross sections:
    n  XDelta   YDelta  ZDelta      shape
    0  0        0       0           general fuselage BotStr=0.806864 BotTanAngle=90 CornerRad=0 Height=0 LowStr=0.815182 MaxWidthLoc=0 TopStr=0.83 TopTanAngle=90 UpStr=0.83 Width=0.15
    1  1        0       0.0409836   rounded rectangle RoundRectXSec_Radius=0.0767045 RoundedRect_Height=0.240057 RoundedRect_Width=0.3
    2  1.5082   0       0.0614754   general fuselage BotStr=0.83 BotTanAngle=90 CornerRad=0 Height=0.681818 LowStr=0.83 MaxWidthLoc=0 TopStr=0.83 TopTanAngle=90 UpStr=0.83 Width=0.3
    3  1        0       -0.0819672  general fuselage BotStr=0.83 BotTanAngle=90 CornerRad=0 Height=1.2655 LowStr=0.83 MaxWidthLoc=0 TopStr=0.83 TopTanAngle=90 UpStr=0.83 Width=0.3
    4  1        0       -0.143443   general fuselage BotStr=0.83 BotTanAngle=90 CornerRad=0 Height=1.31612 LowStr=0.83 MaxWidthLoc=0 TopStr=0.83 TopTanAngle=90 UpStr=0.83 Width=0.3
    5  1        0       -0.122951   general fuselage BotStr=0.83 BotTanAngle=90 CornerRad=0 Height=1.5 LowStr=0.83 MaxWidthLoc=0 TopStr=0.83 TopTanAngle=90 UpStr=0.83 Width=0.3
    6  1        0       -0.0614754  as above
    7  3.04918  0       0.471311    general fuselage BotStr=0.83 BotTanAngle=90 CornerRad=0 Height=0.455579 LowStr=0.83 MaxWidthLoc=0 TopStr=0.83 TopTanAngle=90 UpStr=0.83 Width=0.3
    8  0.5      0       0           point
