OpenVSP model (file version 4), 5 components.
Geometry view with OpenVSP parameter names; values to 6 digits, angles in degrees, lengths in the model's unit.
Overall bounding box: X_Min=0 X_Len=118 Y_Min=-45.4916 Y_Len=90.9832 Z_Min=-8.43279 Z_Len=33.1045

Fuselage "Fuselage"
  location (X Y Z) 0 0 0, rotation 0 0 0
  bounding box size 118 10.2166 13.2416
  Design: Length=118
  cross sections:
    n  XLocPercent  YLocPercent  ZLocPercent  shape
    0  0            0            -0.028       point
    1  0.0339674    0            -0.017       ellipse Ellipse_Height=6.02169 Ellipse_Width=5.97109
    2  0.0679348    0            -0.005174    ellipse Ellipse_Height=10.5 Ellipse_Width=7.95455
    3  0.25         0            0            ellipse Ellipse_Height=12.2 Ellipse_Width=10
    4  0.5          0            0            as above
    5  0.669837     0            0            ellipse Ellipse_Height=12.5 Ellipse_Width=10
    6  0.8125       0            0.014        ellipse Ellipse_Height=7.53339 Ellipse_Width=8.02028
    7  0.875        0            0.023        ellipse Ellipse_Height=5.51178 Ellipse_Width=5.49012
    8  0.9375       0            0.028        ellipse Ellipse_Height=3.9064 Ellipse_Width=3.44412
    9  1            0            0.0326087    point

Wing "Aile", child of "Fuselage"
  location (X Y Z) 44 0 -3.19328, rotation 0 0 0
  symmetric about XZ
  bounding box size 28.8787 90.9832 11.918
  totals: TotalSpan=101.764 TotalProjectedSpan=90.9832 TotalChord=8.15631 TotalArea=921.661
  root: chord 19.0055, twist 0, NACA 4-series Camber=0 CamberLoc=0.2 ThickChord=0.1
  sections:
    n  Span     Root_Chord  Tip_Chord  Area     Sweep  Sweep_Location  Dihedral  Twist  Twist_Location  tip airfoil
    1  15.8819  19.0055     10.8087    236.753  26.5   0               5.5       0      0.25            as above
    2  28       10.8087     4.15748    209.526  26.5   0               5.5       0      0.25            as above
    3  7        4.15748     0          14.5512  45     0               75        0      0.25            as above

Fuselage "Moteurs_1_2", child of "Aile"
  location (X Y Z) 43.1929 -14.9457 -5.65217, rotation 0 0 0
  symmetric about XZ
  bounding box size 13.5372 35.4525 5.56123
  Design: Length=13.5372
  cross sections:
    n  XLocPercent  YLocPercent  ZLocPercent  shape
    0  0            0            0            circle Circle_Diameter=4.36364
    1  0.25         0            0            circle Circle_Diameter=4.64874
    2  0.5          0            0            circle Circle_Diameter=4.4625
    3  0.75         0            0            circle Circle_Diameter=3.41932
    4  0.875        0            0            circle Circle_Diameter=2.13489
    5  1            0            0            point

Wing "Empennage_Horizontal", child of "Fuselage"
  location (X Y Z) 102.5 0 2.94118, rotation 0 0 0
  symmetric about XZ
  bounding box size 14.4055 34.4683 2.2791
  totals: TotalSpan=34.6 TotalProjectedSpan=34.4683 TotalChord=7.71063 TotalArea=266.788
  root: chord 11.0039, twist 0, NACA 4-series Camber=0 CamberLoc=0.2 ThickChord=0.1
  sections:
    n  Span  Root_Chord  Tip_Chord  Area     Sweep  Sweep_Location  Dihedral  Twist  Twist_Location  tip airfoil
    1  17.3  11.0039     4.41732    133.394  30     0               5         0      0.25            as above

Wing "Empennage_Vertical", child of "Empennage_Horizontal"
  location (X Y Z) 90 0 5.46218, rotation 0 0 0
  symmetric about XZ
  bounding box size 25.2588 0 20.2599
  totals: TotalSpan=37.9252 TotalProjectedSpan=1e-06 TotalChord=14.4213 TotalArea=437.887
  root: chord 21, twist 0, NACA 4-series Camber=0 CamberLoc=0.2 ThickChord=0.1
  sections:
    n  Span     Root_Chord  Tip_Chord  Area     Sweep  Sweep_Location  Dihedral  Twist  Twist_Location  tip airfoil
    1  2.69291  21          15.874     49.6493  65     0               90        0      0.25            as above
    2  16.2697  15.874      4.93701    169.294  41.8   0               90        0      0.25            as above
