OpenVSP model (file version 4), 6 components.
Geometry view with OpenVSP parameter names; values to 6 digits, angles in degrees, lengths in the model's unit.
Overall bounding box: X_Min=-3.80952 X_Len=47.6593 Y_Min=-16.4294 Y_Len=32.8587 Z_Min=-1.7824 Z_Len=7.5824

Custom "Fuselage"
  location (X Y Z) -3.80952 0 0, rotation 0 0 0
  bounding box size 43.03 3.342 3.4534
  Design: AftCenter=0.2 AftHeight=0.3 AftMult=3 AftWidth=0.1 Diameter=3.342 Length=43.03 NoseCenter=-0.2 NoseMult=1.348
  custom script TransportFuse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

Wing "Aile", child of "Fuselage"
  location (X Y Z) 17.3505 0 -1, rotation 0 0 0; relative location 21.16 0 -1, rotation 0 0 0
  symmetric about XZ
  bounding box size 10.6362 32.8587 0.813412
  totals: TotalSpan=32.87 TotalProjectedSpan=32.8587 TotalChord=4.02577 TotalArea=112.377
  root: chord 6.514, twist 0, NACA 4-series Camber=0 CamberLoc=0.2 ThickChord=0.1
  sections:
    n  Span    Root_Chord  Tip_Chord  Area     Sweep  Sweep_Location  Dihedral  Twist  Twist_Location  tip airfoil
    1  4.5     6.514       4.22082    24.1533  30     0               -1.5      0      0.25            as above
    2  11.935  4.22082     1.14744    32.0351  30     0               -1.5      0      0.25            as above

Wing "Empennage_Vertical", child of "Fuselage"
  location (X Y Z) 34.1905 0 0, rotation 90 0 0; relative location 38 0 0, rotation 90 0 0
  bounding box size 8.68619 0.381039 5.8
  totals: TotalSpan=5.8 TotalProjectedSpan=5.8 TotalChord=3.63636 TotalArea=21.0909
  root: chord 3.80888, twist 0, NACA 4-series Camber=0 CamberLoc=0.2 ThickChord=0.1
  sections:
    n  Span  Root_Chord  Tip_Chord  Area     Sweep  Sweep_Location  Dihedral  Twist  Twist_Location  tip airfoil
    1  5.8   3.80888     3.46385    21.0909  42     0               0         0      0.25            as above

Wing "empennage_Horizontal", child of "Empennage_Vertical"
  location (X Y Z) 38.4296 0 4.7, rotation 0 0 0; relative location 4.23913 0 4.7, rotation 0 0 0
  symmetric about XZ
  bounding box size 5.42017 12.2102 0.653893
  totals: TotalSpan=12.24 TotalProjectedSpan=12.2102 TotalChord=2.26893 TotalArea=27.7717
  root: chord 3.40296, twist 0, NACA 4-series Camber=0 CamberLoc=0.2 ThickChord=0.1
  sections:
    n  Span  Root_Chord  Tip_Chord  Area     Sweep  Sweep_Location  Dihedral  Twist  Twist_Location  tip airfoil
    1  6.12  3.40296     1.1349     13.8859  35     0               -4        0      0.25            as above

Custom "Moteur 1", child of "Fuselage"
  location (X Y Z) 32.2805 2.9 -0.2, rotation 0 0 0; relative location 36.09 2.9 -0.2, rotation 0 0 0
  symmetric about XZ
  bounding box size 5.65 7.88559 2.1127
  Design: Camber=0 CamberLoc=0 Chord=5.65 Height=1.21296 InvertFlag=0 Shape=0 ThickChord=0.154167 Width=1.21422
  custom script Duct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

Wing "Mat moteur", child of "Moteur 1"
  location (X Y Z) 30 0 -0.2, rotation 0 0 0
  symmetric about XZ
  bounding box size 6.52361 4.55209 0.652208
  totals: TotalSpan=4.55209 TotalProjectedSpan=4.55209 TotalChord=6.52 TotalArea=29.6796
  root: chord 6.52, twist 0, NACA 4-series Camber=0 CamberLoc=0.2 ThickChord=0.1
  sections:
    n  Span     Root_Chord  Tip_Chord  Area     Sweep       Sweep_Location  Dihedral  Twist  Twist_Location  tip airfoil
    1  2.27604  6.52        6.52       14.8398  -0.0909091  0               0         0      0.25            as above
