OpenVSP model (file version 4), 11 components.
Geometry view with OpenVSP parameter names; values to 6 digits, angles in degrees, lengths in the model's unit.
Overall bounding box: X_Min=-5.7 X_Len=63.5643 Y_Min=-30.0194 Y_Len=60.0388 Z_Min=-3.28931 Z_Len=14.3393

Custom "Fuselage"
  location (X Y Z) -5.7 0 0, rotation 0 0 0
  bounding box size 62.88 5.94 5.94
  Design: AftCenter=0.4 AftHeight=0.15 AftMult=3.5 AftWidth=0.15 Diameter=5.94 Length=62.88 NoseCenter=-0.08 NoseMult=1.5
  custom script TransportFuse0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

Wing "Empennage_Horizontal"
  location (X Y Z) 49.5 0 1.8, rotation 0 0 0
  symmetric about XZ
  bounding box size 8.30319 19.3361 1.21411
  totals: TotalSpan=19.41 TotalProjectedSpan=19.3361 TotalChord=3.68146 TotalArea=71.4572
  root: chord 5.25923, twist 0, NACA 4-series Camber=0 CamberLoc=0.2 ThickChord=0.1
  sections:
    n  Span   Root_Chord  Tip_Chord  Area     Sweep  Sweep_Location  Dihedral  Twist  Twist_Location  tip airfoil
    1  9.705  5.25923     2.10369    35.7286  31     0.25            5         0      0.25            NACA 4-series Camber=0 CamberLoc=0.2 DeltaX=-0.2 ThickChord=0.1

Wing "Empennage_Vertical"
  location (X Y Z) 47.3 0 2.75, rotation 90 0 0
  bounding box size 11.1093 0.77882 8.3
  totals: TotalSpan=8.3 TotalProjectedSpan=8.3 TotalChord=5.43832 TotalArea=45.1381
  root: chord 7.78571, twist 0, NACA 4-series Camber=0 CamberLoc=0.2 DeltaX=-0.07 ThickChord=0.1
  sections:
    n  Span  Root_Chord  Tip_Chord  Area     Sweep  Sweep_Location  Dihedral  Twist  Twist_Location  tip airfoil
    1  8.3   7.78571     3.09093    45.1381  42     0               0         0      0.25            NACA 4-series Camber=0 CamberLoc=0.2 ThickChord=0.1

Fuselage "GearPod"
  location (X Y Z) 15.3 0 -1.2, rotation 0 0 0
  bounding box size 13 2.09731 2.09731
  Design: Length=13
  cross sections:
    n  XLocPercent  YLocPercent  ZLocPercent  shape
    0  0            0            0            point
    1  0.175        0            0            rounded rectangle RoundRectXSec_Radius=0.125 RoundedRect_Height=0.75 RoundedRect_Width=1.65
    2  0.825        0            0            as above
    3  1            0            0            point

Wing "Aile", child of "GearPod"
  location (X Y Z) 15.3 0 -1.2, rotation 5.5 0 0; relative location 0 0 0, rotation 5.5 0 0
  symmetric about XZ
  bounding box size 20.4894 60.0388 3.58912
  totals: TotalSpan=60.3 TotalProjectedSpan=60.3 TotalChord=7.1553 TotalArea=362.833 RelativeDihedralFlag=1
  root: chord 12.3352, twist 0, NACA 4-series Camber=0 CamberLoc=0.2 ThickChord=0.1
  sections:
    n  Span     Root_Chord  Tip_Chord  Area     Sweep  Sweep_Location  Dihedral  Twist  Twist_Location  tip airfoil
    1  8.61428  12.3352     7.28678    84.5148  30     0               0         0      0.25            as above
    2  21.5357  7.28678     1.71239    96.9019  30     0               0         0      0.25            NACA 4-series Camber=0 CamberLoc=0.2 DeltaX=0.8 ThickChord=0.1

Wing "Attache_1_3", child of "Aile"
  location (X Y Z) 27.3256 19.187 0.647495, rotation -84.5 0 0; relative location 6.5 9.8 0, rotation -90 0 0
  symmetric about XZ
  bounding box size 1.72842 38.5896 0.755782
  totals: TotalSpan=1.5 TotalProjectedSpan=1.5 TotalChord=0.962609 TotalArea=1.44391
  root: chord 1.20326, twist 0, NACA 4-series Camber=0 CamberLoc=0.2 ThickChord=0.1
  sections:
    n  Span  Root_Chord  Tip_Chord  Area      Sweep  Sweep_Location  Dihedral  Twist  Twist_Location  tip airfoil
    1  0.75  1.20326     0.721957   0.721957  -35    0               0         0      0.25            as above

Fuselage "Moteur_1_3", child of "Attache_1_3"
  location (X Y Z) 23.3004 19.3547 -1.09445, rotation -84.5 0 0; relative location -3.5 1 0, rotation 0 0 0
  symmetric about XZ
  bounding box size 6 41.1247 2.4153
  Design: Length=6
  cross sections:
    n  XLocPercent  YLocPercent  ZLocPercent  shape
    0  1            0            0            circle Circle_Diameter=1.8
    1  0.5          0            0            circle Circle_Diameter=1.88
    2  0            0            0            circle Circle_Diameter=1.81012
    3  0.3          0            0            circle Circle_Diameter=2.36367
    4  1            0            0            circle Circle_Diameter=1.8

Fuselage "Turbine_1_3", child of "Moteur_1_3"
  location (X Y Z) 23.8004 19.3547 -1.09445, rotation -84.5 0 0; relative location 0.5 0 0, rotation 0 0 0
  symmetric about XZ
  bounding box size 1.4 40.9575 2.24806
  Design: Length=1.4
  cross sections:
    n  XLocPercent  YLocPercent  ZLocPercent  shape
    0  0            0            0            point
    1  0            0            0            circle Circle_Diameter=2.2
    2  1            0            0            circle Circle_Diameter=2
    3  1            0            0            point

Wing "Attache_2_4", child of "Aile"
  location (X Y Z) 20.8256 8.93439 -0.339716, rotation -84.5 0 0; relative location 0 -0.5 0, rotation -90 0 0
  symmetric about XZ
  bounding box size 1.72842 18.0845 0.755782
  totals: TotalSpan=1.5 TotalProjectedSpan=1.5 TotalChord=0.962609 TotalArea=1.44391
  root: chord 1.20326, twist 0, NACA 4-series Camber=0 CamberLoc=0.2 ThickChord=0.1
  sections:
    n  Span  Root_Chord  Tip_Chord  Area      Sweep  Sweep_Location  Dihedral  Twist  Twist_Location  tip airfoil
    1  0.75  1.20326     0.721957   0.721957  -35    0               0         0      0.25            as above

Fuselage "Moteur_2_4", child of "Attache_2_4"
  location (X Y Z) 16.8004 9.10212 -2.08166, rotation -84.5 0 0; relative location -3.5 1 0, rotation 0 0 0
  symmetric about XZ
  bounding box size 6 20.6195 2.4153
  Design: Length=6
  cross sections:
    n  XLocPercent  YLocPercent  ZLocPercent  shape
    0  1            0            0            circle Circle_Diameter=1.8
    1  0.5          0            0            circle Circle_Diameter=1.88
    2  0            0            0            circle Circle_Diameter=1.81012
    3  0.3          0            0            circle Circle_Diameter=2.36367
    4  1            0            0            circle Circle_Diameter=1.8

Fuselage "Turbine_2_4", child of "Moteur_2_4"
  location (X Y Z) 17.3004 9.10212 -2.08166, rotation -84.5 0 0; relative location 0.5 0 0, rotation 0 0 0
  symmetric about XZ
  bounding box size 1.4 20.4523 2.24806
  Design: Length=1.4
  cross sections:
    n  XLocPercent  YLocPercent  ZLocPercent  shape
    0  0            0            0            point
    1  0            0            0            circle Circle_Diameter=2.2
    2  1            0            0            circle Circle_Diameter=2
    3  1            0            0            point
