OpenVSP model (file version 4), 10 components.
Geometry view with OpenVSP parameter names; values to 6 digits, angles in degrees, lengths in the model's unit.
Overall bounding box: X_Min=-5.7 X_Len=31.7218 Y_Min=-13.1104 Y_Len=26.2209 Z_Min=-1.78 Z_Len=7.40688

Custom "Fuselage"
  location (X Y Z) -5.7 0 0, rotation 0 0 0
  bounding box size 28.55 3.56 3.56
  Design: AftCenter=0.325 AftHeight=0.08425 AftMult=2.3275 AftWidth=0.1 Diameter=3.56 Length=28.55 NoseCenter=-0.158333 NoseMult=1.1725
  custom script TransportFuse0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

Wing "Empennage_vertical"
  location (X Y Z) 18.8261 0 1.26087, rotation 90 0 0
  bounding box size 6.37346 0.384723 4.17831
  totals: TotalSpan=4.17831 TotalProjectedSpan=4.17831 TotalChord=3.64674 TotalArea=15.2372
  root: chord 3.8457, twist 0, NACA 4-series Camber=0 CamberLoc=0.2 ThickChord=0.1
  sections:
    n  Span     Root_Chord  Tip_Chord  Area     Sweep  Sweep_Location  Dihedral  Twist  Twist_Location  tip airfoil
    1  4.17831  3.8457      3.44778    15.2372  35     0               0         0      0.25            as above

Wing "Empennage_horizontal", child of "Empennage_vertical"
  location (X Y Z) 21.1478 0 5.475, rotation 0 0 0
  symmetric about XZ
  bounding box size 4.14666 11.6364 0.303757
  totals: TotalSpan=11.6364 TotalProjectedSpan=11.6364 TotalChord=1.4 TotalArea=16.2909
  root: chord 2, twist 0, NACA 4-series Camber=0 CamberLoc=0.2 DeltaX=0.363636 Scale=1.51818 ThickChord=0.1
  sections:
    n  Span     Root_Chord  Tip_Chord  Area     Sweep  Sweep_Location  Dihedral  Twist  Twist_Location  tip airfoil
    1  5.81818  2           0.8        8.14545  35     0               0         0      0.25            NACA 4-series Camber=0 CamberLoc=0.2 ThickChord=0.1

Wing "Aile"
  location (X Y Z) 2.6087 0 1.84783, rotation -3 0 -0.326087
  symmetric about XZ
  bounding box size 6.31327 26.2209 1.00596
  totals: TotalSpan=26.34 TotalProjectedSpan=26.34 TotalChord=3.18182 TotalArea=83.8091
  root: chord 5.09091, twist 0, NACA 4-series Camber=0 CamberLoc=0.2 DeltaX=0.518182 ThickChord=0.1
  sections:
    n  Span   Root_Chord  Tip_Chord  Area     Sweep  Sweep_Location  Dihedral  Twist  Twist_Location  tip airfoil
    1  13.17  5.09091     1.27273    41.9045  30     0               0         0      0.25            NACA 4-series Camber=0 CamberLoc=0.2 ThickChord=0.1

Wing "Pylone_1", child of "Aile"
  location (X Y Z) 6.18326 -3.73319 1.61811, rotation -93 0.326087 0; relative location 3.59565 -3.69565 -0.424783, rotation -90 0 0
  symmetric about XZ
  bounding box size 3.76959 7.71355 1.08478
  totals: TotalSpan=2.15215 TotalProjectedSpan=2.15215 TotalChord=1.84321 TotalArea=3.96687
  root: chord 2.30402, twist 0, NACA 4-series Camber=0 CamberLoc=0.2 DeltaX=0.309091 ThickChord=0.1
  sections:
    n  Span     Root_Chord  Tip_Chord  Area     Sweep  Sweep_Location  Dihedral  Twist  Twist_Location  tip airfoil
    1  1.07607  2.30402     1.38241    1.98343  -35    0               0         0      0.25            NACA 4-series Camber=0 CamberLoc=0.2 ThickChord=0.1

Fuselage "Moteur_1", child of "Pylone_1"
  location (X Y Z) 5.04719 -3.81491 -0.0646894, rotation -93 0.326087 0; relative location -0.382609 0.608696 0, rotation 0 0 0
  symmetric about XZ
  bounding box size 2.29089 9.28796 1.64072
  Design: Length=2.28336
  cross sections:
    n  XLocPercent  YLocPercent  ZLocPercent  shape
    0  1            0            0            circle Circle_Diameter=1.233
    1  0.5          0            0            circle Circle_Diameter=1.2878
    2  0            0            0            circle Circle_Diameter=1.23993
    3  0.3          0            0            circle Circle_Diameter=1.61911
    4  1            0            0            circle Circle_Diameter=1.233

Fuselage "PowerFace_1", child of "Moteur_1"
  location (X Y Z) 5.09797 -3.8152 -0.0646743, rotation -93 0.326087 0; relative location 0.0507826 0 0, rotation 0 0 0
  symmetric about XZ
  bounding box size 0.705964 8.74476 1.11438
  Design: Length=0.7
  cross sections:
    n  XLocPercent  YLocPercent  ZLocPercent  shape
    0  0            0            0            point
    1  0            0            0            circle Circle_Diameter=1.1
    2  1            0            0            circle Circle_Diameter=1
    3  1            0            0            point

Wing "Pylone_2", child of "Aile"
  location (X Y Z) 7.166 6.94527 1.49385, rotation -93 0.326087 0; relative location -0.752174 0 0.01, rotation -90 0 0
  symmetric about XZ
  bounding box size 3.94889 14.1024 1.08419
  totals: TotalSpan=2.1509 TotalProjectedSpan=2.1509 TotalChord=1.83938 TotalArea=3.95631
  root: chord 2.29922, twist 0, NACA 4-series Camber=0 CamberLoc=0.2 DeltaX=0.39 ThickChord=0.1
  sections:
    n  Span     Root_Chord  Tip_Chord  Area     Sweep  Sweep_Location  Dihedral  Twist  Twist_Location  tip airfoil
    1  1.07545  2.29922     1.37953    1.97816  -35    0               0         0      0.25            NACA 4-series Camber=0 CamberLoc=0.2 ThickChord=0.1

Fuselage "Moteur_2", child of "Pylone_2"
  location (X Y Z) 5.92168 6.85851 -0.296901, rotation -93 0.326087 0; relative location -0.491304 0.717391 0, rotation 0 0 0
  symmetric about XZ
  bounding box size 2.29089 15.3562 1.64072
  Design: Length=2.28336
  cross sections:
    n  XLocPercent  YLocPercent  ZLocPercent  shape
    0  1            0            0            circle Circle_Diameter=1.233
    1  0.5          0            0            circle Circle_Diameter=1.2878
    2  0            0            0            circle Circle_Diameter=1.23993
    3  0.3          0            0            circle Circle_Diameter=1.61911
    4  1            0            0            circle Circle_Diameter=1.233

Fuselage "PowerFace_2", child of "Moteur_2"
  location (X Y Z) 5.97416 6.85869 -0.296911, rotation -93 0.326087 0; relative location 0.0524783 0 0.000478261, rotation 0 0 0
  symmetric about XZ
  bounding box size 0.705964 14.8317 1.11438
  Design: Length=0.7
  cross sections:
    n  XLocPercent  YLocPercent  ZLocPercent  shape
    0  0            0            0            point
    1  0            0            0            circle Circle_Diameter=1.1
    2  1            0            0            circle Circle_Diameter=1
    3  1            0            0            point
