OpenVSP model (file version 4), 9 components.
Geometry view with OpenVSP parameter names; values to 6 digits, angles in degrees, lengths in the model's unit.
Overall bounding box: X_Min=-5.7 X_Len=21.3035 Y_Min=-10.5518 Y_Len=21.1035 Z_Min=-1.44154 Z_Len=6.15069

Custom "Fuselage"
  location (X Y Z) -5.7 0 0, rotation 0 0 0
  bounding box size 20.92 2.3 2.33067
  Design: AftCenter=0.1 AftHeight=0.2208 AftMult=3.693 AftWidth=0.1 Diameter=2.3 Length=20.92 NoseCenter=-0.18 NoseMult=1.202
  custom script TransportFuse0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

Wing "Empennage_Horizontal"
  location (X Y Z) 13.8 0 4.3, rotation 0 0 0
  symmetric about XZ
  bounding box size 1.80349 6.85212 0.306719
  totals: TotalSpan=6.85212 TotalProjectedSpan=6.85212 TotalChord=0.968953 TotalArea=9.1
  root: chord 1.80349, twist 0, NACA 4-series Camber=0 CamberLoc=0.2 ThickChord=0.17
  sections:
    n  Span      Root_Chord  Tip_Chord  Area      Sweep    Sweep_Location  Dihedral  Twist  Twist_Location  tip airfoil
    1  3.15646   1.80349     0.986767   4.40367   11.4     0               0         0      0.25            NACA 4-series Camber=0 CamberLoc=0.2 ThickChord=0.19
    2  0.269602  0.986767    0.0987878  0.146334  72.1828  0               0         0      0.25            NACA 4-series Camber=0 CamberLoc=0.2 ThickChord=0.1

Wing "Empennage_Vertical"
  location (X Y Z) 10.4 0 0.9, rotation 90 0 -6.2
  bounding box size 5.11392 0.372473 4.21126
  totals: TotalSpan=4.18 TotalProjectedSpan=4.18 TotalChord=2.60287 TotalArea=10.88
  root: chord 3.72325, twist 0, NACA 4-series Camber=0 CamberLoc=0.2 ThickChord=0.1
  sections:
    n  Span  Root_Chord  Tip_Chord  Area   Sweep  Sweep_Location  Dihedral  Twist  Twist_Location  tip airfoil
    1  4.18  3.72325     1.48249    10.88  37.5   0               0         0      0.25            as above

Fuselage "GearPod"
  location (X Y Z) -3.36957 0 0.998696, rotation 0 0 0
  bounding box size 11.3364 1.9322 1.44102
  Design: Length=10.5964
  cross sections:
    n  XLocPercent  YLocPercent  ZLocPercent  shape
    0  0            0            0            point
    1  0.1255       0            0            rounded rectangle RoundRectXSec_Radius=0.125 RoundedRect_Height=0.75 RoundedRect_Width=1.65
    2  0.825        0            0            as above
    3  1            0            0            point

Wing "Aile", child of "GearPod"
  location (X Y Z) 1.73043 0.03 1.3487, rotation 4 0 0; relative location 5.1 0.03 0.35, rotation 4 0 0
  symmetric about XZ
  bounding box size 2.48529 21.1035 0.494772
  totals: TotalSpan=20.98 TotalProjectedSpan=20.9662 TotalChord=1.71508 TotalArea=40.8587 RelativeDihedralFlag=1
  root: chord 2.32719, twist 1.95876, NACA 4-series Camber=0 CamberLoc=0.2 ThickChord=0.190995
  sections:
    n  Span     Root_Chord  Tip_Chord  Area      Sweep  Sweep_Location  Dihedral  Twist  Twist_Location  tip airfoil
    1  3.06492  2.32719     2.48529    7.37494   0      0               -2.5      0      0.25            NACA 4-series Camber=0 CamberLoc=0.2 ThickChord=0.15
    2  6.26622  2.48529     1.38376    12.1222   7.8    0               -2.03804  0      0.25            NACA 4-series Camber=0 CamberLoc=0.2 ThickChord=0.14
    3  1.15886  1.38376     0.225166   0.932261  45     0               0         0      0.25            NACA 4-series Camber=0 CamberLoc=0.2 ThickChord=0.36

Wing "Pylon", child of "Aile"
  location (X Y Z) 3.02862 3.67492 0.7, rotation -88.0541 0 180; relative location 0.826087 -2.90683 -0.494998, rotation -92.0541 0 180
  symmetric about XZ
  bounding box size 3.63308 7.99489 0.612689
  totals: TotalSpan=1.2 TotalProjectedSpan=1.2 TotalChord=2.02942 TotalArea=2.43531
  root: chord 2.83685, twist 0, rounded rectangle RoundRectXSec_Radius=0.113756 RoundedRect_Height=0.645416 RoundedRect_Width=2.83685
  sections:
    n  Span  Root_Chord  Tip_Chord  Area     Sweep  Sweep_Location  Dihedral  Twist  Twist_Location  tip airfoil
    1  0.6   2.83685     1.22199    1.21765  -53    0               0         0      0.25            NACA 4-series Camber=0 CamberLoc=0.2 ThickChord=0.1

Custom "Moteur 1", child of "Pylon"
  location (X Y Z) 1.46 3.67 0.3, rotation 0 0 0
  bounding box size 3.33199 1.46666 1.2824
  Design: Camber=0 CamberLoc=0.2 Chord=3.33199 Height=0.8 InvertFlag=0 Shape=0 ThickChord=0.14 Width=1
  custom script Duct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

Custom "Moteur 2", child of "Pylon"
  location (X Y Z) 1.46 -3.67 0.3, rotation 0 0 0
  bounding box size 3.33199 1.46666 1.2824
  Design: Camber=0 CamberLoc=0.2 Chord=3.33199 Height=0.8 InvertFlag=0 Shape=0 ThickChord=0.14 Width=1
  custom script Duct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

Fuselage "GearPod"
  location (X Y Z) 0.9 0 -0.91, rotation 0 0 0
  bounding box size 5.83892 1.65 1.06309
  Design: Length=5.5
  cross sections:
    n  XLocPercent  YLocPercent  ZLocPercent  shape
    0  0            0            0            point
    1  0.175        0            0            rounded rectangle RoundRectXSec_Radius=0.125 RoundedRect_Height=0.75 RoundedRect_Width=1.65
    2  0.825        0            0            as above
    3  1            0            0            point
