OpenVSP model (file version 4), 9 components.
Geometry view with OpenVSP parameter names; values to 6 digits, angles in degrees, lengths in the model's unit.
Overall bounding box: X_Min=0 X_Len=27.7332 Y_Min=-11.8613 Y_Len=23.7226 Z_Min=-2.24188 Z_Len=6.03182

Fuselage "Fuselage"
  location (X Y Z) 0 0 0, rotation 0 0 0
  bounding box size 22 2.76102 2.98946
  Design: Length=22
  cross sections:
    n  XLocPercent  YLocPercent  YRotate   ZLocPercent  shape
    0  0            0            0         -0.0217391   point
    1  0.125        0            0         -0.0217391   ellipse Ellipse_Height=1.68182 Ellipse_Width=2
    2  0.25         0            0         -0.0108696   ellipse Ellipse_Height=2.62255 Ellipse_Width=2.29473
    3  0.5          0            0         -0.0108696   super ellipse Super_Height=2.98946 Super_M=2.01091 Super_MaxWidthLoc=-0.545455 Super_N=2.55636 Super_Width=2.74209
    4  0.75         0            -4.90909  0            ellipse Ellipse_Height=2.13082 Ellipse_Width=2.02
    5  0.904891     0            -4.90909  0.0108696    ellipse Ellipse_Height=1.26822 Ellipse_Width=1.202
    6  1            0            -12.2727  0.0217391    point

Wing "ailes", child of "Fuselage"
  location (X Y Z) 8.80435 0.978261 -1.08696, rotation 0 0 0
  symmetric about XZ
  bounding box size 10.3296 23.7226 0.858943
  totals: TotalSpan=21.7708 TotalProjectedSpan=21.7661 TotalChord=3.08987 TotalArea=67.2691
  root: chord 5.17708, twist 0, NACA 63-series A=0 IdealCl=0 ThickChord=0.165909
  sections:
    n  Span     Root_Chord  Tip_Chord  Area     Sweep    Sweep_Location  Dihedral  Twist  Twist_Location  tip airfoil
    1  10.8854  5.17708     1.00267    33.6346  40.5909  0               1.19565   0      0.25            NACA 4-series Camber=0 CamberLoc=0.2 ThickChord=0.1

Wing "empenage horizontal", child of "Fuselage"
  location (X Y Z) 22.2826 0 3.36957, rotation 0 0 0
  symmetric about XZ
  bounding box size 5.45059 9.60627 0.262604
  totals: TotalSpan=9.60627 TotalProjectedSpan=9.60627 TotalChord=1.8125 TotalArea=17.4114
  root: chord 2.625, twist 0, NACA 4-series Camber=0 CamberLoc=0.2 ThickChord=0.1
  sections:
    n  Span     Root_Chord  Tip_Chord  Area     Sweep    Sweep_Location  Dihedral  Twist  Twist_Location  tip airfoil
    1  4.80314  2.625       1          8.70569  42.8182  0               0         0      0.25            as above

Wing "empenage vertical", child of "empenage horizontal"
  location (X Y Z) 17.6087 0 0.978261, rotation 90 0 -6.08696
  bounding box size 8.66869 0.435556 3.23583
  totals: TotalSpan=3.44792 TotalProjectedSpan=3.44792 TotalChord=3.35938 TotalArea=11.9909
  root: chord 4, twist 0, NACA 4-series Camber=0 CamberLoc=0.2 ThickChord=0.1
  sections:
    n  Span      Root_Chord  Tip_Chord  Area      Sweep    Sweep_Location  Dihedral  Twist  Twist_Location  tip airfoil
    1  2.47396   4           2.97917    8.63309   51.2727  0               0         0      0.25            as above
    2  0.687501  2.97917     4.35417    2.52084   53.8636  0               0         0      0.25            as above
    3  0.286459  4.35417     1.48958    0.836998  80.9091  0               0         0      0.25            as above

Wing "support_reac", child of "Fuselage"
  location (X Y Z) 14.6739 0.76087 0.543478, rotation 0 0 -2.71739
  symmetric about XZ
  bounding box size 6.91929 3.19892 0.692929
  totals: TotalSpan=1.78125 TotalProjectedSpan=1.78125 TotalChord=5.84115 TotalArea=10.4046
  root: chord 6.92708, twist 0, NACA 4-series Camber=0 CamberLoc=0.2 ThickChord=0.1
  sections:
    n  Span      Root_Chord  Tip_Chord  Area     Sweep    Sweep_Location  Dihedral  Twist  Twist_Location  tip airfoil
    1  0.890626  6.92708     4.75521    5.20228  50.3955  0               0         0      0.25            as above

Fuselage "Reacteurs"
  location (X Y Z) 14.1304 1.95652 0.652174, rotation 0 0 0
  symmetric about XZ
  bounding box size 6 5.63304 1.72
  Design: Length=6
  cross sections:
    n  XLocPercent  YLocPercent  ZLocPercent  shape
    0  0            0            0            circle Circle_Diameter=1.18182
    1  0.25         0            0            circle Circle_Diameter=1.7
    2  0.5          0            0            as above
    3  0.75         0            0            as above
    4  1            -0.0217391   0            circle Circle_Diameter=0.545455

Fuselage "FuselageGeom"
  location (X Y Z) 3.26087 0.1 -1.95652, rotation 0 0 90
  symmetric about XZ
  bounding box size 0.470711 0.6 0.470711
  Design: Length=0.2
  cross sections:
    n  XLocPercent  YLocPercent  ZLocPercent  shape
    0  0            0            0            circle Circle_Diameter=0.4
    1  1            0            0            as above

Fuselage "FuselageGeom", child of "FuselageGeom"
  location (X Y Z) 13.3696 1.83913 -1.95652, rotation 0 0 90
  symmetric about XZ
  bounding box size 0.570711 4.07826 0.570711
  Design: Length=0.2
  cross sections:
    n  XLocPercent  YLocPercent  ZLocPercent  shape
    0  0            0            0            circle Circle_Diameter=0.5
    1  1            0            0            as above

Fuselage "FuselageGeom", child of "FuselageGeom"
  location (X Y Z) 13.3696 1.51304 -1.95652, rotation 0 0 90
  symmetric about XZ
  bounding box size 0.570711 3.42609 0.570711
  Design: Length=0.2
  cross sections:
    n  XLocPercent  YLocPercent  ZLocPercent  shape
    0  0            0            0            circle Circle_Diameter=0.5
    1  1            0            0            as above
