OpenVSP model (file version 4), 7 components.
Geometry view with OpenVSP parameter names; values to 6 digits, angles in degrees, lengths in the model's unit.
Overall bounding box: X_Min=0 X_Len=47.9292 Y_Min=-17.7044 Y_Len=35.4087 Z_Min=-1.88 Z_Len=7.68

Custom "Fuselage"
  location (X Y Z) 0 0 0, rotation 0 0 0
  bounding box size 41.5 3.76 3.76
  Design: AftCenter=0.06 AftHeight=0.20305 AftMult=2.39 AftWidth=0.2179 Diameter=3.76 Length=41.5 NoseCenter=0.00833333 NoseMult=1.22
  custom script TransportFuse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

Wing "Voilure", child of "Fuselage"
  location (X Y Z) 16.2 1.3087 -0.778261, rotation 0.0782609 0.326087 0
  symmetric about XZ
  bounding box size 14.6361 35.4087 1.92512
  totals: TotalSpan=32.92 TotalProjectedSpan=32.7947 TotalChord=5.0795 TotalArea=149.401
  root: chord 7.968, twist 0.618557, NACA 4-series Camber=0 CamberLoc=0.2 ThickChord=0.1
  sections:
    n  Span     Root_Chord  Tip_Chord  Area     Sweep  Sweep_Location  Dihedral  Twist     Twist_Location  tip airfoil
    1  5.00135  7.968       4.95       32.3037  35     0.25            5         0.318182  0.25            as above
    2  11.4586  4.95        2.45       42.397   32.4   0.26            5         0.318182  0.25            as above

Wing "Empennage vertical", child of "Fuselage"
  location (X Y Z) 33.75 0 0.8, rotation 90 0 0
  bounding box size 14.1792 0.754641 5
  totals: TotalSpan=5 TotalProjectedSpan=5 TotalChord=6.16866 TotalArea=29.8726
  root: chord 6.33064, twist 0, NACA 4-series Camber=0 CamberLoc=0.2 ThickChord=0.1
  sections:
    n  Span  Root_Chord  Tip_Chord  Area     Sweep  Sweep_Location  Dihedral  Twist  Twist_Location  tip airfoil
    1  4.1   6.33064     5.4        24.0478  53     0               0         0      0.25            as above
    2  0.9   5.4         7.544      5.8248   53     0               0         0      0.25            as above

Wing "Empennage horizontal", child of "Empennage vertical"
  location (X Y Z) 40.4 0 5.4, rotation 0 0 0
  symmetric about XZ
  bounding box size 5.78214 10.8802 0.98306
  totals: TotalSpan=10.9619 TotalProjectedSpan=10.8802 TotalChord=3.15 TotalArea=34.53
  root: chord 4.5, twist 0, NACA 4-series Camber=0 CamberLoc=0.2 ThickChord=0.1
  sections:
    n  Span     Root_Chord  Tip_Chord  Area    Sweep  Sweep_Location  Dihedral  Twist  Twist_Location  tip airfoil
    1  5.48095  4.5         1.8        17.265  36     0               -7        0      0.25            as above

Duct "Duct", child of "Empennage vertical"
  location (X Y Z) 34 0 2.3, rotation 0 0 0
  bounding box size 6 1.09834 1.23089
  Design: Camber=0.441667 CamberLoc=0.2 Chord=6 Height=0.6 InvertFlag=0 Shape=1 ThickChord=0.104 Width=0.4
  custom script Duct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

Custom "Duct", child of "Fuselage"
  location (X Y Z) 34 2.72 0.6, rotation 0 0 0
  symmetric about XZ
  bounding box size 5.4 6.60268 1.1785
  Design: Camber=0 CamberLoc=0.2 Chord=5.4 Height=0.6 InvertFlag=0 Shape=0 ThickChord=0.104167 Width=0.6
  custom script Duct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

Wing "fixation réacteur", child of "Fuselage"
  location (X Y Z) 33.315 0 0.6, rotation 0 0 0
  symmetric about XZ
  bounding box size 6.03772 4.55209 0.472515
  totals: TotalSpan=4.55209 TotalProjectedSpan=4.55209 TotalChord=4.61182 TotalArea=20.9934
  root: chord 4.72364, twist 0, NACA 4-series Camber=0 CamberLoc=0.2 ThickChord=0.1
  sections:
    n  Span     Root_Chord  Tip_Chord  Area     Sweep  Sweep_Location  Dihedral  Twist  Twist_Location  tip airfoil
    1  2.27604  4.72364     4.5        10.4967  -30    0               0         0      0.25            as above
