OpenVSP model (file version 4), 7 components.
Geometry view with OpenVSP parameter names; values to 6 digits, angles in degrees, lengths in the model's unit.
Overall bounding box: X_Min=-5.7 X_Len=64.7501 Y_Min=-25.735 Y_Len=51.47 Z_Min=-3.81793 Z_Len=16.4013

Custom "Fuselage"
  location (X Y Z) -5.7 0 0, rotation 0 0 0
  bounding box size 63.4833 6.00812 6.00812
  Design: AftCenter=0.25 AftHeight=0.26575 AftMult=2.74 AftWidth=0.241 Diameter=6.00812 Length=63.4833 NoseCenter=-0.0416667 NoseMult=1.42
  custom script TransportFuse0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

Wing "Empennage_Horizontal"
  location (X Y Z) 47.5217 0 0.6, rotation 10 0 0
  symmetric about XZ
  bounding box size 10.0123 17.9091 2.0537
  totals: TotalSpan=18.1364 TotalProjectedSpan=18.1364 TotalChord=4.8626 TotalArea=88.1898
  root: chord 6.94656, twist 0, NACA 4-series Camber=0 CamberLoc=0.2 DeltaX=-0.127273 ThickChord=0.1
  sections:
    n  Span     Root_Chord  Tip_Chord  Area     Sweep  Sweep_Location  Dihedral  Twist  Twist_Location  tip airfoil
    1  9.06818  6.94656     2.77863    44.0949  35     0               0         0      0.25            NACA 4-series Camber=0 CamberLoc=0.2 ThickChord=0.1

Wing "Empennage_Vertical"
  location (X Y Z) 47.5 0 2.56522, rotation 90 0 0
  bounding box size 13.6095 0.930319 10.0182
  totals: TotalSpan=10.0182 TotalProjectedSpan=10.0182 TotalChord=6.51015 TotalArea=65.2199
  root: chord 9.30022, twist 0, NACA 4-series Camber=0 CamberLoc=0.2 DeltaX=-0.309091 ThickChord=0.1
  sections:
    n  Span     Root_Chord  Tip_Chord  Area     Sweep  Sweep_Location  Dihedral  Twist  Twist_Location  tip airfoil
    1  10.0182  9.30022     3.72009    65.2199  35     0               0         0      0.25            NACA 4-series Camber=0 CamberLoc=0.2 ThickChord=0.1

Custom "Moteur 2", child of "Empennage_Vertical"
  location (X Y Z) 52 0 4.6, rotation 0 0 0
  bounding box size 14.1002 3.2334 3.27736
  Design: Camber=0 CamberLoc=0.2 Chord=14.1002 Height=1 InvertFlag=0 Shape=0 ThickChord=0.158333 Width=1
  custom script Duct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

Wing "Aile"
  location (X Y Z) 18.5 0.025 -1.5, rotation 4.2 0 0
  symmetric about XZ
  bounding box size 17.2733 51.47 2.31053
  totals: TotalSpan=51.5455 TotalProjectedSpan=51.5455 TotalChord=8.53456 TotalArea=379.111 RelativeDihedralFlag=1
  root: chord 14.2535, twist 5.5, NACA 4-series Camber=0 CamberLoc=0.2 Theta=6 ThickChord=0.1
  sections:
    n  Span     Root_Chord  Tip_Chord  Area     Sweep  Sweep_Location  Dihedral  Twist  Twist_Location  tip airfoil
    1  8.01461  14.2535     9.05642    93.4098  30     0.122727        0         0      0.25            NACA 4-series Camber=0 CamberLoc=0.2 ThickChord=0.1
    2  17.7581  9.05642     1.77191    96.1454  30     0               0         0      0.25            as above

Duct "Moteur 3", child of "Aile"
  location (X Y Z) 24 -7.2 -2.5, rotation 0 0 0
  bounding box size 8 2.60051 2.63587
  Design: Camber=0 CamberLoc=0.2 Chord=8 Height=1 InvertFlag=0 Shape=0 ThickChord=0.2 Width=1
  custom script Duct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

Duct "Moteur 1", child of "Aile"
  location (X Y Z) 24 7.2 -2.5, rotation 0 0 2.61905
  bounding box size 8.03783 2.61995 2.63587
  Design: Camber=0 CamberLoc=0.2 Chord=8 Height=1 InvertFlag=0 Shape=0 ThickChord=0.2 Width=1
  custom script Duct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
