OpenVSP model (file version 4), 9 components.
Geometry view with OpenVSP parameter names; values to 6 digits, angles in degrees, lengths in the model's unit.
Overall bounding box: X_Min=0 X_Len=55.4826 Y_Min=-24.7349 Y_Len=49.4697 Z_Min=-3.91396 Z_Len=16.1466

Fuselage "Fuselage"
  location (X Y Z) 0 0 0, rotation 0 0 0
  bounding box size 51.97 6.02 6.02
  Design: Length=51.97
  cross sections:
    n   XLocPercent  YLocPercent  YRotate    ZLocPercent   shape
    0   0            0            0          -0.00946916   point
    1   0.0124055    0            0          -0.00946916   ellipse Ellipse_Height=1.77976 Ellipse_Width=1.77976
    2   0.0320539    0            -12.2727   -0.00946916   ellipse Ellipse_Height=3.15912 Ellipse_Width=2.99071
    3   0.0899695    0            -4.90909   -0.00266801   ellipse Ellipse_Height=5.11274 Ellipse_Width=4.99183
    4   0.132587     0            -0.818182  -0.000763686  ellipse Ellipse_Height=5.78379 Ellipse_Width=5.66782
    5   0.163043     0            0          0             circle Circle_Diameter=6.02
    6   0.5          0            0          0             as above
    7   0.720627     0            0          0             as above
    8   0.75974      0            0          -0.000408922  ellipse Ellipse_Height=5.81462 Ellipse_Width=5.715
    9   0.960523     0            0          0.0169901     ellipse Ellipse_Height=2.77446 Ellipse_Width=1.45013
    10  1            0            0          0.0223051     point

Wing "Aile", child of "Fuselage"
  location (X Y Z) 19.2634 0 -1.44364, rotation 0 0 0
  symmetric about XZ
  bounding box size 22.5471 49.4697 3.07162
  totals: TotalSpan=49.6781 TotalProjectedSpan=49.4697 TotalChord=7.78135 TotalArea=353.861
  root: chord 13.4928, twist 0, NACA 4-series Camber=0 CamberLoc=0.2 ThickChord=0.1
  sections:
    n  Span     Root_Chord  Tip_Chord  Area     Sweep    Sweep_Location  Dihedral  Twist  Twist_Location  tip airfoil
    1  9.45053  13.4928     7.57719    99.5611  38.8333  0               5.25      0      0.25            as above
    2  15.3885  7.57719     2.47826    77.3693  39       0               5.25      0      0.25            as above

Wing "Moteur_1 et Moteur_3", child of "Aile"
  location (X Y Z) 26.5215 8.18 -0.371961, rotation -90 0 0
  symmetric about XZ
  bounding box size 11.2402 16.8985 2.41649
  totals: TotalSpan=4.83298 TotalProjectedSpan=4.83298 TotalChord=4.72448 TotalArea=22.8333
  root: chord 5.38374, twist 0, NACA 4-series Camber=0 CamberLoc=0.2 ThickChord=0.1
  sections:
    n  Span     Root_Chord  Tip_Chord  Area     Sweep     Sweep_Location  Dihedral  Twist  Twist_Location  tip airfoil
    1  2.41649  5.38374     4.06522    11.4167  -67.5781  0               0         0      0.25            as above

Custom "Duct", child of "Moteur_1 et Moteur_3"
  location (X Y Z) 22.4825 8.18 -2.41977, rotation 0 0 0
  symmetric about XZ
  bounding box size 4.95055 19.3083 2.98837
  Design: Camber=0 CamberLoc=0.2 Chord=4.95055 Height=2.659 InvertFlag=0 Shape=0 ThickChord=0.0583333 Width=2.65909
  custom script Duct0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

Stack "StackGeom", child of "Duct"
  location (X Y Z) 21.1415 8.18 -2.5, rotation 0 0 0
  symmetric about XZ
  bounding box size 6.27049 18.86 2.5
  cross sections:
    n  XDelta   YDelta  ZDelta  shape
    0  0        0       0       point
    1  0        0       0       circle Circle_Diameter=2.5
    2  3.96721  0       0       circle Circle_Diameter=2.11183
    3  2.30328  0       0       circle Circle_Diameter=1.09091

Wing "Empennage_Vertical", child of "Fuselage"
  location (X Y Z) 39.4458 0 0, rotation 90 0 0
  bounding box size 14.6139 0.88289 12.2326
  totals: TotalSpan=12.2326 TotalProjectedSpan=12.2326 TotalChord=5.66848 TotalArea=69.3405
  root: chord 8.82609, twist 0, NACA 4-series Camber=0 CamberLoc=0.2 ThickChord=0.1
  sections:
    n  Span     Root_Chord  Tip_Chord  Area     Sweep    Sweep_Location  Dihedral  Twist  Twist_Location  tip airfoil
    1  12.2326  8.82609     2.51087    69.3405  44.6948  0               0         0      0.25            as above

Custom "Moteur_2", child of "Empennage_Vertical"
  location (X Y Z) 46.8957 0 4.72581, rotation 0 3.80952 0
  bounding box size 12.2773 3.28118 3.90432
  mass: Density=1 Shell_Flag=0 Mass_Area=1 Mass_Prior=1
  Design: Camber=0 CamberLoc=0.233333 Chord=12.0999 Height=3.02927 InvertFlag=0 Shape=0 ThickChord=0.0208333 Width=3.029
  custom script Duct0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

Stack "StackGeom", child of "Moteur_2"
  location (X Y Z) 41.993 0 5.1087, rotation 0 3.81 0
  bounding box size 13.581 2.75 3.57415
  cross sections:
    n  XDelta   YDelta  ZDelta     shape
    0  0        0       0          point
    1  0        0       0          circle Circle_Diameter=2.75
    2  10.0328  0       -0.163934  as above
    3  3.45902  0       0          circle Circle_Diameter=1.15909

Wing "Empennage_Horizontal", child of "Fuselage"
  location (X Y Z) 42.6301 0 0.714286, rotation 0 0 0
  symmetric about XZ
  bounding box size 11.5557 20.7542 2.35384
  totals: TotalSpan=21.0743 TotalProjectedSpan=20.7542 TotalChord=5.23913 TotalArea=110.411
  root: chord 7.6087, twist 0, NACA 4-series Camber=0 CamberLoc=0.2 ThickChord=0.1
  sections:
    n  Span     Root_Chord  Tip_Chord  Area     Sweep  Sweep_Location  Dihedral  Twist  Twist_Location  tip airfoil
    1  10.5372  7.6087      2.86957    55.2056  39.5   0               10        0      0.25            as above
