OpenVSP model (file version 4), 13 components.
Geometry view with OpenVSP parameter names; values to 6 digits, angles in degrees, lengths in the model's unit.
Overall bounding box: X_Min=-8.68495 X_Len=29.8242 Y_Min=-9.88576 Y_Len=19.7714 Z_Min=-2.26 Z_Len=5.674

Wing "Aile"
  location (X Y Z) 3.69565 0 -1.05, rotation 0 0 0
  symmetric about XZ
  bounding box size 6.11303 18.6362 1.08978
  totals: TotalSpan=18.7139 TotalProjectedSpan=18.6362 TotalChord=2.77529 TotalArea=53.5317
  root: chord 4.7599, twist 0, NACA 4-series Camber=0.00075 CamberLoc=0.2 ThickChord=0.116667
  sections:
    n  Span     Root_Chord  Tip_Chord  Area     Sweep    Sweep_Location  Dihedral  Twist     Twist_Location  tip airfoil
    1  5.08151  4.7599      2.76959    19.1306  8.42045  0.997396        3         0.3125    1               NACA 4-series Camber=0 CamberLoc=0.2 ThickChord=0.1
    2  4.27544  2.76959     0.802083   7.63524  8.42045  0.986364        7         -1.23295  1               NACA 4-series Camber=0 CamberLoc=0.454545 ThickChord=0.1

Wing "Empennage_Horizontal"
  location (X Y Z) 18.7446 0 3.27717, rotation 0 0 0
  symmetric about XZ
  bounding box size 2.39563 7.55 0.206027
  totals: TotalSpan=7.55 TotalProjectedSpan=7.55 TotalChord=1.5 TotalArea=11.325
  root: chord 1.62928, twist 0, NACA 4-series Camber=0.0343636 CamberLoc=0.2 ThickChord=0.1
  sections:
    n  Span   Root_Chord  Tip_Chord  Area    Sweep  Sweep_Location  Dihedral  Twist  Twist_Location  tip airfoil
    1  3.775  1.62928     1.37072    5.6625  15     0               0         0      0.25            NACA 4-series Camber=0 CamberLoc=0.2 Scale=1.00909 ThickChord=0.1

Fuselage "Moteur_1"
  location (X Y Z) 12.0304 -2.11348 0.326087, rotation 0 3 0
  bounding box size 4.36489 1.1 1.10934
  Design: Length=4.33236
  cross sections:
    n  XLocPercent  YLocPercent  ZLocPercent  shape
    0  0            0            0            circle Circle_Diameter=0.95
    1  0.0923913    0            0            circle Circle_Diameter=1.1
    2  0.360438     0            0            circle Circle_Diameter=1
    3  0.75         0            0            circle Circle_Diameter=0.75
    4  1            0            0            circle Circle_Diameter=0.52

Fuselage "Moteur_2", child of "Moteur_1"
  location (X Y Z) 12.03 2.113 0.326087, rotation 0 3 0
  bounding box size 4.36489 1.1 1.10934
  Design: Length=4.33236
  cross sections:
    n  XLocPercent  YLocPercent  ZLocPercent  shape
    0  0            0            0            circle Circle_Diameter=0.95
    1  0.0923913    0            0            circle Circle_Diameter=1.1
    2  0.360438     0            0            circle Circle_Diameter=1
    3  0.75         0            0            circle Circle_Diameter=0.75
    4  1            0            0            circle Circle_Diameter=0.52

Custom "Fuselage"
  location (X Y Z) -8.68495 0 0, rotation 0 0 0
  bounding box size 27.93 2.28 2.565
  Design: AftCenter=-0.00833333 AftHeight=0.2245 AftMult=3.1525 AftWidth=0.23275 Diameter=2.28 Length=27.93 NoseCenter=-0.291667 NoseMult=2.3275
  custom script TransportFuse0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

Stack "Empennage_Vertical", child of "Fuselage"
  location (X Y Z) 14.0217 0 0.995, rotation 0 0 0
  bounding box size 6.12308 0.2 2.89098
  cross sections:
    n  XDelta    YDelta  YRotate  ZDelta      shape
    0  0         0       0        0           point
    1  2.27803   0       0        0.0819672   rounded rectangle RoundRectXSec_Radius=0 RoundedRect_Height=0.52 RoundedRect_Width=0.2
    2  1.3382    0       0        0.819672    rounded rectangle RoundRectXSec_Radius=0 RoundedRect_Height=2.475 RoundedRect_Width=0.2
    3  0.754098  0       0        -0.0819672  rounded rectangle RoundRectXSec_Radius=0.1 RoundedRect_Height=2.75345 RoundedRect_Width=0.2
    4  1.07377   0       25.3636  -0.0819672  rounded rectangle RoundRectXSec_Radius=0 RoundedRect_Height=3.17014 RoundedRect_Width=0.2

Stack "Pylone_1"
  location (X Y Z) 12.3478 -1.30435 0.434783, rotation 0 3.5 0
  bounding box size 3.66113 0.87687 0.422804
  cross sections:
    n  XDelta   YDelta  ZDelta  shape
    0  0        0       0       rounded rectangle RoundRectXSec_Radius=0 RoundedRect_Height=0.2 RoundedRect_Width=0.52
    1  2.63934  0       0       rounded rectangle RoundRectXSec_Radius=0.1 RoundedRect_Height=0.2 RoundedRect_Width=0.87687
    2  1.01639  0       0       rounded rectangle RoundRectXSec_Radius=0.0927273 RoundedRect_Height=0.2 RoundedRect_Width=0.493669

Stack "Pylone_2", child of "Pylone_1"
  location (X Y Z) 12.348 1.304 0.434783, rotation 0 3.5 0
  bounding box size 3.66113 0.876868 0.422804
  cross sections:
    n  XDelta   YDelta  ZDelta  shape
    0  0        0       0       rounded rectangle RoundRectXSec_Radius=0 RoundedRect_Height=0.2 RoundedRect_Width=0.52
    1  2.63934  0       0       rounded rectangle RoundRectXSec_Radius=0.1 RoundedRect_Height=0.2 RoundedRect_Width=0.876868
    2  1.01639  0       0       rounded rectangle RoundRectXSec_Radius=0.0927273 RoundedRect_Height=0.2 RoundedRect_Width=0.493669

Stack "Train_AV"
  location (X Y Z) -5.54348 0 -2, rotation 0 0 90
  bounding box size 0.52 0.131148 0.52
  cross sections:
    n  XDelta     YDelta  ZDelta  shape
    0  0          0       0       circle Circle_Diameter=0.52
    1  -0.131148  0       0       as above

Stack "Train_Ar1", child of "Train_AV"
  location (X Y Z) 7.95652 1.83 -2, rotation 0 0 90
  bounding box size 0.52 0.131148 0.52
  cross sections:
    n  XDelta     YDelta  ZDelta  shape
    0  0          0       0       circle Circle_Diameter=0.52
    1  -0.131148  0       0       as above

Stack "Train_Ar2", child of "Train_Ar1"
  location (X Y Z) 7.957 -1.83 -2, rotation 0 0 90
  bounding box size 0.52 0.131148 0.52
  cross sections:
    n  XDelta     YDelta  ZDelta  shape
    0  0          0       0       circle Circle_Diameter=0.52
    1  -0.131148  0       0       as above

Stack "Winglet_2"
  location (X Y Z) 9.857 9.58992 -0.0295078, rotation -20 0 0
  bounding box size 0.696581 0.591522 1.17724
  cross sections:
    n  XDelta     YDelta  ZDelta    shape
    0  0          0       0         rounded rectangle RoundRectXSec_Radius=0 RoundedRect_Height=1.18 RoundedRect_Width=0.2
    1  -0.696581  0       -0.42735  rounded rectangle RoundRectXSec_Radius=0 RoundedRect_Height=0.264929 RoundedRect_Width=0.1

Stack "Winglet_1", child of "Winglet_2"
  location (X Y Z) 9.85672 -9.59 -0.0295078, rotation 20 0 0
  bounding box size 0.696581 0.591522 1.17724
  cross sections:
    n  XDelta     YDelta  ZDelta    shape
    0  0          0       0         rounded rectangle RoundRectXSec_Radius=0 RoundedRect_Height=1.18 RoundedRect_Width=0.2
    1  -0.696581  0       -0.42735  rounded rectangle RoundRectXSec_Radius=0 RoundedRect_Height=0.264929 RoundedRect_Width=0.1
