OpenVSP model (file version 4), 11 components.
Geometry view with OpenVSP parameter names; values to 6 digits, angles in degrees, lengths in the model's unit.
Overall bounding box: X_Min=0 X_Len=13.5299 Y_Min=-6.76176 Y_Len=13.5235 Z_Min=-0.651686 Z_Len=3.46923

Fuselage "Fuselage"
  location (X Y Z) 0 0 0, rotation 0 0 0
  bounding box size 12.7848 1.7 1.70411
  Design: Length=12.72
  cross sections:
    n  XLocPercent  YLocPercent  ZLocPercent  shape
    0  0            0            -0.0175454   point
    1  0.123804     0            -0.00812264  ellipse Ellipse_Height=1 Ellipse_Width=1.2
    2  0.222021     0            0.0162453    ellipse Ellipse_Height=1.7 Ellipse_Width=1.7
    3  0.596622     0            0.0162453    as above
    4  0.710058     0            0.02443      ellipse Ellipse_Height=1.5 Ellipse_Width=1.4
    5  0.779017     0            0.0270558    ellipse Ellipse_Height=1.24 Ellipse_Width=1.2
    6  0.873383     0            0.0296852    ellipse Ellipse_Height=0.7 Ellipse_Width=0.7
    7  1            0            0.05         ellipse Ellipse_Height=0.1 Ellipse_Width=0.1
    8  1            0.0108696    0.04         biconvex Chord=0 ThickChord=0

Wing "Aile", child of "Fuselage"
  location (X Y Z) 4.73913 0 -0.5, rotation 0 0 0
  symmetric about XZ
  bounding box size 3.6227 12.7825 0.571511
  totals: TotalSpan=12.8 TotalProjectedSpan=12.7956 TotalChord=1.85 TotalArea=22.0962 RelativeDihedralFlag=1
  root: chord 3.03253, twist 0, NACA 4-series Camber=0 CamberLoc=0.2 ThickChord=0.1
  sections:
    n  Span  Root_Chord  Tip_Chord  Area     Sweep  Sweep_Location  Dihedral  Twist  Twist_Location  tip airfoil
    1  1.6   3.03253     2.15212    4.14771  22     0               3         0      0.25            as above
    2  0.8   2.15212     1.70489    1.5428   22     0               0         0      0.25            as above
    3  0.8   1.70489     1.50827    1.28526  22     0               0         0      0.25            as above
    4  3.2   1.50827     1.03693    4.07232  22     0               0         0      0.25            NACA 4-series Camber=0 CamberLoc=0.2 ThickChord=0.163636

Pod "Reservoir_1", child of "Aile"
  location (X Y Z) 5.83357 6.55 -0.15, rotation 0 0 0
  bounding box size 3.6 0.423529 0.423529
  Design: FineRatio=17 Length=3.6

Pod "Reservoir_2", child of "Reservoir_1"
  location (X Y Z) 5.834 -6.55 -0.15, rotation 0 0 0
  bounding box size 3.6 0.423529 0.423529
  Design: FineRatio=17 Length=3.6

Wing "Empennage_Horizontal", child of "Fuselage"
  location (X Y Z) 10.7 0 1.41598, rotation 0 0 0
  symmetric about XZ
  bounding box size 2.00956 4.4 0.18022
  totals: TotalSpan=4.4 TotalProjectedSpan=4.4 TotalChord=1.24405 TotalArea=5.47382
  root: chord 1.80043, twist 0, NACA 4-series Camber=0 CamberLoc=0.2 ThickChord=0.1
  sections:
    n  Span  Root_Chord  Tip_Chord  Area     Sweep  Sweep_Location  Dihedral  Twist  Twist_Location  tip airfoil
    1  2.2   1.80043     0.687667   2.73691  31     0               0         0      0.25            as above

Wing "Empennage_Vertical", child of "Fuselage"
  location (X Y Z) 9.04169 0 0.635862, rotation 90 0 0
  symmetric about XZ
  bounding box size 4.48826 0.248542 2.18168
  totals: TotalSpan=4.36335 TotalProjectedSpan=4.36335 TotalChord=2.19524 TotalArea=8.91281
  root: chord 2.99177, twist 0, NACA 4-series Camber=0 CamberLoc=0.2 ThickChord=0
  sections:
    n  Span      Root_Chord  Tip_Chord  Area     Sweep  Sweep_Location  Dihedral  Twist  Twist_Location  tip airfoil
    1  0.545419  2.99177     2.48444    1.49342  57     0               0         0      0.25            NACA 4-series Camber=0 CamberLoc=0.2 ThickChord=0.1
    2  0.545419  2.48444     2.04101    1.23413  57     0               0         0      0.25            as above
    3  1.09084   2.04101     1.12877    1.72886  57     0               0         0      0.25            as above

Custom "Moteur_1", child of "Fuselage"
  location (X Y Z) 8.9 1.3 0.45, rotation 0 0 0
  bounding box size 2.42091 0.865404 0.877181
  Design: Camber=0.0583333 CamberLoc=0.2 Chord=2.4 Height=0.5 InvertFlag=0 Shape=0 ThickChord=0.266667 Width=0.5
  custom script Duct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

Custom "Moteur_2", child of "Moteur_1"
  location (X Y Z) 8.9 -1.3 0.45, rotation 0 0 0
  bounding box size 2.42091 0.865404 0.877181
  Design: Camber=0.0583333 CamberLoc=0.2 Chord=2.4 Height=0.5 InvertFlag=0 Shape=0 ThickChord=0.266667 Width=0.5
  custom script Duct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

Wing "Element_moteur_1", child of "Fuselage"
  location (X Y Z) 8.05 0.5 0.45, rotation 0 0 0
  bounding box size 1.87092 0.8 0.187276
  totals: TotalSpan=0.8 TotalProjectedSpan=0.8 TotalChord=1.59652 TotalArea=1.27721
  root: chord 1.87092, twist 0, NACA 4-series Camber=0 CamberLoc=0.2 ThickChord=0.1
  sections:
    n  Span  Root_Chord  Tip_Chord  Area     Sweep  Sweep_Location  Dihedral  Twist  Twist_Location  tip airfoil
    1  0.8   1.87092     1.32212    1.27721  30     0               0         0      0.25            as above

Wing "Element_moteur_2", child of "Element_moteur_1"
  location (X Y Z) 8.05 -0.5 0.45, rotation 180 0 0
  bounding box size 1.87092 0.8 0.187276
  totals: TotalSpan=0.8 TotalProjectedSpan=0.8 TotalChord=1.59652 TotalArea=1.27722
  root: chord 1.87092, twist 0, NACA 4-series Camber=0 CamberLoc=0.2 ThickChord=0.1
  sections:
    n  Span  Root_Chord  Tip_Chord  Area     Sweep  Sweep_Location  Dihedral  Twist  Twist_Location  tip airfoil
    1  0.8   1.87092     1.32212    1.27722  30     0               0         0      0.25            as above

Wing "WingGeom", child of "Fuselage"
  location (X Y Z) 9.15 0 1.025, rotation 90 0 0
  symmetric about XZ
  bounding box size 0.812427 0.0813225 0.2
  totals: TotalSpan=0.4 TotalProjectedSpan=0.4 TotalChord=0.775656 TotalArea=0.310262
  root: chord 0.738884, twist 0, NACA 4-series Camber=0 CamberLoc=0.2 ThickChord=0.0772727
  sections:
    n  Span  Root_Chord  Tip_Chord  Area      Sweep  Sweep_Location  Dihedral  Twist  Twist_Location  tip airfoil
    1  0.2   0.738884    0.812427   0.155131  0      0               0         0      0.25            NACA 4-series Camber=0 CamberLoc=0.2 ThickChord=0.1
