OpenVSP model (file version 4), 11 components.
Geometry view with OpenVSP parameter names; values to 6 digits, angles in degrees, lengths in the model's unit.
Overall bounding box: X_Min=0 X_Len=29.8843 Y_Min=-14.3152 Y_Len=28.6304 Z_Min=-2.88095 Z_Len=7.85773

Fuselage "Fuselage"
  location (X Y Z) 0 0 0, rotation 0 0 0
  bounding box size 26.34 2.69 3.3038
  Design: Length=26.34
  cross sections:
    n  XLocPercent  YLocPercent  ZLocPercent  shape
    0  0            0            -0.0269967   point
    1  0.0576604    0            -0.0217391   ellipse Ellipse_Height=1.55741 Ellipse_Width=2
    2  0.157951     0            0            ellipse Ellipse_Height=2.69 Ellipse_Width=2.69
    3  0.291248     0            0            as above
    4  0.395624     0            -0.0108696   ellipse Ellipse_Height=3.28786 Ellipse_Width=2.69
    5  0.5          0            -0.01087     as above
    6  0.625        0            -0.01087     as above
    7  0.75         0            0            ellipse Ellipse_Height=2.59568 Ellipse_Width=1.9035
    8  0.875        0            0.0108696    ellipse Ellipse_Height=1.61509 Ellipse_Width=1.67251
    9  1            0            0.0108696    point

Wing "Empennage_vertical", child of "Fuselage"
  location (X Y Z) 18.0435 0 0, rotation 90 0 0
  bounding box size 9.92617 0.657178 4.97678
  totals: TotalSpan=4.97678 TotalProjectedSpan=4.97678 TotalChord=4.6174 TotalArea=22.5031
  root: chord 5.75877, twist 0, NACA 4-series Camber=0 CamberLoc=0.2 ThickChord=0.1
  sections:
    n  Span      Root_Chord  Tip_Chord  Area     Sweep    Sweep_Location  Dihedral  Twist  Twist_Location  tip airfoil
    1  0.622098  5.75877     6.56968    3.83475  52.5227  0               0         0      0.25            as above
    2  0.622098  6.56968     6.09642    3.93978  52.5227  0               0         0      0.25            as above
    3  0.622098  6.09642     4.63048    3.33659  71.5852  0               0         0      0.25            as above
    4  0.622098  4.63048     4.2        2.74671  52.5227  0               0         0      0.25            as above
    5  1.2442    4.2         3.50219    4.79151  49.4545  0               0         0      0.25            as above
    6  0.622098  3.50219     3.28152    2.11007  42.0909  0               0         0      0.25            as above
    7  0.622098  3.28152     2.32422    1.74366  64.1307  0               0         0      0.25            as above

Wing "Empennage_horizontal", child of "Empennage_vertical"
  location (X Y Z) 24.4837 0 4.34783, rotation 0 0 0
  symmetric about XZ
  bounding box size 5.40056 9.06952 0.608384
  totals: TotalSpan=9.10417 TotalProjectedSpan=9.06952 TotalChord=2.0179 TotalArea=22.0106
  root: chord 3.57292, twist 0, NACA 4-series Camber=0 CamberLoc=0.2 ThickChord=0.1
  sections:
    n  Span      Root_Chord  Tip_Chord  Area      Sweep    Sweep_Location  Dihedral  Twist  Twist_Location  tip airfoil
    1  2.27604   3.57292     2.47396    6.88147   40.7     0               -5        0      0.25            as above
    2  1.13802   2.47396     1.92448    2.50276   40.7     0               -5        0      0.25            as above
    3  0.569011  1.92448     1.64974    1.01688   40.7     0               -5        0      0.25            as above
    4  0.569011  1.64974     0.473958   0.604203  69.2341  0               -5        0      0.25            as above

Wing "Aile", child of "Fuselage"
  location (X Y Z) 9.45652 0 -1.41304, rotation 0 0 0
  symmetric about XZ
  bounding box size 12.5224 28.6304 2.64548
  totals: TotalSpan=30.7147 TotalProjectedSpan=28.6304 TotalChord=3.04449 TotalArea=100.993
  root: chord 7.17448, twist 0, NACA 4-series Camber=0 CamberLoc=0.2 ThickChord=0.136364
  sections:
    n  Span     Root_Chord  Tip_Chord  Area     Sweep    Sweep_Location  Dihedral  Twist  Twist_Location  tip airfoil
    1  4.49621  7.17448     4.3924     26.0036  35       0               5.5       0      0.25            NACA 4-series Camber=0 CamberLoc=0.2 ThickChord=0.0909091
    2  2.88552  4.3924      2.85197    10.4519  40       0               2         0      0.25            NACA 4-series Camber=0 CamberLoc=0.2 ThickChord=0.1
    3  6.54332  2.85197     1.08854    12.892   38       0               2         0      0.25            as above
    4  1.43229  1.08854     0.515625   1.14882  42.7727  0               73.091    0      0.25            as above

Stack "Moteurs_1_et_2", child of "Fuselage"
  location (X Y Z) 18.3696 -2.28261 0.652174, rotation 0 3.91304 0
  symmetric about XZ
  bounding box size 5.2798 6.36522 1.87213
  cross sections:
    n  XDelta    YDelta  ZDelta  shape
    0  0         0       0       point
    1  0.262295  0       0       ellipse Ellipse_Height=1.52727 Ellipse_Width=1.52727
    2  1.67213   0       0       ellipse Ellipse_Height=1.8 Ellipse_Width=1.8
    3  3.04918   0       0       ellipse Ellipse_Height=1.09091 Ellipse_Width=1.09091
    4  0.254098  0       0       point

Wing "Pilones", child of "Fuselage"
  location (X Y Z) 18.5326 0 0.543478, rotation 0 0 0
  symmetric about XZ
  bounding box size 5.61458 4.54545 0.32512
  totals: TotalSpan=4.54545 TotalProjectedSpan=4.54545 TotalChord=5.04167 TotalArea=22.9167
  root: chord 5.61458, twist 0, NACA 4-series Camber=0 CamberLoc=0.2 ThickChord=0.0272727
  sections:
    n  Span     Root_Chord  Tip_Chord  Area     Sweep  Sweep_Location  Dihedral  Twist  Twist_Location  tip airfoil
    1  2.27273  5.61458     4.46875    11.4583  0      0               0         0      0.25            NACA 4-series Camber=0 CamberLoc=0.2 ThickChord=0.0727273

BodyOfRevolution "Roue_avant", child of "Fuselage"
  location (X Y Z) 2.61905 0 -2.5, rotation 0 0 90
  symmetric about XZ
  bounding box size 0.641667 0.709444 0.641667
  Design: A0=0 Ae=0 Amin=0.323377 AminW=0.25 Angle=0 Diameter=0 Mode=0
  profile: ellipse Ellipse_Height=0.641667 Ellipse_Width=0.354722

BodyOfRevolution "Train_Principal_1", child of "Roue_avant"
  location (X Y Z) 15.7143 -2 -2.38095, rotation 0 0 90
  symmetric about XZ
  bounding box size 1 4 1
  Design: A0=0 Ae=0 Amin=0.785398 AminW=0.25 Angle=0 Diameter=0 Mode=0
  profile: ellipse Ellipse_Height=1 Ellipse_Width=0.366667

BodyOfRevolution "Train_Principal_2", child of "Train_Principal_1"
  location (X Y Z) 15.7143 -2.5 -2.38095, rotation 0 0 90
  symmetric about XZ
  bounding box size 1 5 1
  Design: A0=0 Ae=0 Amin=0.785398 AminW=0.25 Angle=0 Diameter=0 Mode=0
  profile: ellipse Ellipse_Height=1 Ellipse_Width=0.366667

Stack "StackGeom", child of "Fuselage"
  location (X Y Z) 2.6087 0 -0.978261, rotation 0 90 0
  bounding box size 0.353664 0.353664 1.65574
  cross sections:
    n  XDelta     YDelta  ZDelta  shape
    0  0          0       0       point
    1  1          0       0       ellipse Ellipse_Height=0.05 Ellipse_Width=0.05
    2  0.52459    0       0       as above
    3  -0.393443  0       0       as above
    4  0.5        0       0       point

Stack "StackGeom", child of "StackGeom"
  location (X Y Z) 15.7 -2.06522 -1.30435, rotation 0 90 0
  symmetric about XZ
  bounding box size 0.209402 4.33984 1.2459
  cross sections:
    n  XDelta     YDelta  ZDelta  shape
    0  0          0       0       point
    1  0.590164   0       0       ellipse Ellipse_Height=0.1 Ellipse_Width=0.1
    2  0.52459    0       0       as above
    3  -0.393443  0       0       as above
    4  0          0       0       point
