OpenVSP model (file version 4), 15 components.
Geometry view with OpenVSP parameter names; values to 6 digits, angles in degrees, lengths in the model's unit.
Overall bounding box: X_Min=0 X_Len=74.1388 Y_Min=-31.3228 Y_Len=62.6456 Z_Min=-4.85256 Z_Len=18.1071

Wing "Aile"
  location (X Y Z) 26.9987 0 -2.4, rotation 0 -11.6 0
  symmetric about XZ
  bounding box size 20.7475 62.6456 4.41502
  totals: TotalSpan=62.4607 TotalProjectedSpan=62.4607 TotalChord=8.92328 TotalArea=470.926
  root: chord 13.4309, twist 0, NACA 4-series Camber=0 CamberLoc=0.2 ThickChord=0.1
  sections:
    n  Span     Root_Chord  Tip_Chord  Area     Sweep    Sweep_Location  Dihedral  Twist    Twist_Location  tip airfoil
    1  3.36794  13.4309     13.4309    45.2345  0        1               0         7.36364  0.25            as above
    2  5.95333  13.4309     9.62206    68.621   32       0               0         0        0.25            as above
    3  12.0188  9.62206     4.87469    87.1169  28.0364  0.477273        0         0        0.25            as above
    4  9.89025  4.87469     2.1        34.4907  32       0               0         0        0.25            as above

Custom "Fuselage"
  location (X Y Z) 0 0 0, rotation 0 0 0
  bounding box size 73.86 6.2 6.2
  Design: AftCenter=0.3 AftHeight=0.3 AftMult=3.4 AftWidth=0.1 Diameter=6.2 Length=73.86 NoseCenter=-0.1 NoseMult=1.37
  custom script TransportFuse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

Wing "Empennage horizontal"
  location (X Y Z) 63.1565 0 0.8, rotation 0 -7 0
  symmetric about XZ
  bounding box size 10.9829 21.88 1.53312
  totals: TotalSpan=21.88 TotalProjectedSpan=21.88 TotalChord=4.58073 TotalArea=100.226
  root: chord 6.92708, twist 0, NACA 4-series Camber=0 CamberLoc=0.2 ThickChord=0.1
  sections:
    n  Span   Root_Chord  Tip_Chord  Area     Sweep    Sweep_Location  Dihedral  Twist  Twist_Location  tip airfoil
    1  10.94  6.92708     2.23437    50.1132  38.9091  0               0         0      0.25            as above

Wing "Empennage vertical"
  location (X Y Z) 60.3668 0 2, rotation 90 0 0
  bounding box size 13.0885 0.900287 11.2545
  totals: TotalSpan=11.2545 TotalProjectedSpan=11.2545 TotalChord=5.495 TotalArea=61.8437
  root: chord 9, twist 0, NACA 4-series Camber=0 CamberLoc=0.2 ThickChord=0.1
  sections:
    n  Span     Root_Chord  Tip_Chord  Area     Sweep  Sweep_Location  Dihedral  Twist  Twist_Location  tip airfoil
    1  11.2545  9           1.99       61.8437  44.6   0               0         0      0.25            as above

Wing "Turbofan_pylon"
  location (X Y Z) 28.783 10 -1.75, rotation 90 0 0
  bounding box size 9.69074 1.44046 0.93057
  totals: TotalSpan=0.93057 TotalProjectedSpan=0.93057 TotalChord=5.08 TotalArea=4.7273
  root: chord 4.5, twist 0, NACA 4-series Camber=0 CamberLoc=0.2 Scale=1.6 ThickChord=0.2
  sections:
    n  Span     Root_Chord  Tip_Chord  Area    Sweep  Sweep_Location  Dihedral  Twist  Twist_Location  tip airfoil
    1  0.93057  4.5         5.66       4.7273  77     0               0         0      0.25            NACA 4-series Camber=0 CamberLoc=0.2 ThickChord=0.2

Custom "Moteur 2", child of "Turbofan_pylon"
  location (X Y Z) 28.783 10 -2.95, rotation 90 0 0; relative location 0 -1.2 0, rotation 0 0 0
  bounding box size 5.37714 3.85696 3.80512
  Design: Camber=0 CamberLoc=0.2 Chord=5.37714 Height=3.2 InvertFlag=0 Shape=0 ThickChord=0.1125 Width=3.2
  custom script Duct0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

Fuselage "FuselageGeom", child of "Turbofan_pylon"
  location (X Y Z) 28.783 10 -2.95, rotation 90 0 0; relative location 0 -1.2 0, rotation 0 0 0
  bounding box size 5.31523 2.3554 2.3554
  Design: Length=5.31523
  cross sections:
    n  XLocPercent  YLocPercent  ZLocPercent  shape
    0  0            0            0            circle Circle_Diameter=2.3554
    1  0.538043     0            0            circle Circle_Diameter=1.2
    2  1            0            0            point

Fuselage "Spinners", child of "Turbofan_pylon"
  location (X Y Z) 28.783 10 -2.91961, rotation 90 0 0; relative location 0 -1.16961 0, rotation 0 0 0
  bounding box size 0.533333 0.35 0.35
  Design: Length=0.533333
  cross sections:
    n  XLocPercent  YLocPercent  ZLocPercent  shape
    0  0            0            0            point
    1  0.51087      0            0            circle Circle_Diameter=0.35
    2  1            0            0            as above
    3  1            0            0            point

Wing "Fan_blade", child of "Spinners"
  location (X Y Z) 28.341 10 -2.91961, rotation 180 -20 0; relative location -0.442 0 0, rotation 90 -20 0
  15 copies around X
  bounding box size 0.436067 2.57936 2.56973
  totals: TotalSpan=2.48 TotalProjectedSpan=2.48 TotalChord=0.4 TotalArea=0.992
  root: chord 0.2, twist 0, NACA 4-series Camber=0 CamberLoc=0.2 Scale=1.777 ThickChord=0.1
  sections:
    n  Span  Root_Chord  Tip_Chord  Area   Sweep     Sweep_Location  Dihedral  Twist  Twist_Location  tip airfoil
    1  1.24  0.2         0.6        0.496  -8.16667  0               0         -40    0.25            NACA 4-series Camber=0 CamberLoc=0.2 ThickChord=0.0416667

Wing "Turbofan_pylon"
  location (X Y Z) 28.214 -10.1 -1.8413, rotation 90 0 0
  bounding box size 9.69074 1.59981 0.93057
  totals: TotalSpan=0.93057 TotalProjectedSpan=0.93057 TotalChord=5.08 TotalArea=4.7273
  root: chord 4.5, twist 0, NACA 4-series Camber=0 CamberLoc=0.2 Scale=1.777 ThickChord=0.2
  sections:
    n  Span     Root_Chord  Tip_Chord  Area    Sweep  Sweep_Location  Dihedral  Twist  Twist_Location  tip airfoil
    1  0.93057  4.5         5.66       4.7273  77     0               0         0      0.25            NACA 4-series Camber=0 CamberLoc=0.2 ThickChord=0.2

Custom "Moteur 1", child of "Turbofan_pylon"
  location (X Y Z) 28.214 -9.63333 -2.86988, rotation 90 0 0; relative location 0 -1.02857 -0.466667, rotation 0 0 0
  bounding box size 5.53076 3.88097 3.83829
  Design: Camber=0 CamberLoc=0.2 Chord=5.53076 Height=3.20639 InvertFlag=0 Shape=0 ThickChord=0.1125 Width=3.21588
  custom script Duct0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

Fuselage "FuselageGeom", child of "Turbofan_pylon"
  location (X Y Z) 28.214 -9.7 -2.8413, rotation 90 0 0; relative location 0 -1 -0.4, rotation 0 0 0
  bounding box size 5.31523 2.3554 2.3554
  Design: Length=5.31523
  cross sections:
    n  XLocPercent  YLocPercent  ZLocPercent  shape
    0  0            0            0            circle Circle_Diameter=2.3554
    1  0.538043     0            0            circle Circle_Diameter=1.2
    2  1            0            0            point

Fuselage "Spinners", child of "Turbofan_pylon"
  location (X Y Z) 28.214 -9.7 -2.8283, rotation 90 0 0; relative location 0 -0.987 -0.4, rotation 0 0 0
  bounding box size 0.533333 0.35 0.35
  Design: Length=0.533333
  cross sections:
    n  XLocPercent  YLocPercent  ZLocPercent  shape
    0  0            0            0            point
    1  0.51087      0            0            circle Circle_Diameter=0.35
    2  1            0            0            as above
    3  1            0            0            point

Wing "Fan_blade", child of "Spinners"
  location (X Y Z) 28.563 -9.7 -2.8283, rotation 180 -20 0; relative location 0.349 0 0, rotation 90 -20 0
  15 copies around X
  bounding box size 0.436067 2.57936 2.56973
  totals: TotalSpan=2.48 TotalProjectedSpan=2.48 TotalChord=0.4 TotalArea=0.992
  root: chord 0.2, twist 0, NACA 4-series Camber=0 CamberLoc=0.2 Scale=1.777 ThickChord=0.1
  sections:
    n  Span  Root_Chord  Tip_Chord  Area   Sweep     Sweep_Location  Dihedral  Twist  Twist_Location  tip airfoil
    1  1.24  0.2         0.6        0.496  -8.16667  0               0         -40    0.25            NACA 4-series Camber=0 CamberLoc=0.2 ThickChord=0.0416667

Fuselage "GearPod"
  location (X Y Z) 25.6348 0 -2, rotation 0 0 0
  bounding box size 19.8 6.27 4.0497
  Design: Length=19.8
  cross sections:
    n  XLocPercent  YLocPercent  ZLocPercent  shape
    0  0            0            0            point
    1  0.175        0            0            rounded rectangle RoundRectXSec_Radius=0.125 RoundedRect_Height=2.85 RoundedRect_Width=6.27
    2  0.825        0            0            as above
    3  1            0            0            point
