OpenVSP model (file version 4), 13 components.
Geometry view with OpenVSP parameter names; values to 6 digits, angles in degrees, lengths in the model's unit.
Overall bounding box: X_Min=0 X_Len=18.6091 Y_Min=-7.58841 Y_Len=15.1768 Z_Min=-1.08259 Z_Len=3.74462

Fuselage "Fuselage"
  location (X Y Z) 0 0 0, rotation 0 0 0
  bounding box size 17.56 1.75 1.75
  Design: Length=17.56
  cross sections:
    n  XLocPercent  YLocPercent  ZLocPercent  shape
    0  0            0            -0.03        circle Circle_Diameter=0
    1  0.0121009    0            -0.02722     circle Circle_Diameter=0.409091
    2  0.117188     0            -0.01787     ellipse Ellipse_Height=1.1 Ellipse_Width=1.35
    3  0.152344     0            -0.0092553   ellipse Ellipse_Height=1.42495 Ellipse_Width=1.57
    4  0.169922     0            -0.00462765  ellipse Ellipse_Height=1.58748 Ellipse_Width=1.665
    5  0.1875       0            0            circle Circle_Diameter=1.75
    6  0.631793     0            0            as above
    7  0.828738     0            0.01187      circle Circle_Diameter=1.12159
    8  0.989296     0            0.0205       circle Circle_Diameter=0.25
    9  1            0            0.0217391    point

Wing "Empennage_Vertical", child of "Fuselage"
  location (X Y Z) 13.4783 0 0.473478, rotation 90 0 0
  bounding box size 5.13082 0.374817 2.18856
  totals: TotalSpan=2.18856 TotalProjectedSpan=2.18856 TotalChord=3.00454 TotalArea=5.80093
  root: chord 3.74669, twist 0, NACA 4-series Camber=0 CamberLoc=0.2 ThickChord=0.1
  sections:
    n  Span      Root_Chord  Tip_Chord  Area      Sweep    Sweep_Location  Dihedral  Twist  Twist_Location  tip airfoil
    1  0.503256  3.74669     3.68247    1.86939   34.7322  0               0         0      0.25            as above
    2  0.21164   3.68247     2.46235    0.650246  81.0436  0               0         0      0.25            as above
    3  1.47366   2.46235     1.99091    3.28129   44.5     0               0         0      0.25            as above

Wing "Empenage_Horizontal", child of "Empennage_Vertical"
  location (X Y Z) 16.357 0 2.37348, rotation 0 0 0; relative location 2.8787 0 1.9, rotation 0 0 0
  symmetric about XZ
  bounding box size 2.1555 5.54167 0.251705
  totals: TotalSpan=5.54167 TotalProjectedSpan=5.54167 TotalChord=1.152 TotalArea=6.384
  root: chord 1.677, twist 0, NACA 4-series Camber=0 CamberLoc=0.2 ThickChord=0.15
  sections:
    n  Span     Root_Chord  Tip_Chord  Area   Sweep    Sweep_Location  Dihedral  Twist  Twist_Location  tip airfoil
    1  2.77083  1.677       0.627      3.192  28.8829  0               0         0      0.25            NACA 4-series Camber=0 CamberLoc=0.2 ThickChord=0.1

Wing "WingGeom", child of "Fuselage"
  location (X Y Z) 12.337 0 0.326087, rotation 0 0 0
  symmetric about XZ
  bounding box size 5.01713 1.45912 0.833459
  totals: TotalSpan=1.78125 TotalProjectedSpan=1.45912 TotalChord=3.22514 TotalArea=5.74478
  root: chord 4.88542, twist 0, NACA 4-series Camber=0 CamberLoc=0.2 ThickChord=0.1
  sections:
    n  Span      Root_Chord  Tip_Chord  Area     Sweep    Sweep_Location  Dihedral  Twist  Twist_Location  tip airfoil
    1  0.890626  4.88542     1.56486    2.87239  75.5341  0               -35       0      0.25            as above

Fuselage "FuselageGeom", child of "Fuselage"
  location (X Y Z) 6.74 0 -0.56, rotation 0 0 0
  bounding box size 5.4 1.75771 1.04517
  Design: Length=5.4
  cross sections:
    n  XLocPercent  YLocPercent  ZLocPercent  shape
    0  0            0            0            point
    1  0.293478     0            0            rounded rectangle RoundRectXSec_Radius=0.2 RoundedRect_Height=0.95 RoundedRect_Width=1.75
    2  0.525461     0            0            rounded rectangle RoundRectXSec_Radius=0.2 RoundedRect_Height=1.025 RoundedRect_Width=1.75
    3  0.760151     0            0            rounded rectangle RoundRectXSec_Radius=0.2 RoundedRect_Height=0.95 RoundedRect_Width=1.75
    4  1            0            0            point

Wing "Aile", child of "FuselageGeom"
  location (X Y Z) 7.94 0 -0.71, rotation 0 0 0; relative location 1.2 0 -0.15, rotation 0 0 0
  symmetric about XZ
  bounding box size 4.12351 15.1768 1.55022
  totals: TotalSpan=16.96 TotalProjectedSpan=15.1768 TotalChord=1.36742 TotalArea=30.7417
  root: chord 2.88163, twist 0, NACA 4-series Camber=0 CamberLoc=0.2 ThickChord=0.13
  sections:
    n  Span  Root_Chord  Tip_Chord  Area      Sweep  Sweep_Location  Dihedral  Twist  Twist_Location  tip airfoil
    1  7.28  2.88163     1.09502    14.475    17.5   0               1.4       0      0.25            as above
    2  1.2   1.09502     0.398026   0.895827  50     0               75        0      0.25            as above

Wing "Support_Moteurs", child of "Fuselage"
  location (X Y Z) 10.7065 0 0.217391, rotation 0 0 0
  symmetric about XZ
  bounding box size 3.1 2.82626 0.433534
  totals: TotalSpan=2.85 TotalProjectedSpan=2.82626 TotalChord=2.81226 TotalArea=8.45438
  root: chord 3.1, twist 0, rounded rectangle RoundRectXSec_Radius=0.0292517 RoundedRect_Height=0.25 RoundedRect_Width=3.1
  sections:
    n  Span    Root_Chord  Tip_Chord  Area      Sweep      Sweep_Location  Dihedral  Twist  Twist_Location  tip airfoil
    1  1.1746  3.1         3          3.58253   4.05       0               7.4       0      0.259091        rounded rectangle RoundRectXSec_Radius=0 RoundedRect_Height=0.25 RoundedRect_Width=3
    2  0.2504  3           2.14904    0.644661  -0.134091  0               7.4       0      0.25            rounded rectangle RoundRectXSec_Radius=0.0351744 RoundedRect_Height=0.25 RoundedRect_Width=2.14904

Stack "Moteur_1", child of "Support_Moteurs"
  location (X Y Z) 10.7065 1.52174 0.403333, rotation 0 0 0; relative location 0 1.52174 0.185942, rotation 0 0 0
  bounding box size 2.54098 1 1
  cross sections:
    n  XDelta    YDelta  ZDelta  shape
    0  0         0       0       circle Circle_Diameter=0.9
    1  0.770492  0       0       circle Circle_Diameter=1
    2  0.934426  0       0       ellipse Ellipse_Height=1 Ellipse_Width=1
    3  0.836066  0       0       circle Circle_Diameter=0.5

Wing "WingGeom", child of "Moteur_1"
  location (X Y Z) 10.7565 1.52174 0.403333, rotation 90 90 0; relative location 0.05 0 0, rotation 90 90 0
  30 copies around X
  bounding box size 0.0218461 0.868983 0.873171
  totals: TotalSpan=0.8 TotalProjectedSpan=0.8 TotalChord=0.035844 TotalArea=0.0286752
  root: chord 0.01, twist 0, NACA 4-series Camber=0 CamberLoc=0.2 ThickChord=0.1
  sections:
    n  Span  Root_Chord  Tip_Chord  Area       Sweep    Sweep_Location  Dihedral  Twist  Twist_Location  tip airfoil
    1  0.4   0.01        0.0616881  0.0143376  16.1818  0               0         20     0.25            as above

Ellipsoid "EllipsoidGeom", child of "Moteur_1"
  location (X Y Z) 10.6815 1.52174 0.403333, rotation 0 0 0; relative location -0.025 0 0, rotation 0 0 0
  bounding box size 0.2 0.1 0.1
  Design: A_Radius=0.1 B_Radius=0.05 C_Radius=0.05

Stack "Moteur_2", child of "Support_Moteurs"
  location (X Y Z) 10.7065 -1.522 0.403391, rotation 0 0 0; relative location 0 -1.522 0.186, rotation 0 0 0
  bounding box size 2.54098 1 1
  cross sections:
    n  XDelta    YDelta  ZDelta  shape
    0  0         0       0       circle Circle_Diameter=0.9
    1  0.770492  0       0       circle Circle_Diameter=1
    2  0.934426  0       0       ellipse Ellipse_Height=1 Ellipse_Width=1
    3  0.836066  0       0       circle Circle_Diameter=0.5

Wing "WingGeom", child of "Moteur_2"
  location (X Y Z) 10.7565 -1.522 0.403391, rotation 90 90 0; relative location 0.05 0 0, rotation 90 90 0
  30 copies around X
  bounding box size 0.0218461 0.868983 0.873171
  totals: TotalSpan=0.8 TotalProjectedSpan=0.8 TotalChord=0.035844 TotalArea=0.0286752
  root: chord 0.01, twist 0, NACA 4-series Camber=0 CamberLoc=0.2 ThickChord=0.1
  sections:
    n  Span  Root_Chord  Tip_Chord  Area       Sweep    Sweep_Location  Dihedral  Twist  Twist_Location  tip airfoil
    1  0.4   0.01        0.0616881  0.0143376  16.1818  0               0         20     0.25            as above

Ellipsoid "EllipsoidGeom", child of "Moteur_2"
  location (X Y Z) 10.6815 -1.522 0.403391, rotation 0 0 0; relative location -0.025 0 0, rotation 0 0 0
  bounding box size 0.2 0.1 0.1
  Design: A_Radius=0.1 B_Radius=0.05 C_Radius=0.05
