OpenVSP model (file version 4), 6 components.
Geometry view with OpenVSP parameter names; values to 6 digits, angles in degrees, lengths in the model's unit.
Overall bounding box: X_Min=0 X_Len=73.5031 Y_Min=-39.8978 Y_Len=79.7955 Z_Min=-5.10462 Z_Len=23.1888

Custom "Fuselage"
  location (X Y Z) 0 0 0, rotation 0 0 0
  bounding box size 70.4 8.5 8.5
  Design: AftCenter=0.216667 AftHeight=0.3 AftMult=3 AftWidth=0.0925 Diameter=8.5 Length=70.4 NoseCenter=-0.125 NoseMult=1.2
  custom script TransportFuse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

Wing "Empennage_Vertical", child of "Fuselage"
  location (X Y Z) 54.3748 0 3.04348, rotation 90 0 0.108696
  bounding box size 18.468 1.16579 15.0417
  totals: TotalSpan=15.0067 TotalProjectedSpan=15.0067 TotalChord=7.92396 TotalArea=118.912
  root: chord 11.6542, twist 0, NACA 4-series Camber=0 CamberLoc=0.2 DeltaX=-0.0454545 ThickChord=0.1
  sections:
    n  Span     Root_Chord  Tip_Chord  Area     Sweep    Sweep_Location  Dihedral  Twist  Twist_Location  tip airfoil
    1  15.0067  11.6542     4.19375    118.912  42.5455  0               0         0      0               NACA 4-series Camber=0 CamberLoc=0.2 ThickChord=0.1

Wing "Empennage_Horizontal", child of "Fuselage"
  location (X Y Z) 58.1496 0 0.978261, rotation 0 0 0
  symmetric about XZ
  bounding box size 16.1799 30.924 3.42285
  totals: TotalSpan=31.4117 TotalProjectedSpan=30.924 TotalChord=7.645 TotalArea=240.142
  root: chord 12.232, twist -7.52577, NACA 4-series Camber=0 CamberLoc=0.2 DeltaX=-0.0636364 DeltaY=0.0545455 Theta=-4.54545 ThickChord=0.1
  sections:
    n  Span     Root_Chord  Tip_Chord  Area     Sweep    Sweep_Location  Dihedral  Twist     Twist_Location  tip airfoil
    1  15.7058  12.232      3.058      120.071  38.0909  0               10.1087   -6.63636  0.25            NACA 4-series Camber=0 CamberLoc=0.2 ThickChord=0.1

Wing "Aile", child of "Fuselage"
  location (X Y Z) 19.4691 3.13478 -2.68696, rotation 0 0 0
  symmetric about XZ
  bounding box size 32.4072 79.7955 5.3944
  totals: TotalSpan=73.8746 TotalProjectedSpan=73.526 TotalChord=11.8526 TotalArea=744.87
  root: chord 17.5955, twist -7.31959, NACA 4-series Camber=0 CamberLoc=0.177273 ThickChord=0
  sections:
    n  Span     Root_Chord  Tip_Chord  Area     Sweep    Sweep_Location  Dihedral  Twist     Twist_Location  tip airfoil
    1  8.6862   17.5955     12.7917    131.975  31.9091  0.0363636       6.06087   0.545455  0.25            NACA 4-series Camber=0 CamberLoc=0.2 DeltaX=0.118 DeltaY=0.127273 ThickChord=0.1
    2  28.2511  12.7917     4.2314     240.46   37.3636  0.0727273       5.4087    0         0.25            NACA 4-series Camber=0 CamberLoc=0.2 DeltaX=0.1 DeltaY=0.263636 ThickChord=0.15

Stack "Moteur_2", child of "Aile"
  location (X Y Z) 31.3989 26.0348 -1.65217, rotation 0 0 0
  symmetric about XZ
  bounding box size 12.5068 55.9587 4.6
  cross sections:
    n  XDelta   YDelta  ZDelta  shape
    0  0        0       0       point
    1  1.00683  0       0       ellipse Ellipse_Height=4.6 Ellipse_Width=3.88909
    2  6.5      0       0       ellipse Ellipse_Height=4.6 Ellipse_Width=3.6
    3  3        0       0       ellipse Ellipse_Height=2.1 Ellipse_Width=1.7
    4  2        0       0       point

Stack "Moteur_1", child of "Aile"
  location (X Y Z) 23.087 14.9087 -2.80462, rotation 0 0 0
  symmetric about XZ
  bounding box size 12.5 33.6174 4.6
  cross sections:
    n  XDelta  YDelta  ZDelta  shape
    0  0       0       0       point
    1  1       0       0       ellipse Ellipse_Height=4.6 Ellipse_Width=3.8
    2  6.5     0       0       ellipse Ellipse_Height=4.6 Ellipse_Width=3.6
    3  3       0       0       ellipse Ellipse_Height=2.1 Ellipse_Width=1.7
    4  2       0       0       point
