OpenVSP model (file version 4), 8 components.
Geometry view with OpenVSP parameter names; values to 6 digits, angles in degrees, lengths in the model's unit.
Overall bounding box: X_Min=0 X_Len=20.1568 Y_Min=-9.96036 Y_Len=19.9207 Z_Min=-1.40941 Z_Len=5.46283

Custom "TransportFuse"
  location (X Y Z) 0 0 0, rotation 0 0 0
  bounding box size 18.2893 2.68458 2.7517
  Design: AftCenter=0.141667 AftHeight=0.1915 AftMult=2.41 AftWidth=0.01 Diameter=2.68458 Length=18.2893 NoseCenter=-0.191667 NoseMult=1.3375
  custom script TransportFuse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

Wing "Ailes", child of "TransportFuse"
  location (X Y Z) 5.20159 0 -0.96678, rotation 177.283 0 0; relative location 5.20159 0 -0.96678, rotation -2.71739 -180 -180
  symmetric about XZ
  bounding box size 8.49575 19.9207 2.08778
  totals: TotalSpan=21.5303 TotalProjectedSpan=20.0505 TotalChord=2.34735 TotalArea=54.7719
  root: chord 5.07359, twist 0, NACA 4-series Camber=0.0159545 CamberLoc=0.422727 ThickChord=0.140909
  sections:
    n  Span     Root_Chord  Tip_Chord  Area     Sweep    Sweep_Location  Dihedral  Twist     Twist_Location  tip airfoil
    1  3.36309  5.07359     3.0187     13.6075  37.4545  0               1.65082   0         0.25            NACA 4-series Camber=0 CamberLoc=0.2 ThickChord=0.140909
    2  5.97021  3.0187      1.16288    12.4824  29.5909  0               0         -3.72727  0.25            NACA 4-series Camber=0 CamberLoc=0.2 ThickChord=0.145455
    3  1.43184  1.16288     0.647348   1.29597  52.7273  0               -61.0377  0         0.25            NACA 4-series Camber=0 CamberLoc=0.2 ThickChord=0.0772727

Wing "Empennage Vertical", child of "TransportFuse"
  location (X Y Z) 13.1884 0 1.21582, rotation 90 0 -7.82609
  bounding box size 6.02424 0.425606 3.41695
  totals: TotalSpan=3.3597 TotalProjectedSpan=3.3597 TotalChord=3.06307 TotalArea=9.02097
  root: chord 4.2547, twist 0, NACA 4-series Camber=0 CamberLoc=0.2 ThickChord=0.1
  sections:
    n  Span      Root_Chord  Tip_Chord  Area     Sweep    Sweep_Location  Dihedral  Twist  Twist_Location  tip airfoil
    1  0.545913  4.2547      2.99143    1.97788  68.9565  0               0         0      0.25            as above
    2  2.81378   2.99143     2.01471    7.04309  36.3409  0.118182        0         0      0.25            as above

Wing "Empennage Horizontal", child of "Empennage Vertical"
  location (X Y Z) 17.1403 0 3.63728, rotation 0 -0.52331 0
  symmetric about XZ
  bounding box size 3.0165 6.384 0.209131
  totals: TotalSpan=6.384 TotalProjectedSpan=6.384 TotalChord=1.51136 TotalArea=9.64855
  root: chord 2.08443, twist 0, NACA 4-series Camber=0 CamberLoc=0.2 ThickChord=0.1
  sections:
    n  Span   Root_Chord  Tip_Chord  Area     Sweep    Sweep_Location  Dihedral  Twist  Twist_Location  tip airfoil
    1  3.192  2.08443     0.938302   4.82427  33.0682  0               0         0      0.25            as above

Wing "Porte-moteurs", child of "TransportFuse"
  location (X Y Z) 15.4323 0 0.741304, rotation 0 -2.17391 180
  symmetric about XZ
  bounding box size 4.71741 3.68521 0.333121
  totals: TotalSpan=3.68521 TotalProjectedSpan=3.68521 TotalChord=3.98177 TotalArea=14.6737
  root: chord 4.72081, twist 0, NACA 4-series Camber=0.00409091 CamberLoc=0.309091 ThickChord=0
  sections:
    n  Span     Root_Chord  Tip_Chord  Area     Sweep  Sweep_Location  Dihedral  Twist     Twist_Location  tip airfoil
    1  1.84261  4.72081     3.24274    7.33684  30     0               0         -2.36364  1               NACA 4-series Camber=0 CamberLoc=0.2 ThickChord=0.1

Ellipsoid "Réacteurs", child of "Porte-moteurs"
  location (X Y Z) 14.438 1.96927 0.633333, rotation 0 2.14286 176.543
  symmetric about XZ
  bounding box size 3.94111 5.41255 1.19189
  Design: A_Radius=1.95067 B_Radius=0.55546 C_Radius=0.55546

Custom "Duct", child of "Porte-moteurs"
  location (X Y Z) 11.5051 2.07565 0.760538, rotation -180 -0.207039 0; relative location 3.9237 -2.07565 0.168192, rotation 0 177.619 0
  symmetric about XZ
  bounding box size 2.44524 5.60702 1.47568
  Design: Camber=0 CamberLoc=0.2 Chord=2.44077 Height=1.22172 InvertFlag=0 Shape=0 ThickChord=0.0958333 Width=1.22172
  custom script Duct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

Custom "Disk", child of "Duct"
  location (X Y Z) 10.5514 2.10178 0.753795, rotation 0 0 180
  symmetric about XZ
  bounding box size 0 5.37843 1.17487
  Design: Diameter=1.17487
  custom script Disk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
