OpenVSP model (file version 4), 8 components.
Geometry view with OpenVSP parameter names; values to 6 digits, angles in degrees, lengths in the model's unit.
Overall bounding box: X_Min=-0.00100392 X_Len=31.3036 Y_Min=-11.0989 Y_Len=22.1979 Z_Min=-1.38806 Z_Len=5.50486

Fuselage "Fuselage"
  location (X Y Z) 0 0 0, rotation 0 0 0
  bounding box size 29.0822 2.87841 2.91559
  Design: Length=29.0054
  cross sections:
    n  XLocPercent  YLocPercent  ZLocPercent  shape
    0  0            0            -0.0182345   point
    1  0.0078508    0            -0.017       ellipse Ellipse_Height=0.5388 Ellipse_Width=0.577145
    2  0.0544394    0            -0.00867692  ellipse Ellipse_Height=1.56401 Ellipse_Width=2.0534
    3  0.101801     0            0.00170554   ellipse Ellipse_Height=2.5343 Ellipse_Width=2.75027
    4  0.139876     0            0.005        ellipse Ellipse_Height=2.765 Ellipse_Width=2.8736
    5  0.46054      0            0.000720705  ellipse Ellipse_Height=2.81793 Ellipse_Width=2.8736
    6  0.750748     0            0.00262572   ellipse Ellipse_Height=2.71883 Ellipse_Width=2.694
    7  0.873568     0            0.008125     ellipse Ellipse_Height=2.1154 Ellipse_Width=1.75126
    8  0.999        0            0.0106793    ellipse Ellipse_Height=0.494383 Ellipse_Width=0.584099
    9  1            0            0.0105       point

Wing "Aile"
  location (X Y Z) 12.1885 0 -0.843478, rotation 0 0 0
  symmetric about XZ
  bounding box size 8.34857 22.1979 1.76742
  totals: TotalSpan=23.9237 TotalProjectedSpan=22.1979 TotalChord=2.59527 TotalArea=71.4784
  root: chord 5.77369, twist 0, NACA 4-series Camber=0 CamberLoc=0.2 ThickChord=0.12
  sections:
    n  Span     Root_Chord  Tip_Chord  Area     Sweep    Sweep_Location  Dihedral  Twist  Twist_Location  tip airfoil
    1  4.47416  5.77369     3.21243    20.1027  30.5     0               1.32      0      0.25            as above
    2  6.30856  3.21243     1.37052    14.4559  30.5     0               1.32      0      0.25            NACA 4-series Camber=0.0163636 CamberLoc=0.2 ThickChord=0.12
    3  1.17913  1.37052     0.632012   1.18062  27.9842  1               74.3      0      0.25            NACA 4-series Camber=0 CamberLoc=0.2 ThickChord=0.118182

Custom "Moteurs_1et2"
  location (X Y Z) 22.3786 2.19933 0.9125, rotation 0 2.8 -3
  symmetric about XZ
  bounding box size 2.40524 6.05766 1.63256
  Design: Camber=0 CamberLoc=0.2 Chord=2.31605 Height=1.3021 InvertFlag=0 Shape=0 ThickChord=0.129167 Width=1.3021
  custom script Duct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

Custom "Intérieur_1", child of "Moteurs_1et2"
  location (X Y Z) 20.5593 2.2619 0.9745, rotation 0 2.8 -3
  symmetric about XZ
  bounding box size 4.49966 5.13387 0.916795
  Design: AftCenter=0 AftHeight=0.01 AftMult=3 AftWidth=0.1 Diameter=0.869142 Length=4.49 NoseCenter=0 NoseMult=4.6375
  custom script TransportFuse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

Custom "Intérieur_2", child of "Moteurs_1et2"
  location (X Y Z) 21.849 2.19933 0.912, rotation 0 2.8 -3
  symmetric about XZ
  bounding box size 2.77688 5.58897 1.26717
  Design: AftCenter=0 AftHeight=0.5772 AftMult=1.3375 AftWidth=0.4555 Diameter=1.22018 Length=2.74518 NoseCenter=0 NoseMult=0.265
  custom script TransportFuse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

Wing "Fixation", child of "Moteurs_1et2"
  location (X Y Z) 20.4025 0 0.484783, rotation 0 3 0
  symmetric about XZ
  bounding box size 5.05123 3.72977 0.764579
  totals: TotalSpan=3.8 TotalProjectedSpan=3.72977 TotalChord=3.92609 TotalArea=14.9192
  root: chord 5.05798, twist 0, NACA 4-series Camber=0 CamberLoc=0.2 ThickChord=0.1
  sections:
    n  Span  Root_Chord  Tip_Chord  Area     Sweep  Sweep_Location  Dihedral  Twist  Twist_Location  tip airfoil
    1  1.9   5.05798     2.7942     7.45958  30     0               11.0326   0      0.25            as above

Wing "Empennage_Horizontal"
  location (X Y Z) 27.3626 0 3.75, rotation 0 0 0
  symmetric about XZ
  bounding box size 3.93995 8.52073 0.556559
  totals: TotalSpan=8.55328 TotalProjectedSpan=8.52073 TotalChord=1.83752 TotalArea=15.7168
  root: chord 2.6296, twist 0, NACA 4-series Camber=0 CamberLoc=0.2 ThickChord=0.1
  sections:
    n  Span     Root_Chord  Tip_Chord  Area     Sweep    Sweep_Location  Dihedral  Twist  Twist_Location  tip airfoil
    1  4.27664  2.6296      1.04544    7.85841  34.0909  0               -5        0      0.25            as above

Wing "Empennage_Vertical"
  location (X Y Z) 24.0467 0 0.434783, rotation 90 0 0
  bounding box size 6.07272 0.441396 3.68202
  totals: TotalSpan=3.68202 TotalProjectedSpan=3.68202 TotalChord=3.08425 TotalArea=12.065
  root: chord 3.62511, twist 0, NACA 4-series Camber=0 CamberLoc=0.2 ThickChord=0.1
  sections:
    n  Span       Root_Chord  Tip_Chord  Area      Sweep  Sweep_Location  Dihedral  Twist  Twist_Location  tip airfoil
    1  1.11964    3.62511     4.41256    4.49965   0      0               0         0      0.25            as above
    2  0.411797   4.41256     3.06159    1.53892   76     0               0         0      0.25            as above
    3  2.08829    3.06159     2.60577    5.91755   41     0               0         0      0.25            as above
    4  0.0622904  2.60577     0.889027   0.108846  0      0               0         0      0.25            as above
