OpenVSP model (file version 4), 6 components.
Geometry view with OpenVSP parameter names; values to 6 digits, angles in degrees, lengths in the model's unit.
Overall bounding box: X_Min=0 X_Len=20.0929 Y_Min=-9.46444 Y_Len=18.9289 Z_Min=-1.26602 Z_Len=6.12136

Fuselage "Fuselage"
  location (X Y Z) 0 0 0, rotation 0 0 0
  bounding box size 19.5356 2.63936 2.75001
  Design: Length=19.52
  cross sections:
    n   XLocPercent  YLocPercent  ZLocPercent  shape
    0   0            0            -0.02        ellipse Ellipse_Height=0 Ellipse_Width=0
    1   0.0899988    0            -0.01        ellipse Ellipse_Height=1.3578 Ellipse_Width=1.7201
    2   0.142135     0            0.006        ellipse Ellipse_Height=2.1 Ellipse_Width=2.18968
    3   0.233179     0            0.011        ellipse Ellipse_Height=2.44 Ellipse_Width=2.49
    4   0.376359     0            0.00816656   general fuselage BotStr=1.60463 BotTanAngle=90 CornerRad=0 Height=2.5832 LowStr=1.11939 MaxWidthLoc=0 TopStr=0.83 TopTanAngle=90 UpStr=0.83 Width=2.49
    5   0.5          0            0.0072       general fuselage BotStr=1.8212 BotTanAngle=90 CornerRad=0 Height=2.6475 LowStr=1.38444 MaxWidthLoc=0 TopStr=0.83 TopTanAngle=90 UpStr=0.83 Width=2.49
    6   0.604348     0            0.01         general fuselage BotStr=1.41678 BotTanAngle=90 CornerRad=0 Height=2.5278 LowStr=1.16756 MaxWidthLoc=0 TopStr=0.83 TopTanAngle=90 UpStr=0.83 Width=2.49
    7   0.668821     0            0.014        ellipse Ellipse_Height=2.363 Ellipse_Width=2
    8   0.836957     0            0.022        ellipse Ellipse_Height=1.5461 Ellipse_Width=1.24
    9   0.959239     0            0.0365699    ellipse Ellipse_Height=0.66358 Ellipse_Width=0.63812
    10  1            0            0.043        ellipse Ellipse_Height=0 Ellipse_Width=0

Wing "Ailes", child of "Fuselage"
  location (X Y Z) 7.1 0 -0.652174, rotation 0 0 0
  symmetric about XZ
  bounding box size 6.62588 18.9289 0.793795
  totals: TotalSpan=18.9289 TotalProjectedSpan=18.9289 TotalChord=2.09027 TotalArea=49.1072
  root: chord 4.44561, twist 0, NACA 4-series Camber=0 CamberLoc=0.2 DeltaY=-0.0325203 Scale=1.05 ThickChord=0.17
  sections:
    n   Span       Root_Chord  Tip_Chord  Area       Sweep  Sweep_Location  Dihedral  Twist  Twist_Location  tip airfoil
    1   0.546579   4.44561     4.22978    2.37089    30     0               0         0      0.25            NACA 4-series Camber=0 CamberLoc=0.2 DeltaX=-0.03 DeltaY=-0.03 Scale=1.07 ThickChord=0.16
    2   0.546579   4.22978     4.01395    2.25293    30     0               0         0      0.25            NACA 4-series Camber=0 CamberLoc=0.2 DeltaX=0.005 DeltaY=-0.015 Scale=1.02 ThickChord=0.148
    3   1.09316    4.01395     3.62       4.17256    30     0               0         0      0.25            NACA 4-series Camber=0 CamberLoc=0.2 DeltaX=0.04 DeltaY=-0.017 Scale=0.96 ThickChord=0.13
    4   1.09316    3.62        3.16948    3.71099    30     0               0         0      0.25            NACA 4-series Camber=0 CamberLoc=0.2 DeltaX=0.09 DeltaY=-0.013 Scale=0.89 ThickChord=0.105
    5   0.546579   3.16948     2.94423    1.67081    30     0               0         0      0.25            NACA 4-series Camber=0 CamberLoc=0.2 DeltaX=0.12 DeltaY=-0.014 Scale=0.85 ThickChord=0.09
    6   0.546579   2.94423     2.71897    1.54769    30     0               0         0      0.25            NACA 4-series Camber=0 CamberLoc=0.2 DeltaX=0.124 DeltaY=-0.019 Scale=0.865 ThickChord=0.095
    7   4.37263    2.71897     0.992325   8.11406    30     0               0         0      0.25            NACA 4-series Camber=0 CamberLoc=0.2 DeltaX=0.12 DeltaY=-0.022 Scale=1.3 ThickChord=0.095
    8   0.230138   0.992325    0.992325   0.228372   0      0               0         0      0.25            NACA 4-series Camber=0 CamberLoc=0.2 DeltaX=0.23 DeltaY=-0.024 Scale=1.24 ThickChord=0.095
    9   0.230138   0.992325    0.992325   0.228372   0      0               0         0      0.25            NACA 4-series Camber=0 CamberLoc=0.2 DeltaX=0.36 DeltaY=-0.025 Scale=1.16 ThickChord=0.1
    10  0.0575346  0.992325    0.992325   0.057093   0      0               0         0      0.25            NACA 4-series Camber=0 CamberLoc=0.2 DeltaX=0.41 DeltaY=-0.027 Scale=1.125 ThickChord=0.1
    11  0.0575346  0.992325    0.992325   0.057093   0      0               0         0      0.25            NACA 4-series Camber=0 CamberLoc=0.2 DeltaX=0.5 DeltaY=-0.027 Scale=1.05 ThickChord=0.1
    12  0.0575346  0.992325    0.992325   0.057093   0      0               0         0      0.25            NACA 4-series Camber=0 CamberLoc=0.2 DeltaX=0.6 DeltaY=-0.027 Scale=0.965 ThickChord=0.1
    13  0.0575346  0.992325    0.992325   0.057093   0      0               0         0      0.25            NACA 4-series Camber=0 CamberLoc=0.2 DeltaX=0.75 DeltaY=-0.027 Scale=0.83 ThickChord=0.1
    14  0.0143837  0.992325    0.992325   0.0142733  0      0               0         0      0.25            NACA 4-series Camber=0 CamberLoc=0.2 DeltaX=0.8 DeltaY=-0.027 Scale=0.785 ThickChord=0.1
    15  0.0143837  0.992325    0.992325   0.0142733  0      0               0         0      0.25            NACA 4-series Camber=0 CamberLoc=0.2 DeltaX=1.589 DeltaY=-0.027 Scale=0 ThickChord=0.1

Wing "Empennage_vertical", child of "Fuselage"
  location (X Y Z) 14.89 0 1.28, rotation 90 0 -4.3
  bounding box size 5.53804 0.294539 3.88726
  totals: TotalSpan=3.905 TotalProjectedSpan=3.905 TotalChord=2.46094 TotalArea=9.7625
  root: chord 4, twist 0, NACA 4-series Camber=0 CamberLoc=0.2 DeltaX=-0.25 Scale=1.29 ThickChord=0.057
  sections:
    n   Span      Root_Chord  Tip_Chord  Area      Sweep  Sweep_Location  Dihedral  Twist  Twist_Location  tip airfoil
    1   0.244062  4           3.8125     0.953369  30     0               0         0      0.25            NACA 4-series Camber=0 CamberLoc=0.2 DeltaX=-0.0727273 Scale=1.02 ThickChord=0.06
    2   0.244062  3.8125      3.625      0.907607  30     0               0         0      0.25            NACA 4-series Camber=0 CamberLoc=0.2 DeltaX=-0.01 Scale=0.93 ThickChord=0.055
    3   0.244062  3.625       3.4375     0.861846  30     0               0         0      0.25            NACA 4-series Camber=0 CamberLoc=0.2 DeltaX=0.04 Scale=0.878 ThickChord=0.07
    4   0.244063  3.4375      3.25       0.816084  30     0               0         0      0.25            NACA 4-series Camber=0 CamberLoc=0.2 DeltaX=0.065 Scale=0.869 ThickChord=0.07
    5   0.488125  3.25        2.875      1.49488   30     0               0         0      0.25            NACA 4-series Camber=0 CamberLoc=0.2 DeltaX=0.11 Scale=0.879 ThickChord=0.05
    6   0.488125  2.875       2.5        1.31184   30     0               0         0      0.25            NACA 4-series Camber=0 CamberLoc=0.2 DeltaX=0.175 Scale=0.89 ThickChord=0.04
    7   0.488125  2.5         2.125      1.12879   30     0               0         0      0.25            NACA 4-series Camber=0 CamberLoc=0.2 DeltaX=0.26 Scale=0.92 ThickChord=0.035
    8   0.488125  2.125       1.75       0.945742  30     0               0         0      0.25            NACA 4-series Camber=0 CamberLoc=0.2 DeltaX=0.38 Scale=0.95 ThickChord=0.03
    9   0.488125  1.75        1.375      0.762695  30     0               0         0      0.25            NACA 4-series Camber=0 CamberLoc=0.2 DeltaX=0.565 Scale=1.02 ThickChord=0.03
    10  0.244062  1.375       1.1875     0.312705  30     0               0         0      0.25            NACA 4-series Camber=0 CamberLoc=0.2 DeltaX=0.72 Scale=1.05 ThickChord=0.025
    11  0.122031  1.1875      1.09375    0.139192  30     0               0         0      0.25            NACA 4-series Camber=0 CamberLoc=0.2 DeltaX=0.85 Scale=1.03 ThickChord=0.025
    12  0.122031  1.09375     1          0.127751  30     0               0         0      0.25            NACA 4-series Camber=0 CamberLoc=0.2 DeltaX=1.9955 Scale=0.01 ThickChord=0.02

Wing "Empennage_horizontal", child of "Empennage_vertical"
  location (X Y Z) 16.18 0 2.155, rotation 0 0 0
  symmetric about XZ
  bounding box size 3.91292 7.74229 0.621423
  totals: TotalSpan=7.81 TotalProjectedSpan=7.74229 TotalChord=0.792372 TotalArea=10.934
  root: chord 2.24, twist 0, NACA 4-series Camber=0 CamberLoc=0.2 Scale=1.01 ThickChord=0.073
  sections:
    n   Span        Root_Chord  Tip_Chord  Area        Sweep  Sweep_Location  Dihedral  Twist  Twist_Location  tip airfoil
    1   1.9525      2.24        1.4        3.55355     36.1   0               -7.55     0      0.25            NACA 4-series Camber=0 CamberLoc=0.2 DeltaX=-0.02 Scale=1.21 ThickChord=0.0590909
    2   0.97625     1.4         0.98       1.16174     36.1   0               -7.55     0      0.25            NACA 4-series Camber=0 CamberLoc=0.2 DeltaX=-0.02 Scale=1.42 ThickChord=0.0590909
    3   0.488125    0.98        0.77       0.427109    36.1   0               -7.55     0      0.25            NACA 4-series Camber=0 CamberLoc=0.2 DeltaX=-0.03 Scale=1.625 ThickChord=0.0590909
    4   0.244063    0.77        0.665      0.175115    36.1   0               -7.55     0      0.25            NACA 4-series Camber=0 CamberLoc=0.2 DeltaX=-0.018 Scale=1.76 ThickChord=0.0590909
    5   0.122031    0.665       0.6125     0.0779475   36.1   0               -7.55     0      0.25            NACA 4-series Camber=0 CamberLoc=0.2 Scale=1.835 ThickChord=0.0590909
    6   0.0305078   0.6125      0.599375   0.0184858   36.1   0               -7.55     0      0.25            NACA 4-series Camber=0 CamberLoc=0.2 DeltaX=0.015 Scale=1.842 ThickChord=0.0590909
    7   0.0305078   0.599375    0.58625    0.0180854   36.1   0               -7.55     0      0.25            NACA 4-series Camber=0 CamberLoc=0.2 DeltaX=0.05 Scale=1.83 ThickChord=0.0590909
    8   0.0305078   0.58625     0.573125   0.017685    36.1   0               -7.55     0      0.25            NACA 4-series Camber=0 CamberLoc=0.2 DeltaX=0.15 Scale=1.745 ThickChord=0.0590909
    9   0.0152539   0.573125    0.566562   0.00869234  36.1   0               -7.55     0      0.25            NACA 4-series Camber=0 CamberLoc=0.2 DeltaX=0.25 Scale=1.65 ThickChord=0.0590909
    10  0.00762695  0.566562    0.563281   0.00430863  36.1   0               -7.55     0      0.25            NACA 4-series Camber=0 CamberLoc=0.2 DeltaX=0.4 Scale=1.5 ThickChord=0.0590909
    11  0.00762695  0.563281    0.56       0.00428361  36.1   0               -7.55     0      0.25            NACA 4-series Camber=0 CamberLoc=0.2 DeltaX=1.89 Scale=0.01 ThickChord=0.0590909

Fuselage "Moteurs 1 et 2"
  location (X Y Z) 13.0435 1.8 0.76087, rotation 0 0 0
  symmetric about XZ
  bounding box size 3.55 4.89981 1.33241
  Design: Length=3.55
  cross sections:
    n  XLocPercent  YLocPercent  ZLocPercent  shape
    0  0            0            0.0163043    general fuselage BotStr=0.83 BotTanAngle=90 CornerRad=0 Height=0.83595 LowStr=0.83 MaxWidthLoc=0 TopStr=0.83 TopTanAngle=90 UpStr=0.83 Width=1.035
    1  0.25         -0.00679348  0            ellipse Ellipse_Height=1.29752 Ellipse_Width=1.30114
    2  0.5          -0.013587    -0.00815217  ellipse Ellipse_Height=1.20829 Ellipse_Width=1.22727
    3  0.75         -0.0217391   -0.00271739  ellipse Ellipse_Height=0.954917 Ellipse_Width=1.04588
    4  1            -0.0326087   0            general fuselage BotStr=0.83 BotTanAngle=90 CornerRad=0 Height=0.631198 LowStr=0.840136 MaxWidthLoc=0 TopStr=0.873409 TopTanAngle=90 UpStr=0.83 Width=0.731405

Wing "Attache moteurs", child of "Moteurs 1 et 2"
  location (X Y Z) 12.4 0 0.76087, rotation 0 0 0
  symmetric about XZ
  bounding box size 4.3431 2.69 0.19626
  totals: TotalSpan=2.69 TotalProjectedSpan=2.69 TotalChord=3.80813 TotalArea=10.2439
  root: chord 4.29335, twist 0.618557, NACA 4-series Camber=0 CamberLoc=0.2 ThickChord=0.045
  sections:
    n  Span   Root_Chord  Tip_Chord  Area     Sweep    Sweep_Location  Dihedral  Twist  Twist_Location  tip airfoil
    1  1.345  4.29335     3.32292    5.12194  37.1818  0               0         0      0.25            NACA 4-series Camber=0 CamberLoc=0.2 ThickChord=0.02
